# Automated Design: AutoCAD:Sludge Drain Cover
# [reference: MasterProgram.xmcd]
AN_SedTopInlet = 60 deg
B_SedSludgeOrifices = 0.15 m
T_SedSludge = 0.0933013 m
N_SedSludgeOrifices = 63
H_SedSludge = 0.12 m
L_Sed = 9.52822 m
W_SedSludge = 0.12 m
DrainCover_origin := [Plant_Origin[0]; Plant_Origin[1] - W_Sed/2 - □; Plant_Origin[2]]  # error: This placeholder is empty.
# Draw a box that is T.SedSludge by W.SedDrainCover and then extend it by L.Sed
