# AguaClara Water Treatment Plants -- 4 Communities
# Automated Design
# User Inputs:
HW_Sed := 2.4 m
# Design References
# [reference: UserInputs- 4 Communities.xmcd]
# [reference: DesignAssumptions- 4 Communities.xmcd]
# [reference: MathFunctions.xmcd]
# [reference: PipeDatabase.xmcd]
# [reference: MinorLossCoefficients.xmcd]
# [reference: FluidsFunctions.xmcd]
# Sed Tanks and Slopes (1st iteration):
# [reference: Sed. Inlet Slopes.xmcd]
N_SedTanks = 2
Q_Plant = 100.385 gal/min
H_SedBetween = 0.0762 m
HW_Sed = 2.4 m
L_Sed = 3.82649 m
H_SedPort = 6.01226 cm
N_TrianglesperTank = 2
W_Sed = 1.0795 m
ND_SedPipeEntrance = 8 in
# Sedimentation Tank Sludge Drain:
# [reference: SludgeDrain.xmcd]
N_SedSludgeOrifices = 38
ND_SedSludge = 3 in
Q_SludgeDrainInitial = 660.911 L/min
D_SedSludgeOrifice = 0.1875 in
# Sed Tanks and Slopes (2nd iteration):
# [reference: Sed.Inlet.Slope-iteration 2.xmcd]
N_SedTanks = 2
H_SedBetween = 0.0762 m
HW_Sed = 2.4 m
L_Sed = 3.67629 m
H_SedPort = 0.0582561 m
N_TrianglesperTank = 3
N_Slopes/N_SedTanks = 2.05436
W_Sed = 1.61925 m
ND_SedPipeEntrance = 8 in
W_SedSlopeGap = 1.03912 cm
# Ensure that W.SedGapDrain is larger than W.SedSlopeGap
W_SedGapDrain = 4.445 cm
# Sedimentation Tank Dimensions:
# [reference: Sedimentation Dimensions.xmcd]
H_SedBottomSlope = 0.452904 m
H_SedTopSlope = 0.934874 m
H_SlopeRectangle = 0.1 m
Z_SedSlopes = 2.05865 m
H_Sed = 2.5 m
W_Sed = 1.61925 m
# Inlet Channel:
# [reference: Inlet Channel.xmcd]
W_InletChannel = 0.377904 m
L_Channel = 3.5385 m
ND_SedPipeEntrance = 8 in
N_SedInletPipes = 2
H_InletChannel = 0.291351 m
Q_Plant = 100.385 gal/min
# Sedimentation Tank Effluent Launder:
# [reference: Launder.xmcd]
N_SedLaunderOrifices = 54
Q_SedLaunderOrifices = 1.75926 L/min
# Exit Channel:
# [reference: Exit Channel.xmcd]
W_ExitChannel = 0.377904 m
ND_SedLaunder = 3 in
H_ExitChannel = 0.291351 m
L_SedLaunder = 2.77048 m
L_ExitChannel = 3.5385 m
D_SedLaunderOrifice = 0.3125 in
H_PltWeir = 0.113566 m
Z_SedLaunder = 2.31555 m
HW_ExitChannel = 0.151351 m
ZW_ExitChannel = 2.36 m
# Lamella:
# [reference: Lamella.xmcd]
L_SedPlate = 0.157329 m
B_SedPlate = 1.15317 cm
S_SedPlate = 0.853175 cm
N_SedPlates = 192
AN_SedPlate = 60 deg
V_SedC = 10.0205 m/day
V_SedUp = 45.9614 m/day
H_SedPlate = 0.136251 m
H_SedAbove = 0.1289 m
# Flow Controller:
# [reference: FCM.xmcd]
N_Fcm = 1
ID_FcmTube = 3.175 mm
ID_FcmTube = 0.125 in
L_FcmTube = 99.0625 cm
Q_FcmTubeMax = 285 mL/min
HL_FcmValve = 15.0907 cm
# Flocculator:
# [reference: Flocculation.xmcd]
W_FlocChannel = 0.809625 m
S_FlocBaffle = [0.060079; 0.07187; 0.0952806; 0.173086] m
B_FlocBaffle = [0.064079; 0.07587; 0.0992806; 0.177086] m
N_FlocBafflesMin = 65
HL_Floc = 9.229 cm
X_FlocBaffles = [
    0.959625, 3.4882, 0.188086;
    1.0237, 3.38892, 0.365172;
    1.08778, 3.28964, 0.542258;
    1.15186, 3.19036, 0.719344;
    1.21594, 3.09108, 0.896429;
    1.28002, 2.9918, 1.07352;
    1.3441, 2.89252, 1.2506;
    1.40818, 2.79324, 1.42769;
    1.47226, 2.69396, 1.60477;
    1.53634, 2.59467, 1.78186
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] m
HW_FlocStart = 2.49229 m
L_FlocBaffles = [
    2.33992, 2.30472, 2.22691;
    2.43992, 2.40472, 2.32691;
    2.33992, 2.30472, 2.22691;
    2.43992, 2.40472, 2.32691;
    2.33992, 2.30472, 2.22691;
    2.43992, 2.40472, 2.32691;
    2.33992, 2.30472, 2.22691;
    2.43992, 2.40472, 2.32691;
    2.33992, 2.30472, 2.22691;
    2.43992, 2.40472, 2.32691
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] m
W_FlocPort = 0.173086 m
H_FlocPort = 0.809625 m
N_FlocBaffles = 77
Z_FlocBaffles = [
    0, 0, 0;
    0.060079, 0.0952806, 0.173086;
    0, 0, 0;
    0.060079, 0.0952806, 0.173086;
    0, 0, 0;
    0.060079, 0.0952806, 0.173086;
    0, 0, 0;
    0.060079, 0.0952806, 0.173086;
    0, 0, 0;
    0.060079, 0.0952806, 0.173086
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] m
Gt_FlocMinFlow = 8340.86
N_FlocChannels = 3
# Entrance Tank:
# [reference: EntranceTank.xmcd]
ND_Lfom = 6 in
HL_Rm = 0.911511 cm
N_Lfom = 1
D_LfomOrifices = 19.05 mm
Q_LfomErrorMax = 1.3255 %
N_LfomOrifices = [5; 4; 2; 2; 2; 2; 1; 2; 1; 1]
L_Et = 1.5 m
W_Et = 0.75 m
HW_EtMin = 0.2 m
HW_EtMax = 0.4 m
H_Et = 2.89229 m
ZW_Et = 2.79229 m
# Any additional needed elevations should be calculated in the files above.
# Elevations:
ZW_ExitChannel = 2.36 m  # Water Level at the end of the plant in the exit channel and exit channel box
HW_Sed = 2.4 m
HW_FlocStart = 2.49229 m  # Water level at the beginning of the floc tank
HL_Floc = 9.229 cm  # just for ref. the head loss throught the floc tank
ZW_Et = 2.79229 m  # the height of the water in the entrance tank.
# AutoCAD References
# [reference: basics.xmcd]
# [reference: pipe.xmcd]
# [reference: tank.xmcd]
# [reference: lamina.xmcd]
# [reference: laminaplain.xmcd]
# [reference: cross.xmcd]
# [reference: Tee.xmcd]
# [reference: elbow.xmcd]
# [reference: Sludge.xmcd]
# [reference: Channel.xmcd]
# [reference: Manifold.xmcd]
# [reference: SedTankslopes.xmcd]
# [reference: Sed Tank Inlet Slope.xmcd]
# [reference: chemicalstock.xmcd]
# [reference: Sedimentation Tank.xmcd]
# [component: inputs SedTank]
# [reference: Flocculation Tank.xmcd]
# [component: inputs FlocTank]
# [reference: Entrance Tank.xmcd]
# [component: inputs EntranceTank]
