# AguaClara Water Treatment Plants
# Automated Design
# User Inputs:
HW_Sed := 2.9 m
# Design References
# [reference: PipeDatabase.xmcd]
# [reference: UserInputs- Gracias.xmcd]
# [reference: DesignAssumptions- Gracias.xmcd]
# [reference: MathFunctions.xmcd]
# [reference: MinorLossCoefficients.xmcd]
# [reference: FluidsFunctions.xmcd]
# Sedimentation Tanks:
# [reference: Sedimentation - Gracias.xmcd]
N_SlopePairs = 2
N_SedTanks = 8
H_SedBetween = 0.060325 m
HW_Sed = 2.9 m
H_Sed = 3 m
L_Sed = 3.60682 m
# Sedimentation Tank Sludge Drain:
# [reference: SludgeDrain.xmcd]
N_SedSludgeOrifices = 36
ND_SedSludge = 4 in
Q_SludgeDrainInitial = 1505.51 L/min
D_SedSludgeOrifice = 0.25 in
# Height Dimensions within Sedtank
H_SedBelowSlope := .5*W_Sed/N_SlopePairs*tan(AN_SedTopInlet) + T_SedInletSlope/cos(AN_SedTopInlet) + outerdiameter(ND_SedSludge) = 1.14917 m
# This depth of the sloped bottom
H_SedBelow := H_SedBelowSlope + H_SedBetween = 1.2095 m  # the entire area under the lamella will be a part of the sloped bottom
# Inlet Channel:
# [reference: Inlet Channel.xmcd]
W_InletChannel = 0.364386 m
L_Channel = 18.472 m
ND_SedPipeEntrance = 8 in
N_SedInletPipes = 4
H_InletChannel = 1.70083 m
AN_SedTopInlet := 65 deg
Q_Plant = 800 gal/min
AN_SedBottom := 30 deg
G_FlocMin := 20/s
# Sedimentation Tank Inlet Slopes:
# [reference: Sed. Inlet Slopes- minV.xmcd]
B_SedInlet = 1.90124 cm
L_SedTopInlet = 1.27716 m
H_SedInlet = 3.31472 cm
H_SedTopSlope = 1.1575 m
A_Inlet = 0.119556 m^2
L_SedBottom = 0.62325 m
A_SedInlet = 0.239112 m^2
H_SedBottomSlope = 0.311625 m
AN_SedTopInlet = 65 deg
AN_SedTopInlet = 65 deg
AN_SedBottom = 30 deg
AN_SedBottom = 30 deg
A_SedInletTotal = 0.22828 m^2
A_SedInletActual = 0.228059 m^2
# Note: A.SedInlet should be approx. the same as A.SedInletTotal
Z_SedSlopes = 1.39011 m
L_SedTopInlet = 1.27716 m
# Sedimentation Tank Effluent Launder:
# [reference: Launder.xmcd]
N_SedLaunderOrifices = 54
Q_SedLaunderOrifices = 1.75251 L/min
# Exit Channel:
# [reference: Exit Channel.xmcd]
W_ExitChannel = 0.364386 m
ND_SedLaunder = 3 in
H_ExitChannel = 1.70083 m
L_SedLaunder = 2.72805 m
L_ExitChannel = 18.472 m
D_SedLaunderOrifice = 0.4375 in
H_PltWeir = 1.46586 m
Z_SedLaunder = 2.81555 m
HW_ExitChannel = 1.56083 m
ZW_ExitChannel = 2.86 m
# Lamella:
# [reference: Lamella.xmcd]
H_SedPlate = 1.32067 m
H_SedAbove = 0.1289 m
L_SedPlate = 1.52498 m
B_SedPlate = 5.09313 cm
S_SedPlate = 4.79313 cm
N_SedPlates = 32
AN_SedPlate = 60 deg
V_SedC = 10.0229 m/day
V_SedUp = 70 m/day
# Flow Controller:
# [reference: FCM.xmcd]
N_Fcm = 6
ID_FcmTube = 4.318 mm
ID_FcmTube = 0.17 in
L_FcmTube = 255.151 cm
Q_FcmTubeMax = 378.541 mL/min
HL_FcmValve = 26.6223 cm
# Flocculator:
# [reference: Flocculation.xmcd]
W_FlocChannel = 1.0795 m
S_FlocBaffle = [0.229659; 0.274731; 0.364221; 0.661641] m
B_FlocBaffle = [0.233659; 0.278731; 0.368221; 0.665641] m
N_FlocBafflesMin = 27
HL_Floc = 8.66159 cm
Z_FlocBaffles = [
    0, 0, 0, 0;
    0.229659, 0.274731, 0.364221, 0.661641;
    0, 0, 0, 0;
    0.229659, 0.274731, 0.661641, 0.661641;
    0, 0, 0, 0;
    0.229659, 0.364221, 0, 0;
    0, 0, 0, 0;
    0, 0.364221, 0, 0
] m
X_FlocBaffles = [
    1.2295, 2.93018, 0.676641, 2.93018;
    1.46316, 2.65145, 1.04486, 2.26454;
    1.69682, 2.37272, 1.41308, 1.5989;
    1.93048, 2.09399, 2.07872, 0.933261;
    2.16414, 1.81526, 2.74436, 0;
    2.39779, 1.44704, 0, 0;
    2.67653, 1.07882, 0, 0;
    0, 0.710594, 0, 0
] m
L_FlocBaffles = [
    2.67034, 2.62527, 2.53578, 2.23836;
    2.77034, 2.72527, 2.63578, 2.33836;
    2.67034, 2.62527, 2.53578, 2.23836;
    2.77034, 2.72527, 2.33836, 2.33836;
    2.67034, 2.62527, 2.23836, 0;
    2.77034, 2.63578, 0, 0;
    2.62527, 2.53578, 0, 0;
    0, 2.63578, 0, 0
] m
HW_FlocStart = 2.98662 m
W_FlocPort = 0.661641 m
H_FlocPort = 1.0795 m
N_FlocBaffles = 24
Gt_FlocMinFlow = 6355.82
N_FlocChannels = 4
# Entrance Tank:
# [reference: EntranceTank.xmcd]
ND_Lfom = 20 in
HL_Rm = 0.890191 cm
N_Lfom = 1
D_LfomOrifices = 52.3875 mm
Q_LfomErrorMax = 0.74575 %
N_LfomOrifices = [5; 4; 3; 2; 2; 2; 1; 2; 1; 1]
L_Et = 3 m
W_Et = 1.5 m
HW_EtMin = 0.2 m
HW_EtMax = 0.4 m
H_Et = 3.38662 m
ZW_Et = 3.28662 m
# Any additional needed elevations should be calculated in the files above.
# Elevations:
ZW_ExitChannel = 2.86 m  # Water Level at the end of the plant in the exit channel and exit channel box
HW_Sed = 2.9 m
HW_FlocStart = 2.98662 m  # Water level at the beginning of the floc tank
HL_Floc = 8.66159 cm  # just for ref. the head loss throught the floc tank
ZW_Et = 3.28662 m  # the height of the water in the entrance tank.
Z_Mp := (HW_Sed - HW_InletChannel)
# AutoCAD References
# [reference: basics.xmcd]
# [reference: pipe.xmcd]
# [reference: tank.xmcd]
# [reference: lamina.xmcd]
# [reference: cross.xmcd]
# [reference: Tee.xmcd]
# [reference: elbow.xmcd]
# [reference: Sludge.xmcd]
# [reference: Channel.xmcd]
# [reference: Manifold.xmcd]
# [reference: SedTankslopes.xmcd]
# [reference: Sed Tank Inlet Slope.xmcd]
# [reference: chemicalstock.xmcd]
# [reference: Sedimentation Tank.xmcd]
# [component: inputs SedTank]
# [reference: Flocculation Tank.xmcd]
# [component: inputs FlocTank]
# [reference: Entrance Tank.xmcd]
# [component: inputs EntranceTank]
