# AguaClara Water Treatment Plants -- Gracias
# Automated Design
# User Inputs:
HW_Sed := 2 m
# Design References
# [reference: UserInputs- Gracias.xmcd]
# [reference: DesignAssumptions- Gracias.xmcd]
# [reference: MathFunctions -Gracias.xmcd]
# [reference: PipeDatabase.xmcd]
# [reference: MinorLossCoefficients - Gracias.xmcd]
# [reference: FluidsFunctions - Gracias.xmcd]
# Sed Tanks and Slopes:
# [reference: Influent Sed Manifold - Gracias.xmcd]
N_SedTanks = 3
B_SedPort = 5.85864 cm
H_SedBetween = 0.0762 m
W_SedPort = 5.85864 cm
L_Sed = 9.52822 m
N_SedPorts = 45
.
N_SlopePairs = 2
L_SedPort = 6.76498 cm
W_Sed = 2.159 m
# Sedimentation Tank Sludge Drain:
# [reference: SludgeDrain-Gracias.xmcd]
N_SedSludge = 2
N_SedSludgeOrifices = 127
W_SedSludge = 0.0912073 m
Time_SludgeDrain = 43.2087 min
H_SedSludge = 5 cm
B_SedSludgeOrifices = 7.5 cm
T_SedSludge = 9.33013 cm
D_SedSludgeOrifice = 0.25 in
# Sedimentation Tank Dimensions:
# [reference: Sedimentation Dimensions - Gracias.xmcd]
Z_SedSludge = 14.3301 cm
H_SedBottomSlope = 0.0831291 m
H_SedTopSlope = 0.773272 m
Z_SedSlopes = 1.01657 m
H_Sed = 2.1 m
W_Sed = 2.159 m
# Inlet Channel:
# [reference: Inlet Channel - Gracias.xmcd]
W_InletChannel = 63.4364 cm
L_Channel = 6.927 m
ND_SedPipeEntrance = 20 in
N_SedInletPipes = 2
H_InletChannel = 0.857227 m
# Sedimentation Tank Effluent Launder:
# [reference: Launder - Gracias.xmcd]
N_SedLaunderOrifices = 162
Q_SedLaunderOrifices = 3.08642 L/min
# Exit Channel:
# [reference: Exit Channel - Gracias.xmcd]
W_ExitChannel = 0.634364 m
ND_SedLaunder = 8 in
H_ExitChannel = 0.857227 m
L_SedLaunder = 8.10949 m
L_ExitChannel = 6.927 m
D_SedLaunderOrifice = 0.4375 in
H_PltWeir = 0.622851 m
Z_SedLaunder = 1.85046 m
HW_ExitChannel = 0.717227 m
ZW_ExitChannel = 1.96 m
# Lamella:
# [reference: Lamella - Gracias.xmcd]
L_SedPlate = 0.748421 m
B_SedPlate = 4.12004 cm
S_SedPlate = 3.82004 cm
N_SedPlates = 161
AN_SedPlate = 60 deg
V_SedC = 10.0077 m/day
V_SedUp = 70 m/day
H_SedPlate = 0.648152 m
H_SedAbove = 0.259075 m
# Sedimentation Tank Floc Hopper:
# [reference: Floc Hopper - Gracias.xmcd]
A_FlocHopper = 0.98496 m^2
L_FlocHopper = 0.912422 m
L_FlocHopperOffset = 0.374211 m
# Flow Controller:
# [reference: FCM - Gracias.xmcd]
N_Fcm = 1
ID_FcmTube = 3.175 mm
ID_FcmTube = 0.125 in
L_FcmTube = 99.0625 cm
Q_FcmTubeMax = 285 mL/min
HL_FcmValve = 15.0907 cm
# Flocculator:
Pi_Epsilon := 0.84
W_FlocChannelMin := 45 cm
Pi_FlocCP := 110 m^(2/3)
# [reference: Flocculation - Gracias -Energy Dissapation5.xmcd]
W_FlocChannel =  # error: This variable is undefined.
L_Sed = 9.52822 m
ED_Floc = [6.4; 1.6; 0.4] mW/kg
# Check the residence time of the flocculator should be at least 20minutes
S_FlocBaffle =  # error
B_FlocBaffle =  # error
HW_FlocEnd =  # error
X_FlocBaffles =  # error
L_FlocBaffles =  # error
N_FlocChannels =  # error
L_FlocTankEst =  # error
N_FlocBaffleSection =  # error
HL_Floc =  # error
HW_FlocStart =  # error
Z_FlocBaffles =  # error
W_FlocPort =  # error
H_FlocPort =  # error
# Entrance Tank:
C_d := 0.62
# [reference: EntranceTankDim- Gracias.xmcd]
L_Et = 9.52822 m
W_Et =  # error
HW_EtMin = 0.2 m
HW_EtMax = 0.4 m
H_Et =  # error
ZW_Et =  # error
# Any additional needed elevations should be calculated in the files above.
# Elevations:
ZW_ExitChannel = 1.96 m  # Water Level at the end of the plant in the exit channel and exit channel box
HW_Sed = 2 m
HW_FlocStart =  # error  # Water level at the beginning of the floc tank
HL_Floc =  # error  # just for ref. the head loss throught the floc tank
ZW_Et =  # error  # the height of the water in the entrance tank.
# AutoCAD References
# [reference: basics.xmcd]
# [reference: pipe.xmcd]
# [reference: tank.xmcd]
# [reference: lamina.xmcd]
# [reference: laminaplain.xmcd]
# [reference: cross.xmcd]
# [reference: Tee.xmcd]
# [reference: elbow.xmcd]
# [reference: Sludge.xmcd]
# [reference: Channel.xmcd]
# [reference: Manifold.xmcd]
# [reference: SedTankslopes.xmcd]
# [reference: inletslope.xmcd]
# [reference: inletslopetrapezoid.xmcd]
# [reference: chemicalstock.xmcd]
# [reference: Sedimentation Tank.xmcd]
# [component: inputs SedTank]
# [reference: Flocculation Tank.xmcd]
# [component: inputs FlocTank]
# [reference: Entrance Tank.xmcd]
# [component: inputs EntranceTank]
