# AguaClara Water Treatment Plants
# Automated Design
# User Inputs:
# Design References
# [reference: UserInputs-sestest.xmcd]
# [reference: DesignAssumptions-sestest.xmcd]
# [reference: MathFunctions.xmcd]
# [reference: PipeDatabase.xmcd]
# [reference: MinorLossCoefficients.xmcd]
# [reference: FluidsFunctions.xmcd]
# Inlet Channel:
# [reference: Inlet Channel.xmcd]
W_Channel = 0.226807 m
L_Channel = 3.45 m
ND_SedPipeEntrance = 8 in
# Sedimentation Tanks:
# [reference: Sedimentation.xmcd]
H_SedBelowSlope = 0.6 m
H_SedBelowStraight = 0 m
H_SedAbove = 0.12 m
H_SedPlate = 0.48 m
HW_Sed = 1.2 m
H_Sed = 1.3 m
Z_Mp = 0.6 m
L_Sed = 2.8472 m
L_SedPlate = 0.554256 m
N_SedPlates = 60
AN_SedPlate = 60 deg
V_SedC = 9.82381 m/day
V_SedUp = 64.063 m/day
# Sedimentation Tank Inlet Slopes:
# [reference: Sed. Inlet Slopes.xmcd]
B_SedInlet = 2.37557 cm
AN_SedTopInlet = 50.1944 deg
AN_SedBottom = 10 deg
A_SedInlet = 1279.59 cm^2
A_SedInletMin = 35.3112 cm^2
H_SedTopInlet = 0.6 m
H_SedBottom = 0.0881635 m
# Exit Channel:
# [reference: Exit Channel.xmcd]
W_ExitChannel = 0.226807 m
H_ExitChannel = 0.55 m
L_ExitChannel = 3.45 m
# Flow Controller:
# [reference: FCM.xmcd]
N_Fcm = 1
ID_FcmTube = 3.175 mm
ID_FcmTube = 0.125 in
L_FcmTube = 99.0625 cm
Q_FcmTubeMax = 285 mL/min
HL_FcmValve = 15.0907 cm
# Flocculator:
# [reference: Flocculation.xmcd]
W_FlocChannel = 0.5 m
S_FlocBaffle = [0.0671254; 0.0862399; 0.143445; 0.351368] m
B_FlocBaffle = [0.0871254; 0.10624; 0.163445; 0.371368] m
N_FlocBafflesMin = 73
HL_Floc = 18.2678 cm
X_FlocBaffles = [
    0.2286, 2.48083;
    0.315725, 2.37459;
    0.402851, 2.26835;
    0.489976, 2.16211;
    0.577102, 2.05587;
    0.664227, 1.94963;
    0.751352, 1.84339;
    0.838478, 1.73715;
    0.925603, 1.63091;
    1.01273, 1.52467;
    1.09985, 1.41843;
    1.18698, 1.25499;
    1.2741, 1.09154;
    1.36123, 0.928096;
    1.44836, 0.764651;
    1.53548, 0.601205;
    1.62261, 0.43776;
    1.70973, 0.274315;
    1.81597, 0;
    1.92221, 0;
    2.02845, 0;
    2.13469, 0;
    2.24093, 0;
    2.34717, 0;
    2.45341, 0
] m
HW_FlocStart = 1.38268 m
W_FlocPort = 0.351368 m
L_FlocBaffles = [
    1.13287, 1.11376;
    1.41555, 1.39644;
    1.13287, 1.11376;
    1.41555, 1.39644;
    1.13287, 1.11376;
    1.41555, 1.39644;
    1.13287, 1.11376;
    1.41555, 1.39644;
    1.13287, 1.11376;
    1.41555, 1.39644;
    1.13287, 1.11376;
    1.41555, 1.33923;
    1.13287, 1.05655;
    1.41555, 1.33923;
    1.13287, 1.05655;
    1.41555, 1.33923;
    1.13287, 1.05655;
    1.41555, 1.33923;
    1.11376, 0;
    1.39644, 0;
    1.11376, 0;
    1.39644, 0;
    1.11376, 0;
    1.39644, 0;
    1.11376, 0
] m
H_FlocPort = 0.5 m
N_FlocBaffles = 43
Z_FlocBaffles = [
    0, 0;
    0.0671254, 0.0862399;
    0, 0;
    0.0671254, 0.0862399;
    0, 0;
    0.0671254, 0.0862399;
    0, 0;
    0.0671254, 0.0862399;
    0, 0;
    0.0671254, 0.0862399;
    0, 0;
    0.0671254, 0.143445;
    0, 0;
    0.0671254, 0.143445;
    0, 0;
    0.0671254, 0.143445;
    0, 0;
    0.0671254, 0.143445;
    0, 0;
    0.0862399, 0;
    0, 0;
    0.0862399, 0;
    0, 0;
    0.0862399, 0;
    0, 0
] m
Gt_FlocMinFlow = 5927.14
# Entrance Tank:
# [reference: EntranceTank.xmcd]
ND_Lfom = 6 in
HL_Rm = 4.20427 cm
N_Lfom = 1
D_LfomOrifices = 18 mm
Q_LfomErrorMax = 1.15498 %
N_LfomOrifices = [5; 5; 3; 2; 2; 2; 1; 2; 2; 0]
L_Et = 1.04775 m
W_Et = 1.04775 m
HW_Et = 1.31947 m
H_Et = 1.41947 m
# Sedimentation Tank Effluent Launder:
# [reference: Launder.xmcd]
N_SedLaunderOrifices = 10
Q_SedLaunderOrifices = 12.6667 L/min
Z_SedLaunder = 1.14 m
ND_SedLaunder = 4 in
D_SedLaunderOrifice = 18 mm
# Plant Leveling Tank:
# [reference: PlantLevelTank.xmcd]
HW_Plt = 0.5 m
ND_PltWeir = 0.1524 m
H_PltWeir = 0.462215 m
H_Plt = 0.7 m
W_Plt = 0.2564 m
# Sedimentation Tank Sludge Drain:
# [reference: SludgeDrain.xmcd]
N_SedSludgeOrifices = 28
ND_SedSludge = 2 in
Q_SludgeDrainInitial = 227.776 L/min
D_SedSludgeOrifice = 6 mm
# Any additional needed elevations should be calculated in the files above.
# AutoCAD References
L_ChannelInlet := .5*W_Sed
W_ChannelInlet := .65*W_Channel
sedlayout := 3
H_Channel := .3 m
W_EChannel := W_Channel
L_Floc := L_Sed*N_FlocChannels
H_EChannel := H_Channel
T_EChannelWall := T_ChannelWall
H_Floc := H_Sed
baffle_amp := .5 in
baffle_thick := 4 mm
baffle_slope := 90 deg
baffle_width := W_FlocChannel
baffle_col := 1  # this is a constant!
baffle_periods := 8.5
baffle_y := 7 cm
baffle_num := 1
baffle_x := 4 in
# [reference: basics.xmcd]
# [reference: pipe.xmcd]
# [reference: tank.xmcd]
# [reference: lamina.xmcd]
# [reference: cross.xmcd]
# [reference: Tee.xmcd]
# [reference: elbow.xmcd]
# [reference: Sludge.xmcd]
# [reference: Channel.xmcd]
# [reference: Manifold.xmcd]
# [reference: SedTankslopes.xmcd]
# [reference: SedTank.xmcd]
# [component: inputs SedTank]
# [reference: floctank.xmcd]
# [component: inputs FlocTank]
# [reference: EntranceTank.xmcd]
# [reference: chemicalstock.xmcd]
# [reference: platform.xmcd]
# [reference: PlantLevelTank.xmcd]
