# [reference: UserInputs- 1m deep.xmcd]
# [reference: DesignAssumptions-1m deep.xmcd]
# [reference: MathFunctions.xmcd]
# [reference: PipeDatabase.xmcd]
# [reference: MinorLossCoefficients.xmcd]
# [reference: FluidsFunctions.xmcd]
# [reference: Inlet Channel.xmcd]
# Sedimentation  Tank Design:
W_InletChannel = 0.36385 m
# This program produces the critical parameters for a single sed tank. All sed tanks are built identically.
# Each tank should have the same flowrate. The total space below the tank is 1 m (design assumption). Part of this space will have sloped walls (to help with draining) and part might have
# straight walls. The length of the sloped walls is determined by the tank width and the
# slope of the walls (they should be between 45 and 60 deg). The space between the top
# of the plate settlers and the water surface is equal to .25*spacing between adjacent launders.
# Since each tank has 1 launderer, the space between adjacent ones is equal to the tank width.
# This should ensure equal flow of effluent through these pipes. The depth of the middle section of
# the tank is determined by the length and slope of the plate settlers. The total depth of the tank is
# equal to the sum of these three depths, plus a freeboard depth. Freeboard space is empty space between the top of the tank and the water surface
Q_Sed := Q_Plant/N_SedTanks = 190 L/min
H_SedBelowSlope := Pi_BottomHWSed*HW_Sed = 0.6 m  # This depth of the sloped bottom
# the entire area under the lamella will be a part of the sloped bottom
H_SedBelow := H_SedBelowSlope = 0.6 m
# The distance between the lamella and the top of the slope they are set to meet.
H_SedBelowStraight := (H_SedBelow - H_SedBelowSlope) = 0 m
H_SedAbove := outerdiameter(ND_SedLaunderEst) + HL_Lfom = 0.2889 m
H_SedPlate := HW_Sed - H_SedBelowSlope - H_SedAbove = 0.3111 m
HW_Sed = 1.2 m  # Height of the water in the Sed tank.
H_Sed := (HW_Sed + H_PlantFreeboard) = 1.3 m
Z_Mp := (HW_Sed - HW_InletChannel)
# The specifics of the lamella:
L_SedPlate := H_SedPlate/sin(AN_SedPlate) = 0.359227 m  # This is the length of the lamella
# We need to make sure that both design constraints are met.
# VSedUp is based on the entire area in the bottom of the sed tank
# VSedC is based on the plate settlers.
# Calculate the inactive Length of the tank
# The critical velocity is calculated and verfied against a max value. If the critical
# velocity is too large, some of the particles will not settle out in the sed tank.
# Note: the 0 in this function manifold function is assuming that there are no minor losses in the system
# and thus the minor loss coefficient is 0.
L_Sed := Q_Sed/(V_SedUpBod*W_Sed) = 3.66383 m
