# AguaClara Design Tool
Q_Plant := □  # error: This placeholder is empty.
Mod := 0
method := "EtFlocSedFi"
## References
# MathCAD dimension calculations:
# [reference: ExpertInputs.xmcd]
# [reference: MathFunctions.xmcd]
# [reference: PipeDatabase.xmcd]
# [reference: MaterialsDatabase.xmcd]
# [reference: FluidsFunctions.xmcd]
# [reference: SedTankFunctions.xmcd]
# [reference: CdcFunctions.xmcd]
# [reference: LfomFunctions.xmcd]
# [reference: SedimentationTankpc479.xmcd]
# [reference: Flocculator.xmcd]
# [reference: LFOM.xmcd]
# [reference: EntranceTank.xmcd]
# [reference: StackedRapidSandFilter.xmcd]
# [reference: LinearCdc.xmcd]
# [reference: ChemStorageTanks.xmcd]
# AutoCAD drawing programs:
# Translators:
# These are the codes that take MathCAD outputs and create AutoCAD scripts that are used to draw the plant (formerly Basics)
# [reference: MtoATranslators.xmcd]
# The wrapped MtoA translator contains the functions that the user will want to access. These functions will draw pieces with full functionality - specifying the location, dimension, and orientation of the object. Also, it contains layer control and subtraction capabilities for grouped objects.
# [reference: MtoATranslatorsWrapped.xmcd]
# Drawing functions:
# [reference: ChannelF.xmcd]
# [reference: PlumbingF.xmcd]
# [reference: TankF.xmcd]
# [reference: StairsF.xmcd]
# [reference: DrainChannelF.xmcd]
# AutoCAD Script Files:
# [reference: FlocculatorAC.xmcd]
# [reference: SedimentationTankACtg335.xmcd]
# [reference: EntranceTankAC.xmcd]
# [reference: ChemStockTanksAC.xmcd]
# [reference: StackedRapidSandFilterAC.xmcd]
# [reference: CdcAC.xmcd]
# [reference: OperatorAccessAC.xmcd]
# [reference: MaterialsAC.xmcd]
# Materials List:
# [reference: MaterialsList.xmcd]
# Layouts:
# This file will execute at the very end to create multiple views of the entire plant in paperspace
# [reference: LayoutsAC.xmcd]
## All variables displayed must have the standard SI units. They may not have units attached by the user.
# General
Q_Plant = 0.01 m^3/s
Pi_VenaContractaOrifice = 0.63
T_PlantWall = 0.15 m
W_SedPlate = 1.0668 m
T_ConcreteMin = 0.05 m
L_SedPlateSheet = 3 m
C_CoagStock = 200 kg/m^3
T_SedPlate = 0.002 m
Ti_CoagStock = 108000 s
T_SedWeir = 0.04 m
C_ChlorineStock = 15 kg/m^3
W_SedBay = 1.0668 m
Ti_ChlorineStock = 108000 s
HL_ChannelMax = 0.05 m  # Eliminate FCM variable from design specs
H_PlantFreeboard = 0.1 m
EN_DrillSeries = 0
W_HumanMin = 0.45 m
W_ChannelMin = 0.15 m
# Entrance Tank
# Tank
HW_Et = 0.631453 m
HW_EtMax = 1.5 m
H_Et = 0.731453 m
Z_EtTop = 2.32792 m
L_Et = 2.63061 m
Z_Et = 1.59646 m
ZW_Et = 2.22792 m
W_Et = 1.18019 m
H_EtTop = 0.3 m  # height of the top part of the entrance tank above the hoppers
# Hoppers
H_EtHopperBack = 0.431453 m
N_EtFullHopper = 1
H_EtHopper = 0.431453 m
Z_EtHopper = 2.02792 m  # elevation of top of slab.
T_EtHopperLedge = 0.15 m
L_EtHopper = 1.06451 m
AN_EtSlope = 0.785398
# Rapid Mix
# Drain Channel
ED_Tee =  # error: This variable is undefined.
ND_RMPipe = 0.1524 m
W_EtDC = 0.380188 m  # drain channel under entrance tank dimensions
# Drains
L_EtDC = 2.34646 m
ND_EtDrain = 0.0762 m
H_EtDC = 0.18415 m  # Give heights of the channel at the beginning and end and change the design specs to explain that it's sloped.
L_EtDrainStopper = 0.727453 m
# Flow measurement
ND_LfomPipe = 0.1524 m
HL_Flowmeasure = 0.2 m
Z_LfomOrifices = 2.03744 m  # elevation of the center of
HL_Lfom = 0.2 m
D_LfomOrifices = 0.01905 m
B_LfomRows = 0.02 m
N_LfomOrifices = [13; 3; 3; 4; 2; 3; 2; 2; 2; 2]
H_LfomOrifices = [0.009525; 0.029525; 0.049525; 0.069525; 0.089525; 0.109525; 0.129525; 0.149525; 0.169525; 0.189525] m
# Trash Rack
B_EtRebar = 0.025381 m
# Flow Control Valve | Other Parameters
# Overflow Weir
ND_EtFlowControl = 0.0762 m
V_EtUp = 0.00424179 m/s
W_EtOverflowSlot = 0.0630022 m
Ti_Et = 211.095 s
ND_EtOverflowDrain = 0.1016 m
H_EtOverflowCutaway = 0.0105004 m
L_EtOverflowWeir = 1.26611 m
W_PlantDC = 1 m
# Maybe give the vertical distances below the bottom of the sed tank of the beginning and end of the channel? Calculate them, display, and add to the design specs.
H_PlantDC = 0.190271 m
L_PlantDC = 7.45059 m
H_HumanAccess = 1.5 m
# Plant Drain Channel
# Coag Dose Controller
# Coagulant | Chlorine
Z_CoagTank = 2.59562 m
C_CoagStockMax = 200 kg/m^3
C_ChlorineStockMax = 15 kg/m^3
Z_CoagTankOutlet = 2.69562 m
C_CoagDoseMax = 0.08 kg/m^3
C_ChlorineDoseMax = 0.002 kg/m^3
L_CdcFloatArm = 0.41275 m
N_CdcCoagTubes = 2
N_CdcChlorineTubes = 1
L_CdcScaleArm = 0.50165 m
L_CdcCoagTube = 1.53584 m
L_CdcChlorineTube = 1.78136 m
B_StockOutlet = 0.1 m
HL_CdcCoag = 0.2 m
HL_CdcChlorine = 0.1 m
Ti_CoagStock = 108000 s
Vol_CoagTank = 450 L
Vol_ChlorineTank = 208.198 L
H_CoagTankAboveHeadTank = 0.3 m
D_CdcCoag = 0.003175 m
K_CdcTube = 2
D_CdcChlorine = 0.003175 m
ND_EtFloat = 0.2032 m
Q_CoagStock = 4e-6 m^3/s
Q_ChlorineStock = 1.33333e-6 m^3/s
ND_CoagPiping = 0.0127 m
# Flocculator
# Tank
EN_FlocType :=
    "horizontal" if EN_FlocHoriz == 1
    "vertical" otherwise
EN_FlocType = "vertical"
H_Floc = 1.9216 m
HW_FlocEnd = 1.67752 m
HW_FlocStart = 1.8216 m
Z_FlocTank = 0 m
L_Floc = 4.30783 m
H_FlocPort = [0.890759; 0.890759] m
W_FlocChannel = 0.51 m
N_FlocChannels = 2
# Drains
ND_FlocValve = 0.0508 m
N_FlocValves = 1
H_FlocSlope = 0.0301625 m
Ti_FlocDrain = 1800 s
# Parameters
ED_Floc = 0.01 m^2/s^3
CP_Floc = 75 m^(2/3)
Ti_Floc =  # error
G_Floc =  # error  # Look at Flocculator Positioning arrays
V_Floc = 0.138414 m/s
# Fill last channel with bafffles from last channel
ED_FlocMax =  # error  # Fix port width to be based on energy dissipation in that channel
# Adjust spacing after the number of baffles per channel is known.
ED_FlocAve =  # error
# Check the residence time of the flocculator should be at least 20minutes
HL_Floc = 0.144079 m
K_FlocBaffle = 2.5
CP_Floc = 75 m^(2/3)
# Baffles
S_FlocBaffle = [0.141661; 0.141661] m
B_FlocBaffle = [0.143661; 0.143661] m
N_FlocChannelBaffles = [29; 26]
W_FlocPort = [0.121661; 0.28415] m
L_FlocBaffleLower = 1.46503 m
L_FlocBaffleUpper = 1.65911 m
T_FlocBaffle = 0.002 m
S_FlocBaffleFirst = 0.141661 m
EN_FlocBaffle = 1
Z_FlocBaffles = [
    0, 0.212492;
    0.212492, 0;
    0, 0.212492;
    0.212492, 0;
    0, 0.212492;
    0.212492, 0;
    0, 0.212492;
    0.212492, 0;
    0, 0.212492;
    0.212492, 0;
    0, 0.212492;
    0.212492, 0;
    0, 0.212492;
    0.212492, 0;
    0, 0.212492;
    0.212492, 0;
    0, 0.212492;
    0.212492, 0;
    0, 0.212492;
    0.212492, 0;
    0, 0.212492;
    0.212492, 0;
    0, 0.212492;
    0.212492, 0;
    0, 0.212492;
    0.212492, 0;
    0, 0;
    0.212492, 0;
    0, 0
] m
# Modules
ND_FlocModulesMain = 0.0127 m
ND_FlocModulesLarge = 0.0381 m
L_FlocModuleLong = [0.4303; 0.4303] m
L_FlocModuleShort = [0.138438; 0.142978] m
ND_SpacerPipe = 0.01905 m
L_FlocModuleLongOuter = [0.286639; 0.286639] m
# Sed Tanks
# Tanks
N_SedTanks = 3
Q_SedBay = 0.00333333 m^3/s
W_Sed = 1.0668 m  # Total tank wall height
HW_Sed = 1.67752 m
L_Sed = 4.30783 m
L_Sed = 4.30783 m  # Total tank length
N_SedBays = 1
H_Sed = 1.77752 m
W_SedSideSlopes = 0.511175 m
L_SedActive = 3.24009 m
AN_SedSlope = 0.872665
# Floc Hopper
AN_SedHopperSlope = 0.785398
# Parameters
V_SedUpBod = 0.001 m/s  # design constraints
V_SedCBod = 0.00012 m/s
V_SedUp = 0.000975318 m/s  # Actual values from this design
Ti_Sed = 1775.73 s
# sludge drain
N_SedSludgeOrifices = 30  # per cell
Ti_SludgeDrain = 1800 s  # Tank Drain time
W_SedSludge = 0.0572326 m  # Width of the sludge channel
H_SedSludge = 0.0572326 m  # Depth of the sludge channel
# Distance center to center between drain orifices
B_SedSludgeOrifices = 0.106589 m
W_SedDrainCover = 0.0972326 m
D_SedSludgeOrifice = 0.00981812 m  # Diameter of drain orifices
N_SedSludgeOrifices = 30
ND_SedSludgePipe = 0.0762 m
Z_SedSludge = 0.0572326 m  # Height from 0 of the top of the sludge drain
Z_SedSideSlopes = 0.760877 m
# inlet channel | exit channel
W_SedExitChannel = 0.34 m
HW_SedInletChannel = 0.231899 m
H_SedExitChannel = 0.331899 m
W_SedInletChannel = 0.47415 m
EN_InletChannelGeom = 1
HW_SedExitChannel = 0.191899 m
# water height in exit channel from base of channel
L_SedChannel = 3.5004 m
H_SedWeirExit = 0.178587 m
H_SedInletChannel = 0.331899 m
Z_SedChannelBottom = 1.44562 m
W_SedInletChannelPreWeir = 0.28415 m
HL_SedWeirInlet = 0.0133119 m
H_SedWeirInlet = 0.218587 m
W_SedWeirInlet = 3.5004 m
# launder
N_SedLaunderOrifices = 30  # Number of orifices per launder
ND_SedLaunder = 0.1016 m
D_SedLaunderOrifice = 0.015875 m
Z_SedLaunder = 1.55992 m
L_SedLaunder = 3.20841 m
Q_SedLaunderOrifices = 0.000111111 m^3/s
HL_SedLaunderOrifice = 0.0404807 m
B_SedLaunderOrifices = 0.1 m  # Center to center launder spacing
# inlet manifold
ND_SedManifold = 0.1524 m
L_SedManifoldDiffuser = 0.0575364 m
Z_SedManifoldPipe = 0.286473 m
ND_SedDiffuser = 0.0254 m
D_SedManifoldPort = 0.0238125 m
B_SedManifoldPort = 0.05 m
N_SedManifoldPorts = 62
L_SedManifoldPipe = 3.92922 m
ED_SedInlet = 0.03 m^2/s^3
Q_SedManifoldPort = 5.37634e-5 m^3/s
# plate settlers
S_SedPlateMin = 0.025 m
L_SedPlate = 0.5 m
B_SedPlate = 0.027 m  # center to center distance between lamella
S_SedPlate = 0.025 m  # spacing between lamella
N_SedPlates = 104  # Number of Sed Plates per Sedimentation Tank Bay.
N_SedModules = 13  # Number of modules per bay
N_SedModulePlates = 8  # Number of plates per module
AN_SedPlate = 1.0472
# SRSF
# tank
Porosity_Sand := ε_FiSand
T_FiWall = 0.25 m
N_FiLayer = 6
Q_Fi = 0.01 m^3/s
Z_FiBottom = -2.83956 m
HL_FiTerminal = 0.455621 m
H_FiLayer = 0.2 m
H_Fi = 4.47385 m
D_FiSand60 = 0.000825 m
HL_FiBwInitiation = 1.42842 m
Z_FiTop = 1.63429 m
V_FiLayer = 0.00183333 m/s
L_Fi = 0.982393 m
N_Fi = 1
HL_FiBwSS = 1.22842 m
Porosity_Sand = 0.4
W_Fi = 1.14446 m
H_FiBottomLayer = 0.2 m
V_FiBw = 0.011 m/s
H_FiSand = 1.24083 m
# sand drain
# trunk lines
Ti_FiSand = 551.65 s  # This is the time required to empty the filter of the sand.
ND_FiTrunk = 0.1016 m
ND_FiBwTrunk = 0.2032 m
ND_FiSandOutlet = 0.0508 m
# siphon
ND_FiSiphonAirValve = 0.01905 m
Z_FiSiphonCoupling = 0.731318 m
ND_FiSiphon = 0.1524 m
Z_FiSiphonInlet = -1.02648 m
B_FiSiphonManOrifices = 0.13304 m
N_FiSiphonManOrifices = 6
D_FiSiphonManOrifices = 0.0508 m
# Waste and drain pipes
ND_FiExitWaste = 0.0762 m
# branches
N_FiSlotRows = 2
B_FiManifoldBranch = 0.1 m
ND_FiManBranch = 0.0254 m
ND_FiBwManBranch = 0.0381 m
B_FiManSlot = 0.0047625 m
B_FiBwManSlot = 0.0047625 m
# Inlet Channel
HL_FiInletChannel = 0.000671795 m
L_FiInletChannel = 0.87995 m
Z_FiEntranceWeir = 1.50087 m
# Entrance Box
Z_FiEntranceBottom = 0.523114 m  # bottom of the entrance box
# Exit Box
Z_FiExitBottom = 0.523114 m  # bottom of the filtered water box
L_FiExit = 0.45 m
L_SedLaunder = 3.20841 m
N_ValveCouplings = 3
N_SedPlatesTotal = 312
N_SedPlatesPerSheet = 6
N_SedPlateSheets = 52
N_Valves = 3
A_EtFloor = 4.33785 m^2
W_FlocWithWalls = 1.32 m
L_FlocWithWalls = 4.60783 m
Vol_FlocFloor = 1016.03 L
A_FlocFloor = 6.77351 m^2
A_SedFloor = 17.5116 m^2
# Materials List
# Plant Summary Calculations:
HL_PlantTotal := Z_EtTop - H_PlantFreeboard - Z_FiExitWeir
## Display AC variables
AC_EntranceTank =  # no stored result
AC_FlocTank =  # no stored result
AC_OperatorAccess = [
    "-layer m OpWalkwayCon"; "c t 132,132,132"; "OpWalkwayCon"; "  "; "_box 0.15,-0.15,1.24562 -10.08897,7.45059,1.44562"; "-group c OpWalkwayCon y "; "all "; "-layer s 0"; "  "; "-layer f OpWalkwayCon"
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]
AC_SedTank =  # no stored result
AC_ChemTanks =  # no stored result
AC_Filter =  # no stored result
AC_Cdc = [
    "-layer m CdcLayer"; "c t 0,0,0"; "CdcLayer"; "  "; "-layer m CdcAll"; "c t 214,214,214"; "CdcAll"; "  "; "_zoom w -4.49783,6.20584,2.30062 -4.40196,6.32597,2.41872"; "_box -4.45783,6.24787,2.34062 -4.44196,6.24584,2.37872"
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]  # AC_MatApply
AI_EtFlocSedFiSed = [
    "-group c * y "; "all "; "-layer s 0"; "  "; "-layer f *"; "  "; "-layer t *Sed*"; "  "; "-layer s *Sed*"; "  "
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]
AI_EtFlocSedFi = [
    "laythw"; "_-view o t"; "-plot y "; "PublishToWeb PNG.pc3"; "User 1 (824.00 x 583.00 Pixels)"; "l n e F"; ""; " ."; "y  [FILEPATH]EtFlocSedFi_t"; "n y"
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]
AI_EtFlocSedFiFloc = [
    "-group c * y "; "all "; "-layer s 0"; "  "; "-layer f *"; "  "; "-layer t *Floc*"; "  "; "-layer s *Floc*"; "  "
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]
AI_EtFlocSedFiFilter = [
    "-group c * y "; "all "; "-layer s 0"; "  "; "-layer f *"; "  "; "-layer t Fi*"; "  "; "-layer s Fi*"; "  "
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]
