# Code created by Heidi Rausch (her28@cornell.edu)
# Flocculator Modular Design
Mod := 1
method := "Flocculator"
# User Inputs | To be left undefined and inputed online by the user
Q_Plant := 20*L/s  # input with L/s
HL_FlocMax := 0.4 m
H_SedSlopesToFlocWeirMin := 0.25 m
T_FlocSlab := 0.15 m
T_SedWall := 0.15 m
T_SedDividingWall := 0.15 m
T_SedChannelWall := 0.15 m
T_FlocWall := 0.15 m
T_FlocDividingWall := 0.15 m
# From Expert Inputs
# [reference: ExpertInputs.xmcd]
# Mathcad to AutoCAD translators:
# [reference: MtoATranslators.xmcd]
# The wrapped MtoA translator contains the functions that the user will want to access. These functions will draw pieces with full functionality - specifying the location, dimension, and orientation of the object. Also, it contains layer control and subtraction capabilities for grouped objects.
# [reference: MtoATranslatorsWrapped.xmcd]
# Plant design calculations:
# [reference: ExpertInputs.xmcd]
# [reference: MathFunctions.xmcd]
# [reference: PipeDatabase.xmcd]
# [reference: MaterialsDatabase.xmcd]
# [reference: FluidsFunctions.xmcd]
# [reference: SedimentationTank.xmcd]
# [reference: LFOM.xmcd]
# [reference: FlocculatorEntranceTank.xmcd]
# AutoCAD drawing functions:
# [reference: ChannelF.xmcd]
# [reference: PlumbingF.xmcd]
# [reference: TankF.xmcd]
# [reference: StairsF.xmcd]
# [reference: DrainChannelF.xmcd]
# [reference: FlocculatorAC.xmcd]
# [reference: EntranceTankCompactAC.xmcd]
# [reference: MaterialsList.xmcd]
# Display Variables
# Flocculator variables displayed
# Parameters | Baffles
# Tank
S_FlocBaffle = 0.194817 m
HL_Floc = 0.435208 m
H_Floc = 2.03767 m
T_FlocBaffle = 0.002 m
HL_FlocMax = 0.4 m
L_Floc = 5.90251 m
B_FlocBaffle = 0.196817 m
CP_Floc = 77.7211 m^(2/3)
W_FlocChannel = 0.55 m
H_FlocBaffleLow = 1.30764 m
W_FlocChannelMaxPlate = 1.06 m
V_Floc = 0.186655 m/s
H_FlocBaffleHigh = 1.84285 m
W_FlocChannelMinPlate = 0.53 m
N_FlocChannels = 2
ED_FlocAve = 0.0108208 m^2/s^3
HW_FlocEnd = 1.50246 m
N_FlocChannelBaffles = 29
ED_FlocAveMinSettling = 0.005 m^2/s^3
T_FlocSlab = 0.15 m
N_FlocFirstChannelBaffles = 21
N_FlocLastChannelBaffles = 28
ED_FlocMax = 0.0216416 m^2/s^3
N_FlocBaffles = 49
H_FlocPort = 0.612923 m
Ti_Floc = 481.641 s
W_FlocPort = 0.174817 m
Ti_FlocActive = 404.61 s
# Obstacles
G_FlocAve = 104.023 1/s
ND_FlocObs = 0.1524 m
# Drains
GTheta_Floc = 42088.8
H_FlocObs = 0.751229 m
ND_FlocDrain = 0.0762 m
CP_FlocBod = 75 m^(2/3)
PS_FlocDrainStr = "SDR 26"
N_FlocSpaceExpansions = 2
Alpha_EpsilonFloc = 2
N_FlocExpansions = 98
Alpha_PsiFloc = 0.890899
CP_FlocExpansion = 0.793073 m^(2/3)
Pi_JetPlane = 0.225
Ti_FlocDrain = 900 s
PS_FlocObsStr = "SDR 41"
Pi_HSMin = 3
Pi_HSMax = 6
Pi_HSTransition = 4.94478
K_FlocBaffle = 2.5
Pi_VCBaffle = 0.387426
# Entrance tank variables displayed
# Rapid mix | Drains
# Tank
ND_EtDrain = 0.1016 m
ND_RMPipe = 0.254 m
H_Et = 2.45542 m
L_EtDrainStopper = 2.45701 m
L_Et = 1.47269 m
PS_RMPipeStr = "SDR 41"
W_Et = 0.55 m
ED_RapidMix = 3 m^2/s^3
H_EtApparent = 1.37325 m
AN_EtSlope1 = 0.872665
D_RMOrifice = 0.165954 m
AN_EtSlope2 = 0.38752
HL_RMOrifice = 0.109824 m  # Flow measurement
HL_RMPipe = 0.00793224 m
HL_Lfom = 0.2 m
# Parameters
L_FlocContact = 0.146664 m
D_LfomOrifices = 0.03175 m
V_EtCaptureBod = 0.008 m/s
H_FlocContact = 1.74561 m
B_LfomRows = 0.0333333 m
Ti_FlocContact = 7.04052 s
V_EtCapture = 0.00808168 m/s
# Sedimentation plates
N_LfomOrifices = [12; 3; 3; 3; 2; 3]
L_EtPlate = 0.5 m
N_EtPlates = 15
S_EtPlate = 0.025 m
AN_EtPlate = 0.872665
ND_EtMod = 0.0127 m
H_LfomOrifices = [0.015875; 0.0492083; 0.0825417; 0.115875; 0.149208; 0.182542] m
PS_EtModStr = "SDR 13.5"
ND_EtModSpacer = 0.01905 m
PS_EtModSpacerStr = "SDR 17"
N_LfomRows = 6
ND_EtPlateSupport = 0.0762 m
PS_EtPlateSupportStr = "SDR 26"
AC_EntranceTank = [
    "-layer m EtCon";
    "c t 132,132,132";
    "EtCon";
    "  ";
    "_-view o t _zoom w -4.90636,5.38,0.15 -6.06251,6.25,2.60542";
    "_box -5.06636,5.54,0.15 -5.90251,6.09,2.60542 _box -4.91636,5.39,0 -6.05251,6.24,2.60542";
    "_subtract -4.91636,5.39,0  -5.06636,5.54,0.15 ";
    "_-view o t _zoom w -4.26982,5.38,2.04561 -5.07636,6.25,2.60542";
    "_box -4.42982,5.54,2.04561 -4.91636,6.09,2.60542 _box -4.27982,5.39,1.89561 -5.06636,6.24,2.60542";
    "_subtract -4.27982,5.39,1.89561  -4.42982,5.54,2.04561 "
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]
AC_FlocTank =  # no stored result
# [component: inputs AC_FlocTank]
# [component: inputs AC_EntranceTank]
# Previews
# [reference: LayoutsAC.xmcd]
AI_FlocTank = [
    "laythw"; "_-view o t"; "-plot y "; "PublishToWeb PNG.pc3"; "VGA (640.00 x 480.00 Pixels)"; "l n e F"; ""; " ."; "y  [FILEPATH]Flocculator_t"; "n y"
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]
AI_Et = [
    "laythw"; "_-view o t"; "-plot y "; "PublishToWeb PNG.pc3"; "VGA (640.00 x 480.00 Pixels)"; "l n e F"; ""; " ."; "y  [FILEPATH]EntTank_t"; "n y"
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]
AI_Final = ["shademode x -view swiso"; "laythw"]
