# LFOM Modular Design
# User Inputs
Q_Plant := □  # error: This placeholder is empty.
# To be left undefined and inputed online by the user
HL_Lfom := □  # error: This placeholder is empty.
method := "LFOM"
# From Expert Inputs
Country := 0
Language := 0
EN_DrillSeries := 0
Π_Lfomorifice := 10  # Number of rows in lfom.  note: execution time of the lfom file exponentially increases with this number.
Π_LfomSafety := 1.5  # sefety coefficient for lfom pipe diameter
HL_Nlfom := 40 cm  # head loss through nonlinear orifice meter (simple orifice)
HL_CoagCdc := HL_Lfom
H_LfomSF := 5 cm
N_Lfom := 1
S_LfomOrificesMin := 5 mm  # Difference between the height of the water in floc tank and the bottom set of holes on the linear flow orifice meter
H_LfomFreefall := 5 cm
# Both of these assumptions were tested over a range of flow rates and found to give reasonable Lfom configurations.
Pi_Sutro := 0.1
Pi_Lfomorifice := 20
D_DrillEng :=
    i ← 0
    D_DrillEng[0] ← 1/32*in
    while D_DrillEng[i] ≤ 3/16*in - 1/128*in
        i ← i + 1
        D_DrillEng[i] ← D_DrillEng[i - 1] + 1/128*in
    while D_DrillEng[i] < 1 in - 1/16*in
        i ← i + 1
        D_DrillEng[i] ← D_DrillEng[i - 1] + 1/16*in
    while D_DrillEng[i] < 2 in
        i ← i + 1
        D_DrillEng[i] ← D_DrillEng[i - 1] + 1/4*in
    return D_DrillEng
D_DrillMet :=
    i ← 0
    D_DrillMet[0] ← 0.5 mm
    while D_DrillMet[i] ≤ 5 mm - 0.1 mm
        i ← i + 1
        D_DrillMet[i] ← D_DrillMet[i - 1] + 0.1 mm
    while D_DrillMet[i] < 20 mm
        i ← i + 1
        D_DrillMet[i] ← D_DrillMet[i - 1] + 1 mm
    while D_DrillMet[i] < 50 mm
        i ← i + 1
        D_DrillMet[i] ← D_DrillMet[i - 1] + 2 mm
    return D_DrillMet
D_Drill :=
    D_Drill ← D_DrillEng if EN_DrillSeries == 0
    D_Drill ← D_DrillMet otherwise
# Design References
# [reference: MathFunctions.xmcd]
# [reference: PipeDatabase.xmcd]
# [reference: FluidsFunctions.xmcd]
# [reference: LFOM.xmcd]
# [reference: MtoATranslators.xmcd]
# [reference: MtoATranslatorsWrapped.xmcd]
# [reference: PlumbingF.xmcd]
# LFOM Code
LFOM_Origin := [0 m; 0 m; 0 m]
# LFOM Pipe
RMPipeLayer := layer_new("EtRmPipePlu", ltgrey)
RMVertPipe := PipeF(LFOM_Origin, HL_Lfom, [0; 90; 0]*deg, ND_RMPipe, PS_Default)
FreezeRMPipe := FreezeLayer("EtRmPipePlu")
SelectRMPipes := SelectLayer("EtRmPipePlu")
# LFOM Orifices
LfomOrifices :=
    Local ← FreezeRMPipe
    for h ∈ 0 .. last(H_LfomOrifices)
        if N_LfomOrifices[h] ≠ 0
            Local ← stack(Local, CylinderF([LFOM_Origin[0]; LFOM_Origin[1]; LFOM_Origin[2] + H_LfomOrifices[h]], D_LfomOrifices/2, outerradius(ND_RMPipe) + zc, [
                90 deg + (asin(0.5*S_LfomOrificesMin/(2*outerradius(ND_RMPipe))) + asin(D_LfomOrifices/(2*outerradius(ND_RMPipe))))*(mod(h, 2) == 0);
                0 deg
            ]))
        Local ← stack(Local, ArrayLastPolar([LFOM_Origin[0]; LFOM_Origin[1]; LFOM_Origin[2] + H_LfomOrifices[h]], N_LfomOrifices[h], (N_LfomOrifices[h] - 1)*(2*asin(D_LfomOrifices/(2*outerradius(ND_RMPipe))) + 2*asin(S_LfomOrificesMin/(2*outerradius(ND_RMPipe)))))) if N_LfomOrifices[h] > 1
    return Local
SubtractRMPipeOrifices := SubtractF(["EtRmPipePlu"], "DeleteMe")
AC_LFOM := stack(RMPipeLayer, RMVertPipe, FreezeRMPipe, GroupAll("DeleteMe"), SubtractRMPipeOrifices, SelectRMPipes, LfomOrifices, GroupAll("DeleteMe"), SubtractRMPipeOrifices)
# Previews
# [reference: LayoutsAC.xmcd]
# Display Variables
H_LfomOrifices =  # error: This variable is undefined.
AC_LFOM =  # error
N_LfomOrifices =  # error
D_LfomOrifices =  # error
AC_Preview = [
    "laythw";
    "LoadPlot";
    "_-view o f";
    "-plot n ";
    "AguaClaraPlot";
    "PublishToWeb PNG.pc3";
    "[FILEPATH]LFOM_Front";
    "n y";
    "_-view o t";
    "-plot n ";
    "AguaClaraPlot";
    "PublishToWeb PNG.pc3";
    "[FILEPATH]LFOM_Top";
    "n y";
    "_-view o r";
    "-plot n ";
    "AguaClaraPlot";
    "PublishToWeb PNG.pc3";
    "[FILEPATH]LFOM_Right";
    "n y";
    "shademode x -view swiso";
    "-plot n ";
    "AguaClaraPlot";
    "PublishToWeb PNG.pc3";
    "[FILEPATH]LFOM_SWIso";
    "n y";
    "shademode 2"
]
