# AguaClara Design Tool
Country = 1
Q_Plant = 0.035
Language = 0
Country := 0
C_ChlorineDoseMax := 2*mg/L
C_ChlorineStock := 50*gm/L
Ti_ChlorineStock := 30 hr
# Design References
# MathCAD dimension calculations:
# [reference: BasicClientInputs.xmcd]
# [reference: ExpertInputs.xmcd]
# [reference: DesignAssumptions.xmcd]
# [reference: MathFunctions.xmcd]
# [reference: PipeDatabase.xmcd]
# [reference: MinorLossCoefficients.xmcd]
# [reference: FluidsFunctions.xmcd]
# [reference: Sedimentation Tank.xmcd]
# [reference: Flocculator.xmcd]
# [reference: LFOM.xmcd]
# [reference: EntranceTankDim.xmcd]
# [reference: LinearCdc_app37.xmcd]
# [reference: ChemStorageCylinders.xmcd]
# [reference: Stacked Rapid Sand Filter.xmcd]
# [reference: Materials List.xmcd]
# AutoCAD drawing programs:
# Translators:
# These are the codes that take MathCAD outputs and create AutoCAD scripts that are used to draw the plant (formerly Basics)
# [reference: MtoATranslators.xmcd]
# The wrapped MtoA translator contains the functions that the user will want to access. These functions will draw pieces with full functionality - specifying the location, dimension, and orientation of the object. Also, it contains layer control and subtraction capabilities for grouped objects.
# [reference: MtoATranslators Wrapped.xmcd]
# Plant Elements:
# These are all of the files that draw the fundamental parts of the plants (tees, elbows, tanks, pipes, etc)
# [reference: Channel.xmcd]
# [reference: cross.xmcd]
# [reference: Sludge.xmcd]
# [reference: Manifold.xmcd]
# [reference: pipe.xmcd]
# [reference: elbow.xmcd]
# [reference: tank.xmcd]
# [reference: lamina.xmcd]
# [reference: adapter.xmcd]
# [reference: Tee.xmcd]
# [reference: pvccap.xmcd]
# [reference: LaunderCap.xmcd]
# [reference: ChimneyStops.xmcd]
# [reference: laminaplain.xmcd]
# [reference: Stairs.xmcd]
# [reference: DrainChannel.xmcd]
# [reference: Manifold.xmcd]
# Specific Pieces:
# These are the codes that draw the bigger pieces of the plant (the sed tank, floc tank, etc)
# [reference: floctank.xmcd]
# [reference: SedTank- with pieces.xmcd]
# [reference: Entrance Tank.xmcd]
# [reference: Plant Drain Channel.xmcd]
# [reference: ChemStockCylinders.xmcd]
# [reference: SRSF.xmcd]
# [reference: Operator Access.xmcd]
# Layouts:
# This file will execute at the very end to create multiple views of the entire plant in paperspace
# [reference: Layouts.xmcd]
Q_Plant = 0.035 m^3/s
# Entrance Tank:
L_Et = 8.75162 m  # length of the entrance tank
L_EtHopper = 1.73016 m  # length of the entrance tank hopper
H_EtHopper = 1.25228 m  # height of the entrance tank hopper
H_EtTop = 0.247716 m  # height of the top part of the entrance tank above the hoppers
H_Et = 1.6 m  # height of the entrance tank
Z_Et = 0.749784 m  # elevation of the entrance tank
ND_RMPipe = 0.381 m  # nominal diameter of the rapid mix pipe
ND_EtOverflow = 0.6096 m  # nominal diameter of the overflow weir
# Sed Tanks and Slopes:
N_SedTanks = 3
H_SedBetween = 27.6089 cm  # Distance from the top of the inlet manifold to the bottom of the ledge supporting the lamella frame
L_Sed = 8.51747 m
N_SedBays = 2  # Number of bays of inlet manifolds in each sed tank
# Length of the port through which water exits the inlet manifold
# Width of ferrous cement plates in whice one manifold port is cut
Q_SedBay = 5.83333 L/s
# Sedimentation Tank Sludge Drain:
N_SedSludgeOrifices = 85  # per cell
Ti_SludgeDrain = 30 min  # Tank Drain time
W_SedSludge = 13.6884 cm  # Width of the sludge channel
B_SedSludgeOrifices = 10 cm  # Distance center to center between drain orifices
H_SedSludge = 6.84418 cm  # Depth of the sludge channel
T_SedSludge = 5 cm
T_SedSludge = 5 cm
# Thickness of the plate topping the sludge channel
# through which drain holes are formed
W_SedDrainCover = 23.6884 cm
D_SedSludgeOrifice = 0.009525 m  # Diameter of drain orifices
W_SedInletBottom = 0.319058 m
N_SedSludgeOrifices = 85
ND_SedSludgeValve = 3 in
# Sedimentation Tank Dimensions:
Z_SedSludge = 0.118442 m  # Height from 0 of the top of the sludge drain
Z_SedSlopes = 0.627766 m  # Height from 0 of the top of the inlet manifold
W_Sed = 1.75 m  # Total tank wall height
L_Sed = 8.51747 m  # Total tank length
# Inlet Channel:
HW_InletChannel = 0.404859 m  # Width of the drop chimneys connecting channel to sed inlet manifolds
W_InletChannel = 0.585299 m  # length of drop chimmneys
L_Channel = 5.45 m
N_SedInletPipes = 2  # per sed bay
H_InletChannel = 0.504859 m
# Sedimentation Tank Effluent Launder:
N_SedLaunderOrifices = 154  # Number of orifices per launder
Q_SedLaunderOrifices = 3.83598e-5 m^3/s  # More Launder Dimensions
ND_SedLaunder = 6 in
B_SedLaunderOrifices = 0.0921174 m  # Center to center launder spacing
L_SedLaunder = 7.1496 m
# Exit Channel:
D_SedLaunderOrifice = 0.375 in
W_ExitChannel = 0.492856 m
H_ExitChannel = 0.504859 m
L_ExitChannel = 5.45 m
H_PltWeir = 0.414859 m  # height of the weir carrying water to the distribution tank
HW_ExitChannel = 0.364859 m  # water height in exit channel from 0
# Lamella:
L_SedPlate = 0.45725 m
B_SedPlate = 2.84215 cm  # center to center distance between lamella
S_SedPlate = 2.64215 cm  # spacing between lamella
N_SedPlates = 220  # Number of Sed Plates per Sedimentation Tank Bay.
AN_SedPlate = 1.0472
V_SedC = 10.1036 m/day
L_SedActive = 7.22004 m
T
V_SedUp = 67.6257 m/day
Z_SedLaunder = 1.52224 m
H_SedPlate = 0.39599 m
H_SedAbove = 0.231119 m  # Height of water needed above the lamella
N_SedPlates = 220
HW_Sed = 1.66922 m
H_Sed = 1.76922 m
Z_Mp = 1.26436 m
H_SedBayDivider = 0.903854 m
# Flocculator:
W_FlocChannel = 0.54 m
ED_Floc = 0.006 m^2/s^3
HW_FlocEnd = 1.66922 m
N_FlocChannels = 4
L_FlocTank = 34.0699 m
HL_Floc = 24.7923 cm
HW_FlocStart = 1.91715 m
S_FlocBaffle = [38.343; 38.343; 38.343; 40.219] cm
B_FlocBaffle = [38.543; 38.543; 38.543; 40.419] cm
N_FlocChannelBaffles = [21; 21; 21; 20]
W_FlocPort = [0.38343; 0.38343; 0.38343; 0.403689] m
HL_FlocChannels = [6.41029; 6.41029; 6.41029; 5.56141] cm
L_FlocBaffleLower = 1.09408 m
L_FlocBaffleUpper = 1.392 m
H_FlocPort = [0.54; 0.54; 0.54; 0.537995] m
Ti_Floc = 14.6238 min  # residence time of the flocculator
N_FlocBaffles = 83
# Materials List:
N_Launders = 6
L_LaunderPipeTotal = 42.8976 m
N_Valves = 6
N_LaunderCouplings = 6
N_ValveCouplings = 6
N_SedPlatesTotal = 1320
N_SedPlatesPerSheet = 8
N_SedPlateSheets = 165
AC_FilterA :=
    AC_Filter if last(AC_Filter) < 598
    submatrix(AC_Filter, 0, 598, 0, 0) otherwise
AC_SedTankA :=
    AC_SedTank if last(AC_SedTank) < 598
    submatrix(AC_SedTank, 0, 598, 0, 0) otherwise
AC_FilterB :=
    submatrix(AC_Filter, 599, last(AC_Filter), 0, 0) if last(AC_Filter) < 1197
    submatrix(AC_Filter, 599, 1197, 0, 0) otherwise
AC_SedTankB :=
    submatrix(AC_SedTank, 599, last(AC_SedTank), 0, 0) if last(AC_SedTank) < 1197
    submatrix(AC_SedTank, 599, 1197, 0, 0) otherwise
AC_FilterC :=
    submatrix(AC_Filter, 1198, last(AC_Filter), 0, 0) if last(AC_Filter) < 1796
    submatrix(AC_Filter, 1198, 1796, 0, 0) otherwise
AC_SedTankC :=
    submatrix(AC_SedTank, 1198, last(AC_SedTank), 0, 0) if last(AC_SedTank) < 1796
    submatrix(AC_SedTank, 1198, 1796, 0, 0) otherwise
AC_FlocTankA :=
    AC_FlocTank if last(AC_FlocTank) < 598
    submatrix(AC_FlocTank, 0, 598, 0, 0) otherwise
AC_ChemTanksA :=
    AC_ChemTanks if last(AC_ChemTanks) < 598
    submatrix(AC_ChemTanks, 0, 598, 0, 0) otherwise
AC_FlocTankB :=
    submatrix(AC_FlocTank, 599, last(AC_Filter), 0, 0) if last(AC_Filter) < 1197
    submatrix(AC_FlocTank, 599, 1197, 0, 0) otherwise
AC_ChemTanksB :=
    submatrix(AC_ChemTanks, 1198, last(AC_ChemTanks), 0, 0) if last(AC_ChemTanks) < 1197
    submatrix(AC_ChemTanks, 1198, 1796, 0, 0) otherwise
AC_FlocTankC :=
    submatrix(AC_FlocTank, 1198, last(AC_FlocTank), 0, 0) if last(AC_FlocTank) < 1796
    submatrix(AC_FlocTank, 1198, 1796, 0, 0) otherwise
AC_ChemTanksC :=
    submatrix(AC_ChemTanks, 1198, last(AC_ChemTanks), 0, 0) if last(AC_ChemTanks) < 1796
    submatrix(AC_ChemTanks, 1198, 1796, 0, 0) otherwise
AC_EntranceTankA :=
    AC_EntranceTank if last(AC_EntranceTank) < 598
    submatrix(AC_EntranceTank, 0, 598, 0, 0) otherwise
AC_DrainChannelA :=
    AC_DrainChannel if last(AC_DrainChannel) < 598
    submatrix(AC_DrainChannel, 0, 598, 0, 0) otherwise
AC_EntranceTankB :=
    submatrix(AC_EntranceTank, 599, last(AC_EntranceTank), 0, 0) if last(AC_EntranceTank) < 1197
    submatrix(AC_EntranceTank, 599, 1197, 0, 0) otherwise
AC_DrainChannelB :=
    submatrix(AC_DrainChannel, 1198, last(AC_DrainChannel), 0, 0) if last(AC_DrainChannel) < 1197
    submatrix(AC_DrainChannel, 1198, 1796, 0, 0) otherwise
AC_EntranceTankC :=
    submatrix(AC_EntranceTank, 1198, last(AC_EntranceTank), 0, 0) if last(AC_EntranceTank) < 1796
    submatrix(AC_EntranceTank, 1198, 1796, 0, 0) otherwise
AC_DrainChannelC :=
    submatrix(AC_DrainChannel, 1198, last(AC_DrainChannel), 0, 0) if last(AC_DrainChannel) < 1796
    submatrix(AC_DrainChannel, 1198, 1796, 0, 0) otherwise
AC_OperatorAccessA :=
    AC_OperatorAccess if last(AC_OperatorAccess) < 598
    submatrix(AC_OperatorAccess, 0, 598, 0, 0) otherwise
AC_LayoutA :=
    AC_Layout if last(AC_Layout) < 598
    submatrix(AC_Layout, 0, 598, 0, 0) otherwise
AC_OperatorAccessB :=
    submatrix(AC_OperatorAccess, 599, last(AC_OperatorAccess), 0, 0) if last(AC_OperatorAccess) < 1197
    submatrix(AC_OperatorAccess, 599, 1197, 0, 0) otherwise
AC_LayoutB :=
    submatrix(AC_Layout, 1198, last(AC_Layout), 0, 0) if last(AC_Layout) < 1197
    submatrix(AC_Layout, 1198, 1796, 0, 0) otherwise
AC_OperatorAccessC :=
    submatrix(AC_OperatorAccess, 1198, last(AC_OperatorAccess), 0, 0) if last(AC_OperatorAccess) < 1796
    submatrix(AC_OperatorAccess, 1198, 1796, 0, 0) otherwise
AC_LayoutC :=
    submatrix(AC_Layout, 1198, last(AC_Layout), 0, 0) if last(AC_Layout) < 1796
    submatrix(AC_Layout, 1198, 1796, 0, 0) otherwise
AC_EntranceTankA = [
    "-layer m Cdc"; "c t 129,0,129"; "Cdc"; "  "; "-insert CdcLeverArm.dwg"; "-8.62382,10.78051,2.37468 1 1 0"; "-insert CdcLeverArmBracket.dwg"; "-8.59182,10.36776,2.34978 1 1 0"; "-insert CdcCht.dwg"; "-9.35402,10.28366,2.46748 1 1 0"
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]
AC_EntranceTankB = [
    "_cylinder -8.00341,9.7553,1.35208 0.1905 c -8.55052,9.7553,1.35208";
    "_cylinder -7.99341,9.7553,1.35208 0.17507 c -8.56052,9.7553,1.35208";
    "_zoom w -8.56052,9.5548,1.35208 -8.54052,9.9558,1.35208";
    "_subtract -8.55052,9.9458,1.35208  -8.56052,9.93037,1.35208 ";
    "_zoom w -8.63672,9.54718,1.14396 -7.91721,10.11506,1.5602";
    "_cylinder -8.00341,9.7553,1.35208 0.19812 c -7.92721,9.7553,1.35208";
    "_cylinder -8.01341,9.7553,1.35208 0.1905 c -7.91721,9.7553,1.35208";
    "_subtract -7.92721,9.55718,1.35208  -7.91721,9.641,1.35208 ";
    "_mirror -8.00341,9.63338  -8.27697,10.02886 -8.27697,10.03886  _cylinder -8.27697,10.02886,1.35208 0.19812 c -8.27697,10.10506,1.35208";
    "_cylinder -8.27697,10.01886,1.35208 0.1905 c -8.27697,10.11506,1.35208";
    "_subtract -8.07885,10.10506,1.35208  -8.08647,10.11506,1.35208 ";
    "_union -8.08647,9.89208,1.35208 -8.07885,10.10506,1.35208 -8.14019,9.9458,1.35208 -8.62672,9.55718,1.35208 -7.92721,9.95342,1.35208 ";
    "_cylinder -7.99341,9.7553,1.35208 0.17507 c -8.56052,9.7553,1.35208";
    "_subtract -8.07885,10.10506,1.35208  -7.99341,9.58023,1.35208 ";
    "_cylinder -8.27697,10.11506,1.35208 0.17507 c -8.27697,9.7453,1.35208";
    "_subtract -8.07885,10.10506,1.35208  -8.45204,10.11506,1.35208 ";
    "rotate3d l  y -8.27697,10.02886,1.35208 90";
    "-group c RMTee y ";
    "all ";
    "-layer s 0";
    "  ";
    "-layer f RMTee";
    "  "
]
AC_EntranceTankC =  # error: This variable is undefined.
AC_FlocTankA = [
    "-layer m FlocTank"; "c t 132,132,132"; "FlocTank"; "  "; "_-view o t _zoom w 0.06,5.34,0 -8.57747,7.77,2.01715 _box 0,5.4,0 -8.51747,7.71,2.01715 _box 0.05,5.35,-0.05 -8.56747,7.76,2.01715 _subtract 0.05,5.35,-0.05  0,5.4,0 "; "_box -8.56747,5.94,0 0.05,5.99,2.01715"; "-array l  R 3 1 0.59"; "-group c FlocTank y "; "all "; "-layer s 0"
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]
AC_FlocTankB =  # error
AC_FlocTankC =  # error
AC_OperatorAccessA = [
    "-layer m AlumPlatform"; "c t 132,132,132"; "AlumPlatform"; "  "; "_-view o f"; "_pline"; "-10.95522,2.66748"; "-10.65522,2.66748"; "-10.65522,2.47338"; "-10.35522,2.47338"
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]
AC_OperatorAccessB =  # error
AC_OperatorAccessC =  # error
AC_SedTankA = [
    "_-view o t";
    "-layer m tank";
    "c t 132,132,132";
    "tank";
    "  ";
    "_-view o t _zoom w 0.06,-0.06,0 -8.57747,1.81,1.76922 _box 0,0,0 -8.51747,1.75,1.76922 _box 0.05,-0.05,-0.05 -8.56747,1.8,1.76922 _subtract 0.05,-0.05,-0.05  0,0,0 ";
    "_box -7.88217,0,1.43017 -7.83217,1.75,1.38017";
    "_box 0,0,0.3827 -0.05,1.75,0.3327";
    "_box -8.51747,0,1.26436 -7.93217,1.75,1.21436";
    "_box -7.93217,0,1.21436 -7.88217,1.75,1.76922"
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]
AC_SedTankB = [
    "c t 255,255,0"; "PipeFrameStub"; "  "; "_cylinder -0.75164,0.1,0.95211 0.01067 c -0.76753,0.1,0.95211"; "_cylinder -0.74164,0.1,0.95211 0.00825 c -0.77753,0.1,0.95211"; "_zoom w -0.77753,0.07933,0.95211 -0.75753,0.12067,0.95211"; "_subtract -0.76753,0.11067,0.95211  -0.77753,0.10826,0.95211 "; "rotate3d l  y -0.75164,0.1,0.95211 90"; "-array all  R 1 23 -0.32818"; "-array all  R 2 1 0.675"
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]
AC_SedTankC =  # error
AC_FilterA = [
    "-layer m FiInletChannel"; "c t 214,214,214"; "FiInletChannel"; "  "; "_zoom w -0.01,-2.67792,1.10152 0.01,-2.56793,1.10152"; "_box -0.01,-2.61793,1.10152 2.62793,-2.47987,1.60638"; "_box 0,-2.66793,1.05152 2.61793,-2.42987,1.60638"; "_subtract 0,-2.66793,1.05152  -0.01,-2.61793,1.10152 "; "rotate3d l  z 0,-2.61793,1.10152 90"; "_box -0.18806,-2.66793,1.05152 0.05,-2.61793,1.60638"
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]
AC_FilterB = [
    "_cylinder -3.16251,-0.16827,-0.9942 0.08414 c -3.08551,-0.16827,-0.9942";
    "_subtract -3.15251,-0.26034,-0.9942  -3.16251,-0.25241,-0.9942 ";
    "_cylinder -3.09551,-0.16827,-0.9942 0.08414 c -3.05076,-0.16827,-0.9942";
    "_cylinder -3.10551,-0.16827,-0.9942 0.07725 c -3.04076,-0.16827,-0.9942";
    "_subtract -3.09551,-0.25241,-0.9942  -3.10551,-0.24552,-0.9942 ";
    "_union -2.99376,-0.26034,-0.9942 -3.15251,-0.26034,-0.9942 -3.05076,-0.25241,-0.9942 ";
    "-group c FiCouplings y ";
    "all ";
    "-layer s 0";
    "  "
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]
AC_FilterC = [
    "-layer f FiEntExBoxes";
    "  ";
    "_cylinder -0.35632,-0.73947,0.74345 0.09207 c -0.29932,-0.73947,0.74345";
    "_cylinder -0.36632,-0.73947,0.74345 0.08414 c -0.28932,-0.73947,0.74345";
    "_subtract -0.35632,-0.83154,0.74345  -0.28932,-0.82361,0.74345 ";
    "_cylinder -0.45807,-0.73947,0.74345 0.09207 c -0.40107,-0.73947,0.74345";
    "_cylinder -0.46807,-0.73947,0.74345 0.08414 c -0.39107,-0.73947,0.74345";
    "_subtract -0.45807,-0.83154,0.74345  -0.46807,-0.82361,0.74345 ";
    "_cylinder -0.40107,-0.73947,0.74345 0.08414 c -0.35632,-0.73947,0.74345";
    "_cylinder -0.41107,-0.73947,0.74345 0.07725 c -0.34632,-0.73947,0.74345"
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]
AC_ChemTanksA = [
    "-layer m CoagTanks"; "c t 132,132,132"; "CoagTanks"; "  "; "_-view o t"; "_zoom w -9.73602,10.39986,1.58068 -9.09642,11.03946,2.67248"; "_cylinder -9.41622,10.71966,2.66248 0.3098 c -10.48802,10.71966,2.66248"; "rotate3d l  y -9.41622,10.71966,2.66248 90"; "-group c CoagTanks y "; "all "
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]
AC_ChemTanksB =  # error
AC_ChemTanksC =  # error
AC_DrainChannelA = [
    "-layer m DrainChannel"; "c t 214,214,214"; "DrainChannel"; "  "; "3dpoly"; "0.1,-1.125,-0.3167"; "0.1,-1.125,-0.4296"; "0.1,-0.825,-0.59249"; "0.1,-0.525,-0.4296"; "0.1,-0.525,-0.3167"
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]
AC_DrainChannelB =  # error
AC_DrainChannelC =  # error
# AC_LayoutA | AC_LayoutB | AC_LayoutC
