# [reference: MasterProgram.xmcd]
Et_Origin := Et_origin
W_EtWalkway := 1.5 m  # should we make this a standard (design assumption) for all walkways?
L_RMPipeHorizLower := W_EtWalkway + 2*SocketDepth(ND_RMPipe)
L_RMPipeVertLower := Z_EtExit - ShortTeeLength(ND_RMPipe) - RMFlocCoupling_Origin[2] - ElbowRadius(ND_RMPipe)
L_RMPipeVertPipeUpper := ZW_RMPipe - Z_EtExit  # should overestimate the needed length of this pipe
L_EtExitOuter := Et_Origin[1] - floc_origin[1] - L_RMPipeHorizLower - ElbowRadius(ND_RMPipe) - ShortTeeLength(ND_RMPipe) + SocketDepth(ND_RMPipe)
L_EtExitInner := □  # error: This placeholder is empty.
# Origin Points
Elbow1_Origin := [0 m; L_RMPipeHorizLower + CouplingLength(ND_RMPipe) - 2*SocketDepth(ND_RMPipe); 0 m] + RMFlocCoupling_Origin
PipeHorizLower_Origin := [0 m; CouplingLength(ND_RMPipe) - 2*SocketDepth(ND_RMPipe); 0 m] + RMFlocCoupling_Origin
PipeVertLower_Origin := [0 m; ElbowRadius(ND_RMPipe); ElbowRadius(ND_RMPipe)] + Elbow1_Origin
RMTee_Origin := [0 m; ShortTeeLength(ND_RMPipe); L_RMPipeVertLower + ShortTeeLength(ND_RMPipe)] + PipeVertLower_Origin
PipeVertUpper_Origin := [0 m; -ShortTeeLength(ND_RMPipe); ShortTeeLength(ND_RMPipe)] + RMTee_Origin
WeirPipe_Origin := [□; □; □]  # error: This placeholder is empty.
RMScriptEvenChannels :=
    RMPipeLayer ← layer_new("RMPipe", blue)
    PipeHorizLower ← PipeF(PipeHorizLower_Origin, L_RMPipeHorizLower, [270; 0]*deg, ND_RMPipe, EN_PipeSpec)
    PipeVertLower ← PipeF(PipeVertLower_Origin, L_RMPipeVertLower, [0; 90]*deg, ND_RMPipe, EN_PipeSpec)
    FreezeRMPipe ← FreezeLayer("RMPipe")
    RMTeePipeLayer ← layer_new("RMTeePipe", blue)
    PipeVertUpper ← PipeF(PipeVertUpper_Origin, L_RMPipeVertPipeUpper, [0; 90]*deg, ND_RMPipe, EN_PipeSpec)
    FreezeRMTeePipe ← FreezeLayer("RMTeePipe")
    RMElbowLayer ← layer_new("RMElbow", green)
    Elbow ← ElbowF(Elbow1_Origin, [0; 90; 0]*deg, ND_RMPipe, EN_PipeSpec)
    FreezeRMElbow ← FreezeLayer("RMElbow")
    RMTeeLayer ← layer_new("RMTee", green)
    RMTee ← TeeF(RMTee_Origin, [0; 270; 0]*deg, ND_RMPipe, EN_PipeSpec)
    FreezeRMTee ← FreezeLayer("RMTee")
    return stack(RMPipeLayer, PipeHorizLower, PipeVertLower, FreezeRMPipe, RMTeePipeLayer, PipeVertUpper, FreezeRMTeePipe, RMElbowLayer, Elbow, FreezeRMElbow, RMTeeLayer, RMTee, FreezeRMTee)
EtWaterExitScript :=
    EtExitPipeLayer ← layer_new("EtExitPipe", blue)
    ExitPipeOuter ← PipeF(RMTee_Origin, L_EtExitOuter, [270; 0]*deg, ND_RMPipe, EN_PipeSpec)  # error: This placeholder is empty.
# [component: inputs RMScriptEvenChannels]
