Q_Plant := 0.8*L/s
# [reference: ExpertInputs.xmcd]
# [reference: MathFunctions.xmcd]
# [reference: PipeDatabase.xmcd]
# [reference: MaterialsDatabase.xmcd]
# [reference: FluidsFunctions.xmcd]
# [reference: CdcFunctions.xmcd]
# [reference: SedimentationTankjem384.xmcd]
# [reference: Flocculator.xmcd]
# [reference: LFOM.xmcd]
# [reference: EntranceTank.xmcd]
# [reference: StackedRapidSandFilter.xmcd]
# [reference: LinearCdc.xmcd]
# [reference: ChemStorageTanks.xmcd]
# AutoCAD drawing programs:
# Translators:
# These are the codes that take MathCAD outputs and create AutoCAD scripts that are used to draw the plant (formerly Basics)
# [reference: MtoATranslators.xmcd]
# The wrapped MtoA translator contains the functions that the user will want to access. These functions will draw pieces with full functionality - specifying the location, dimension, and orientation of the object. Also, it contains layer control and subtraction capabilities for grouped objects.
# [reference: MtoATranslatorsWrapped.xmcd]
# Drawing functions:
# [reference: ChannelF.xmcd]
# [reference: PlumbingF.xmcd]
# [reference: TankF.xmcd]
# [reference: StairsF.xmcd]
# [reference: DrainChannelF.xmcd]
# AutoCAD Script Files:
# [reference: FlocculatorACLow.xmcd]
# [reference: SedimentationTankACLow_jem384.xmcd]
# [reference: EntranceTankACLow.xmcd]
# [reference: ChemStockTanksAC.xmcd]
# Low Flow Stacked Rapid Sand Filter
# Dimesions and Origins
SlottedPipe := 0  # If slotted pipe is to be drawn with slots SlottedPipe=1 otherwise it should equal 0
L_FiBodyPipe := 6 ft
ND_FiBodyPipe := 12 in
S_FiInletMan := 40 cm
# Internal Manifold
ND_FiManIntTrunk := 1 in
ND_FiManIntBranch := .5 in
L_FiManIntTrunk := 8.5 in + CapHeight(ND_FiManIntTrunk)/2
L_FiManIntBranchSm := 4 in
L_FiManIntBranchLg := 5 in
S_FiManIntBranch := 3 in
L_FiManIntBranchStart := 1.75 in
B_FiManSlot := 1/8*in = 0.003175 m
L_FiManSlot := .5 in = 0.0127 m
W_FiManSlot := 2 mm = 0.002 m
FiPipe_Origin := [0 m; 0 m; 0 m]
FiIntManIn_Origin := [L_FiManIntBranchStart + S_FiManIntBranch; 0 m; 3 cm]
FiIntManOut_Origin := [L_FiManIntBranchStart + S_FiManIntBranch; 0 m; 23 cm]
N_FiManSlotsPerRowSm := floor((L_FiManIntBranchSm - B_FiManSlot - (outerdiameter(ND_FiManBranch) - innerdiameter(ND_FiManBranch, PS_FiBranch))/2)/B_FiManSlot) = 29
CapThickness(ND_FiManBranch)
N_FiManSlotsPerRowLg := floor((L_FiManIntBranchLg - B_FiManSlot - (outerdiameter(ND_FiManBranch) - innerdiameter(ND_FiManBranch, PS_FiBranch))/2)/B_FiManSlot) = 37
# Filter Body
LayerFiBody := layer_new("FiBodyPlu", blue3)
DrawFiBody := PipeF(FiPipe_Origin, L_FiBodyPipe, [0; 90]*deg, ND_FiBodyPipe, PS_FiBranch)
FreezeFiBody := FreezeLayer("FiBodyPlu")
FiBodyPipe := stack(LayerFiBody, DrawFiBody, FreezeFiBody)
# Manifold Branches
# Piping
LayerMan := layer_new("FiManIntPlu", blue3)
LayerManFrz := FreezeLayer("FiManIntPlu")
SelectManInt := SelectLayer("FiManIntPlu")
LayerManCapFrz := FreezeLayer("FiManCapsPlu")
FiManIntTrunk :=
    Script ← LayerMan
    for i ∈ 0 .. 2
        PipeOut ← PipeF(FiIntManOut_Origin + [0 m; 0 m; i*S_FiInletMan], L_FiManIntTrunk, [0; 0]*deg, ND_FiManIntTrunk, PS_FiBranch)
        Mirror ← Mirror3dLast("yz", [FiPipe_Origin[0]; FiPipe_Origin[1]], "n")
        Move ← MoveLast(FiIntManOut_Origin, FiIntManOut_Origin - [0 m; 0 m; S_FiInletMan/2])
        Script ← stack(Script, PipeOut, Mirror, Move)
    TopPipe ← PipeF(FiIntManIn_Origin + [0 m; 0 m; 3*S_FiInletMan], L_FiManIntTrunk, [0; 0]*deg, ND_FiManIntTrunk, PS_FiBranch)
    MirrorTop ← Mirror3dLast("yz", [FiPipe_Origin[0]; FiPipe_Origin[1]], "y")
    return stack(Script, TopPipe, MirrorTop)
FiManIntSmBranch :=
    ScriptIn ← SelectManInt
    for i ∈ 0 .. 3
        ArraySlots ← ArrayLast(N_FiManSlotsPerRowSm, 1, B_FiManSlot)
        Subtract ← SubtractF(["FiManBranchPlu"], "DeleteMe")
        PipeIn1 ← PipeF(FiIntManIn_Origin + [-L_FiManIntBranchStart; -innerdiameter(ND_FiManIntTrunk, PS_FiBranch)/2; i*S_FiInletMan], L_FiManIntBranchSm, [90; 0]*deg, ND_FiManIntBranch, PS_FiBranch)
        MirrorIn ← MirrorLast([FiIntManOut_Origin[0]; FiIntManOut_Origin[1]], [FiIntManOut_Origin[0] + zc; FiIntManOut_Origin[1]], "n")
        SlotsIn1 ← BoxF(FiIntManIn_Origin + [
            -L_FiManIntBranchStart - L_FiManSlot/2;
            B_FiManSlot/2 + outerdiameter(ND_FiManIntTrunk)/2;
            outerradius(ND_FiManBranch) + i*S_FiInletMan
        ], FiIntManIn_Origin + [
            -L_FiManIntBranchStart + L_FiManSlot/2;
            (B_FiManSlot/2 + W_FiManSlots) + outerdiameter(ND_FiManIntTrunk)/2;
            i*S_FiInletMan - outerradius(ND_FiManBranch)
        ], [0; 0; 0]*deg)
        MirrorSlotsIn ← MirrorAll([FiIntManIn_Origin[0]; FiIntManIn_Origin[1]], [FiIntManIn_Origin[0] + zc; FiIntManIn_Origin[1]], "n")
        PipeIn2 ← PipeF(FiIntManIn_Origin + [
            -L_FiManIntBranchStart - 2*S_FiManIntBranch;
            -innerdiameter(ND_FiManIntTrunk, PS_FiBranch)/2;
            i*S_FiInletMan
        ], L_FiManIntBranchSm, [90; 0]*deg, ND_FiManIntBranch, PS_FiBranch)
        SlotsIn2 ← BoxF(FiIntManIn_Origin + [
            -L_FiManIntBranchStart - 2*S_FiManIntBranch - L_FiManSlot/2;
            B_FiManSlot/2 + outerdiameter(ND_FiManIntTrunk)/2;
            outerradius(ND_FiManBranch) + i*S_FiInletMan
        ], FiIntManIn_Origin + [
            -L_FiManIntBranchStart - 2*S_FiManIntBranch + L_FiManSlot/2;
            (B_FiManSlot/2 + W_FiManSlots) + outerdiameter(ND_FiManIntTrunk)/2;
            i*S_FiInletMan - outerradius(ND_FiManBranch)
        ], [0; 0; 0]*deg)
        ScriptIn ← stack(ScriptIn, SelectManInt, PipeIn1, MirrorIn, LayerManFrz, SlotsIn1, ArraySlots, MirrorSlotsIn, GroupDelete, Subtract, SelectManInt, PipeIn2, MirrorIn, LayerManFrz, SlotsIn2, ArraySlots, MirrorSlotsIn, GroupDelete, Subtract, SelectManInt) if SlottedPipe == 1
        ScriptIn ← stack(ScriptIn, SelectManInt, PipeIn1, MirrorIn, LayerManFrz, SelectManInt, PipeIn2, MirrorIn, LayerManFrz, SelectManInt) otherwise
    ScriptOut ← SelectManInt
    for i ∈ 0 .. 2
        PipeOut1 ← PipeF(FiIntManOut_Origin + [-L_FiManIntBranchStart; -innerdiameter(ND_FiManIntTrunk, PS_FiBranch)/2; i*S_FiInletMan], L_FiManIntBranchSm, [90; 0]*deg, ND_FiManIntBranch, PS_FiBranch)
        MirrorOut ← MirrorLast([FiIntManOut_Origin[0]; FiIntManOut_Origin[1]], [FiIntManOut_Origin[0] + zc; FiIntManOut_Origin[1]], "n")
        SlotsOut1 ← BoxF(FiIntManOut_Origin + [
            -L_FiManIntBranchStart - L_FiManSlot/2;
            B_FiManSlot/2 + outerdiameter(ND_FiManIntTrunk)/2;
            outerradius(ND_FiManBranch) + i*S_FiInletMan
        ], FiIntManOut_Origin + [
            -L_FiManIntBranchStart + L_FiManSlot/2;
            (B_FiManSlot/2 + W_FiManSlots) + outerdiameter(ND_FiManIntTrunk)/2;
            i*S_FiInletMan - outerradius(ND_FiManBranch)
        ], [0; 0; 0]*deg)
        MirrorSlotsOut ← MirrorAll([FiIntManOut_Origin[0]; FiIntManOut_Origin[1]], [FiIntManOut_Origin[0] + zc; FiIntManOut_Origin[1]], "n")
        PipeOut2 ← PipeF(FiIntManOut_Origin + [
            -L_FiManIntBranchStart - 2*S_FiManIntBranch;
            -innerdiameter(ND_FiManIntTrunk, PS_FiBranch)/2;
            i*S_FiInletMan
        ], L_FiManIntBranchSm, [90; 0]*deg, ND_FiManIntBranch, PS_FiBranch)
        SlotsOut2 ← BoxF(FiIntManOut_Origin + [
            -L_FiManIntBranchStart - 2*S_FiManIntBranch - L_FiManSlot/2;
            B_FiManSlot/2 + outerdiameter(ND_FiManIntTrunk)/2;
            outerradius(ND_FiManBranch) + i*S_FiInletMan
        ], FiIntManOut_Origin + [
            -L_FiManIntBranchStart - 2*S_FiManIntBranch + L_FiManSlot/2;
            (B_FiManSlot/2 + W_FiManSlots) + outerdiameter(ND_FiManIntTrunk)/2;
            i*S_FiInletMan - outerradius(ND_FiManBranch)
        ], [0; 0; 0]*deg)
        ScriptOut ← stack(ScriptOut, PipeOut1, MirrorOut, LayerManFrz, SlotsOut1, ArraySlots, MirrorSlotsOut, GroupDelete, Subtract, SelectManInt, PipeOut2, MirrorOut, LayerManFrz, SlotsOut2, ArraySlots, MirrorSlotsOut, GroupDelete, Subtract, SelectManInt) if SlottedPipe == 1
        ScriptOut ← stack(ScriptOut, PipeOut1, MirrorOut, LayerManFrz, SelectManInt, PipeOut2, MirrorOut, LayerManFrz, SelectManInt) otherwise
    return stack(ScriptIn, ScriptOut)
FiManIntLgBranch :=
    ScriptIn ← SelectManInt
    for i ∈ 0 .. 3
        ArraySlots ← ArrayLast(N_FiManSlotsPerRowLg, 1, B_FiManSlot)
        MirrorSlots ← MirrorAll([FiIntManOut_Origin[0]; FiIntManOut_Origin[1]], [FiIntManOut_Origin[0] + zc; FiIntManOut_Origin[1]], "n")
        Subtract ← SubtractF(["FiManBranchPlu"], "DeleteMe")
        PipeIn ← PipeF(FiIntManIn_Origin + [
            -L_FiManIntBranchStart - S_FiManIntBranch;
            -innerdiameter(ND_FiManIntTrunk, PS_FiBranch)/2;
            i*S_FiInletMan
        ], L_FiManIntBranchLg, [90; 0]*deg, ND_FiManIntBranch, PS_FiBranch)
        MirrorIn ← MirrorLast([FiIntManOut_Origin[0]; FiIntManOut_Origin[1]], [FiIntManOut_Origin[0] + zc; FiIntManOut_Origin[1]], "n")
        SlotsIn ← BoxF(FiIntManIn_Origin + [
            -L_FiManIntBranchStart - S_FiManIntBranch - L_FiManSlot/2;
            B_FiManSlot/2 + outerdiameter(ND_FiManIntTrunk)/2;
            outerradius(ND_FiManBranch) + i*S_FiInletMan
        ], FiIntManIn_Origin + [
            -L_FiManIntBranchStart - S_FiManIntBranch + L_FiManSlot/2;
            (B_FiManSlot/2 + W_FiManSlots) + outerdiameter(ND_FiManIntTrunk)/2;
            i*S_FiInletMan - outerradius(ND_FiManBranch)
        ], [0; 0; 0]*deg)
        ScriptIn ← stack(ScriptIn, PipeIn, MirrorIn, LayerManFrz, SlotsIn, ArraySlots, MirrorSlots, GroupDelete, Subtract, SelectManInt) if SlottedPipe == 1
        ScriptIn ← stack(ScriptIn, PipeIn, MirrorIn, LayerManFrz, SelectManInt) otherwise
    ScriptOut ← SelectManInt
    for i ∈ 0 .. 2
        PipeOut ← PipeF(FiIntManOut_Origin + [
            -L_FiManIntBranchStart - S_FiManIntBranch;
            -innerdiameter(ND_FiManIntTrunk, PS_FiBranch)/2;
            i*S_FiInletMan
        ], L_FiManIntBranchLg, [90; 0]*deg, ND_FiManIntBranch, PS_FiBranch)
        MirrorOut ← MirrorLast([FiIntManOut_Origin[0]; FiIntManOut_Origin[1]], [FiIntManOut_Origin[0] + zc; FiIntManOut_Origin[1]], "n")
        SlotsOut ← BoxF(FiIntManOut_Origin + [
            -L_FiManIntBranchStart - S_FiManIntBranch - L_FiManSlot/2;
            B_FiManSlot/2 + outerdiameter(ND_FiManIntTrunk)/2;
            outerradius(ND_FiManBranch) + i*S_FiInletMan
        ], FiIntManOut_Origin + [
            -L_FiManIntBranchStart - S_FiManIntBranch + L_FiManSlot/2;
            (B_FiManSlot/2 + W_FiManSlots) + outerdiameter(ND_FiManIntTrunk)/2;
            i*S_FiInletMan - outerradius(ND_FiManBranch)
        ], [0; 0; 0]*deg)
        ScriptOut ← stack(ScriptOut, PipeOut, MirrorOut, LayerManFrz, SlotsOut, ArraySlots, MirrorSlots, GroupDelete, Subtract, SelectManInt) if SlottedPipe == 1
        ScriptOut ← stack(ScriptOut, PipeOut, MirrorOut, LayerManFrz, SelectManInt)
    return stack(ScriptIn, ScriptOut)
# Couplings
FiFittingLayer := layer_new("FiFittingPlu", green)
FiManBranchCoupling := CouplingSUBF(FiIntManOut_Origin, [180; 0; 0]*deg, ND_FiManIntTrunk, PS_Default, ["FiPipePlu"])
FiManBranchCoupling :=
    Script ← FiFittingLayer
    for i ∈ 0 .. 2
        CoupOut ← CouplingSUBF(FiIntManOut_Origin + [0 m; 0 m; i*S_FiInletMan], [180; 0; 0]*deg, ND_FiManIntTrunk, PS_Default, ["FiPipePlu"])
        Mirror ← Mirror3dLast("yz", [FiPipe_Origin[0]; FiPipe_Origin[1]], "n")
        Move ← MoveLast(FiIntManOut_Origin, FiIntManOut_Origin - [0 m; 0 m; S_FiInletMan/2])
        Script ← stack(Script, CoupOut, Mirror, Move)
    CoupTop ← CouplingSUBF(FiIntManIn_Origin + [0 m; 0 m; 3*S_FiInletMan], [180; 0; 0]*deg, ND_FiManIntTrunk, PS_Default, ["FiPipePlu"])
    MirrorTop ← Mirror3dLast("yz", [FiPipe_Origin[0]; FiPipe_Origin[1]], "y")
    return stack(Script, CoupTop, MirrorTop)
FreezeFittingLayer := FreezeLayer("FiFittingPlu")
# Caps
LayerManCap := layer_new("FiManCapsPlu", red)
SelectManCap := SelectLayer("FiManCapsPlu")
LayerManCapFrz := FreezeLayer("FiManCapsPlu")
FiManTrunkCap :=
    Script ← LayerManCap
    for i ∈ 0 .. 2
        CapOut ← CutCapF(FiIntManOut_Origin + [-L_FiManIntTrunk; 0 m; i*S_FiInletMan], CapHeight(ND_FiManIntTrunk)/2, [180; 0]*deg, ND_FiManIntTrunk)
        Mirror ← Mirror3dLast("yz", [FiPipe_Origin[0]; FiPipe_Origin[1]], "n")
        Move ← MoveLast(FiIntManOut_Origin, FiIntManOut_Origin - [0 m; 0 m; S_FiInletMan/2])
        Script ← stack(Script, CapOut, Mirror, Move)
    CapTop ← CutCapF(FiIntManOut_Origin + [-L_FiManIntTrunk; 0 m; 3*S_FiInletMan], CapHeight(ND_FiManIntTrunk)/2, [180; 0]*deg, ND_FiManIntTrunk)
    MirrorTop ← Mirror3dLast("yz", [FiPipe_Origin[0]; FiPipe_Origin[1]], "y")
    return stack(Script, CapTop, MirrorTop)
FiManInt := stack(FiManIntTrunk, LayerManFrz, FiManIntSmBranch, LayerManFrz, FiManIntLgBranch, LayerManFrz, FiManBranchCoupling, FreezeFittingLayer, FiManTrunkCap, LayerManCapFrz)
# Filter Caps
# Top Cap Ring
D_FiTopRingOuter := 14 in
Dist_CentToRodTop := 6.6739 in
Dist_CentToStuds := 5.6525 in
D_FiTopRingInner := 10 in
D_FiRodHoles := 5/16*in
H_FiCap := 3/8*in
LayerCaps := layer_new("FiCap", grey)
DrawTopRingOuter := CylinderF(FiPipe_Origin + [0 m; 0 m; L_FiBodyPipe], D_FiTopRingOuter/2, H_FiCap, [0; 90]*deg)
FreezeCapLayer := FreezeLayer("FiCap")
DrawTopRingInner := CylinderF(FiPipe_Origin + [0 m; 0 m; L_FiBodyPipe], D_FiTopRingInner/2, H_FiCap, [0; 90]*deg)
DrawRodHolesTop := CylinderF(FiPipe_Origin + [Dist_CentToRodTop; 0 m; L_FiBodyPipe], D_FiRodHoles/2, H_FiCap, [0; 90]*deg)
ArrayRodHolesTop := ArrayLastPolar(FiPipe_Origin + [0 m; 0 m; L_FiBodyPipe], 6, 360 deg)
DrawStudHoles := CylinderF(FiPipe_Origin + [Dist_CentToStuds; 0 m; L_FiBodyPipe], D_FiRodHoles/2, H_FiCap, [0; 90]*deg)
ArrayStudHoles := ArrayLastPolar(FiPipe_Origin + [0 m; 0 m; L_FiBodyPipe], 6, 360 deg)
SubtractFromCapLayer := SubtractF(["FiCap"], "DeleteMe")
FiTopCapRing := stack(LayerCaps, DrawTopRingOuter, FreezeCapLayer, DrawTopRingInner, DrawRodHolesTop, ArrayRodHolesTop, DrawStudHoles, ArrayStudHoles, GroupDelete, SubtractFromCapLayer, FreezeCapLayer)
# Access Cap
D_AccessCap := 12 in
D_FiBWHole := 1.484 in
D_BedTestHole := 1.141 in
D_ClearanceHole := .266 in
SelectLayerCaps := SelectLayer("FiCap")
DrawAccessCap := CylinderF(FiPipe_Origin + [0 m; 0 m; L_FiBodyPipe + H_FiCap], D_AccessCap/2, H_FiCap, [0; 90]*deg)
DrawBWHole := CylinderF(FiPipe_Origin + [0 m; 0 m; L_FiBodyPipe + H_FiCap], D_FiBWHole/2, H_FiCap, [0; 90]*deg)
DrawBedTestHole := CylinderF(FiPipe_Origin + [-D_BedTestHole/2; D_FiTopRingInner/2 - 3*D_BedTestHole/4; L_FiBodyPipe + H_FiCap], D_BedTestHole/2, H_FiCap, [0; 90]*deg)
DrawClearanceHole := CylinderF(FiPipe_Origin + [Dist_CentToStuds; 0 m; L_FiBodyPipe + H_FiCap], D_FiRodHoles/2, H_FiCap, [0; 90]*deg)
ArrayClearanceHoles := ArrayLastPolar(FiPipe_Origin + [0 m; 0 m; L_FiBodyPipe + H_FiCap], 6, 360 deg)
FiAccessCap := stack(SelectLayerCaps, DrawAccessCap, FreezeCapLayer, DrawBWHole, DrawBedTestHole, DrawClearanceHole, ArrayClearanceHoles, GroupDelete, SubtractFromCapLayer, FreezeCapLayer)
# Bottom Cap
D_BottomCap := 14.5 in
Dist_CentToRodBottom := 6.684 in
DrawBottomCap := CylinderF(FiPipe_Origin + [0 m; 0 m; -H_FiCap], D_BottomCap/2, H_FiCap, [0; 90]*deg)
DrawRodHolesBottom := CylinderF(FiPipe_Origin + [Dist_CentToRodBottom; 0 m; -H_FiCap], D_FiRodHoles/2, H_FiCap, [0; 90]*deg)
ArrayRodHolesBottom := ArrayLastPolar(FiPipe_Origin + [0 m; 0 m; -H_FiCap], 6, 360 deg)
FiBottomCap := stack(SelectLayerCaps, DrawBottomCap, FreezeCapLayer, DrawRodHolesBottom, ArrayRodHolesBottom, GroupDelete, SubtractFromCapLayer)
# [component: inputs stack(FiBodyPipe, FiManInt)]
# Inlet Manifold
FiInManLayer := layer_new("FiInManPlu", yellow)
FreezeLayerInMan := FreezeLayer("FiInManPlu")
L_FiInBushingtoBodyPipe := 2.5 in
L_FiInBushingtoElbowPipe := 5 in
ND_FiManPipe := 2 in
DrawBushingtoBodyPipe :=
    Script ← FiInManLayer
    for i ∈ 0 .. 3
        PipeIn ← PipeF(FiPipe_Origin + [
            -(L_FiManIntBranchStart + S_FiManIntBranch) - (CouplingLength(ND_FiManIntTrunk) - 2*SocketDepth(ND_FiManIntTrunk));
            0 m;
            i*S_FiInletMan + 3 cm
        ], L_FiInBushingtoBodyPipe, [0; 0]*deg, ND_FiManIntTrunk, PS_FiBranch)
        Script ← stack(Script, PipeIn)
    return stack(Script, FreezeFittingLayer)
DrawBushings :=
    Script ← SelectLayer("FiFittingPlu")
    for i ∈ 0 .. 3
        Bushing ← bushingReducerF(FiPipe_Origin + [
            -(L_FiManIntBranchStart + S_FiManIntBranch) - (CouplingLength(ND_FiManIntTrunk) - 2*SocketDepth(ND_FiManIntTrunk)) - L_FiInBushingtoBodyPipe - SocketDepth(ND_FiManPipe);
            0 m;
            i*S_FiInletMan + 3 cm
        ], [0; 0; 0]*deg, ND_FiManPipe, ND_FiManIntTrunk, PS_FiBranch)
        Script ← stack(Script, Bushing)
    return stack(Script, FreezeFittingLayer)
DrawBushingtoElbowPipe :=
    Script ← SelectLayer("FiInManPlu")
    for i ∈ 0 .. 3
        Pipe ← PipeF(FiPipe_Origin + [
            -(L_FiManIntBranchStart + S_FiManIntBranch) - (CouplingLength(ND_FiManIntTrunk) - 2*SocketDepth(ND_FiManIntTrunk)) - L_FiInBushingtoBodyPipe;
            0 m;
            i*S_FiInletMan + 3 cm
        ], L_FiInBushingtoElbowPipe, [0; 0]*deg, ND_FiManPipe, PS_FiBranch)
        Script ← stack(Script, Pipe)
    return stack(Script, FreezeLayerInMan)
DrawInletManElbows :=
    Script ← SelectLayer("FiFittingPlu")
    for i ∈ 0 .. 3
        Elbow ← ElbowF(FiPipe_Origin + [
            -(L_FiManIntBranchStart + S_FiManIntBranch) - (CouplingLength(ND_FiManIntTrunk) - 2*SocketDepth(ND_FiManIntTrunk)) - L_FiInBushingtoBodyPipe - L_FiInBushingtoElbowPipe;
            0 m;
            i*S_FiInletMan + 3 cm
        ], [-90; 180; 0]*deg, ND_FiManPipe, PS_FiBranch)
        Script ← stack(Script, Elbow)
    return stack(Script, FreezeFittingLayer)
DrawInManCheckValves :=
    Script ← SelectLayer("FiFittingPlu")
    for i ∈ 0 .. 3
        Pipe ← PipeF(FiPipe_Origin + [
            -(L_FiManIntBranchStart + S_FiManIntBranch) - (CouplingLength(ND_FiManIntTrunk) - 2*SocketDepth(ND_FiManIntTrunk)) - L_FiInBushingtoBodyPipe - L_FiInBushingtoElbowPipe - ElbowRadius(ND_FiManPipe);
            0 m;
            i*S_FiInletMan + 3 cm
        ], L_FiInBushingtoElbowPipe, [0; 0]*deg, ND_FiManPipe, PS_FiBranch)
        Elbow ← ElbowF(FiPipe_Origin + [
            -(L_FiManIntBranchStart + S_FiManIntBranch) - (CouplingLength(ND_FiManIntTrunk) - 2*SocketDepth(ND_FiManIntTrunk)) - L_FiInBushingtoBodyPipe - L_FiInBushingtoElbowPipe;
            0 m;
            i*S_FiInletMan + 3 cm
        ], [-90; 180; 0]*deg, ND_FiManPipe, PS_FiBranch)
        Script ← stack(Script, Elbow)
    return stack(Script, FreezeFittingLayer)
FiInletManifold := stack(DrawBushingtoBodyPipe, DrawBushings, DrawBushingtoElbowPipe, DrawInletManElbows)
# [component: inputs stack(FiBodyPipe, FiManInt, FiInletManifold)]
insertdwg("https://confluence.cornell.edu/download/attachments/173604905/Floc-Scaled-Gate-Valve-Threaded.dwg", FlocValve_Origin, D_FlocScale, D_FlocScale, 90 deg)
