# Stacked Rapid Sand Filter
L_FiInletChannel :=
    W_FiEntrance if N_Fi == 1
    W_FiOverflow + 2*W_FiEntrance + 2*T_PlantWall if N_Fi == 2
    2*(W_FiOverflow + 2*W_FiEntrance + T_PlantWall) + W_Fi + 2*T_FiWall - W_FiEntrance - T_PlantWall otherwise
# Filter Y Position (not currently used)
Y_FlocTopWall := Floc_Origin[1] + (T_PlantWall + W_FlocChannel)*N_FlocChannels
L_FiOriginToBottomFiNoWall := (W_Fi + T_PlantWall)*(N_Fi - 1)
L_FiEntranceDividedLarger := 4*ConRadius(ND_FiTrunk) + 2*SocketDepth(ND_FiTrunk) + 2*ElbowRadius(ND_FiTrunk) + 2*S_Fitting
YDiffFiEntrancePipeFromSed := SedOutletVertPipe_Origin[1] - Y_FlocTopWall - T_FiWall - W_Fi - L_FiOriginToBottomFiNoWall + W_Fi/2 - L_FiEntranceDividedLarger
FiShiftY :=
    max(YDiffFiEntrancePipeFromSed, 0) if YDiffFiEntrancePipeFromSed < (ConRadius(ND_FiEntrancePipe) + S_Fitting)
    0 otherwise
# Concrete Box Origin Points
Fi_origin := [
    Plant_Origin[0] - W_FiInletChannel - 5*T_PlantWall - T_FiWall - L_FiEntrance - L_FiExit - W_MpWalkway - L_Sed - W_PlantDC;
    Et_Origin[1] + W_Et + T_PlantWall - W_EtChemPlatform - W_EtWalkway - W_Fi - T_FiWall;
    Z_FiBottom
] = [-11.0159; 6.02815; -2.24119] m
FiEntranceBox_origin := [
    Plant_Origin[0] - W_FiInletChannel - 3*T_PlantWall - L_Sed - W_PlantDC;
    Fi_origin[1] + W_Fi/2 - W_FiEntrance + S_Fitting + ConRadius(ND_FiBwTrunk);
    Z_FiEntranceBottom
]
FiExitBox_origin := FiEntranceBox_origin + [-L_FiEntrance - T_PlantWall; 0; 0]
FiInletChannel_Origin := [
    Plant_Origin[0] - L_Sed - 2*T_PlantWall - W_PlantDC;
    FiEntranceBox_origin[1] - (W_FiEntrance + W_FiOverflow + 2*T_PlantWall);
    Z_FiInletChannelBottom
]
FiOverflowBox_Origin := FiEntranceBox_origin + [0; -T_PlantWall - W_FiOverflow; 0]
FiDistTank_Origin := [-L_FiOverflow - T_PlantWall; 0; 0] + FiOverflowBox_Origin
# Coupling Origin Points
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# This will be the pipe layout in the entrance and exit boxes to allow for 2 90 degree elbows in  Pipes 2 and 3 coming from the entrance box (on the right)
FiInletCoupling1_origin := [
    FiEntranceBox_origin[0] - L_FiEntrance + T_ConcreteMin + ConRadius(ND_FiTrunk);
    FiEntranceBox_origin[1] + W_FiEntrance - ConRadius(ND_FiBwTrunk) - S_Fitting;
    FiEntranceBox_origin[2] - CouplingLength(ND_FiTrunk) + SocketDepth(ND_FiTrunk)
]
FiBwInletCoupling_origin := [
    FiInletCoupling1_origin[0] + L_FiOverflowWeir - S_Fitting - 2*ConRadius(ND_FiBwTrunk);
    FiInletCoupling1_origin[1];
    FiEntranceBox_origin[2] - CouplingLength(ND_FiBwTrunk) + SocketDepth(ND_FiBwTrunk)
]
FiInletCoupling2_origin := [
    FiEntranceBox_origin[0] - L_FiEntrance + L_FiOverflowWeir - (ConRadius(ND_FiTrunk) + S_Fitting);
    FiEntranceBox_origin[1] + 2*T_ConcreteMin + 3*ConRadius(ND_FiTrunk);
    FiInletCoupling1_origin[2]
]
FiInletCoupling3_origin := [
    FiEntranceBox_origin[0] - L_FiEntrance + T_ConcreteMin + ConRadius(ND_FiTrunk);
    FiEntranceBox_origin[1] + 2*T_ConcreteMin + 3*ConRadius(ND_FiTrunk);
    FiEntranceBox_origin[2] - CouplingLength(ND_FiTrunk) + SocketDepth(ND_FiTrunk)
]
FiExitCoupling0_origin := [
    FiExitBox_origin[0] - T_ConcreteMin - ConRadius(ND_FiTrunk);
    FiInletCoupling1_origin[1];
    FiExitBox_origin[2] - CouplingLength(ND_FiTrunk) + SocketDepth(ND_FiTrunk)
]
FiExitCoupling1_origin := [
    (FiExitBox_origin[0] - L_FiExit + T_ConcreteMin) + ConRadius(ND_FiTrunk);
    FiInletCoupling1_origin[1];
    FiExitBox_origin[2] - CouplingLength(ND_FiTrunk) + SocketDepth(ND_FiTrunk)
]
FiExitCoupling3_origin := [
    FiExitBox_origin[0] - T_ConcreteMin - ConRadius(ND_FiTrunk);
    FiExitBox_origin[1] + T_ConcreteMin + ConRadius(ND_FiTrunk);
    FiExitBox_origin[2] - CouplingLength(ND_FiExitWaste) + SocketDepth(ND_FiExitWaste)
]
FiExitCoupling2_origin := [
    (FiExitBox_origin[0] - L_FiExit + T_ConcreteMin) + ConRadius(ND_FiExitWaste);
    FiExitBox_origin[1] + T_ConcreteMin + ConRadius(ND_FiTrunk);
    FiExitBox_origin[2] - CouplingLength(ND_FiTrunk) + SocketDepth(ND_FiTrunk)
]
FiInnerFerncoBwCoupling_origin := [Fi_origin[0]; FiBwInletCoupling_origin[1]; Fi_origin[2] + outerradius(ND_FiBwManBranch)]
FiOuterFerncoBwCoupling_origin := [Fi_origin[0] + T_FiWall; FiBwInletCoupling_origin[1]; Fi_origin[2] + outerradius(ND_FiBwManBranch)]
FiInnerFerncoCouplings_origin := [
    Fi_origin[0];
    FiInnerFerncoBwCoupling_origin[1];
    FiInnerFerncoBwCoupling_origin[2] + H_FiBottomLayer
]
FiOuterFerncoCouplings_origin := [
    Fi_origin[0] + T_FiWall;
    FiInnerFerncoBwCoupling_origin[1];
    FiInnerFerncoBwCoupling_origin[2] + H_FiBottomLayer
]
FiEntranceWeir_origin := [FiEntranceBox_origin[0] + T_PlantWall; FiEntranceBox_origin[1]; Z_FiEntranceWeir]
# Weir Origin Points
# Concrete Box Dimensions
FiEntranceBox_dim := [L_FiEntrance; W_FiEntrance; H_FiEntrance]
FiExitBox_dim := [L_FiExit; W_FiExit; H_FiExit]
Fi_dim := [L_Fi; W_Fi; H_Fi] = [0.965881; 1.98922; 3.95287] m
FiEntranceWeir_dim := [-T_PlantWall; W_FiEntrance; ZW_FiInletChannel + zc - Z_FiEntranceWeir + H_PlantFreeboard]
FiOverflowBox_Dim := [L_FiOverflow; W_FiOverflow; H_FiOverflow]
FiDistTank_Dim := [L_FiExit; W_FiOverflow; H_FiExit]
# Inlet Channel
LayerFiInletChannel := layer_new("FiInletchannelCon", grey)
FiInletChannel := Tank(FiInletChannel_Origin, [W_FiInletChannel; L_FiInletChannel; H_FiInletChannel], T_ChannelWall)
FreezeFiInletChannel := FreezeLayer("FiInletchannelCon")
FiEntWeir := BoxF(FiEntranceWeir_origin, FiEntranceWeir_origin + FiEntranceWeir_dim, [0; 0; 0]*deg)
ArrayFiEntWeir1 := ArrayLast(2, 1, -FiEntranceWeir_dim[1] - 2*T_PlantWall - W_FiOverflow)
ArrayFiEntWeir2 := array_all(N_Fi/2, 1, W_Fi + 2*T_FiWall)
SubtractEntWeir := SubtractF(["FiInletchannelCon"], "DeleteMe")
FiInletChannelScript :=
    stack(LayerFiInletChannel, FiInletChannel, FreezeFiInletChannel, FiEntWeir, GroupDelete, SubtractEntWeir) if N_Fi == 1
    stack(LayerFiInletChannel, FiInletChannel, FreezeFiInletChannel, FiEntWeir, ArrayFiEntWeir1, GroupDelete, SubtractEntWeir) if N_Fi == 2
    stack(LayerFiInletChannel, FiInletChannel, FreezeFiInletChannel, FiEntWeir, ArrayFiEntWeir1, ArrayFiEntWeir2, GroupDelete, SubtractEntWeir) otherwise
# Filter Box Concrete
LayerFiTank := layer_new("FiTankCon", grey)
FiTank := Tank(Fi_origin, Fi_dim, T_FiWall)
LayerFiTankFreeze := FreezeLayer("FiTankCon")
FiTankScript := stack(LayerFiTank, FiTank, LayerFiTankFreeze)
# Manifold Key Pipe (not currently stacked/drawn)
FiKeyPipeLayer := layer_new("FiKeypipePlu", blue)
DrawFiKeyPipeCap := CapSUBF([
    -L_Fi + ConRadius(ND_FiKeyPipe);
    W_Fi/2;
    -CapHeight(ND_FiKeyPipe) + ConRadius(ND_FiKeyPipe) - outerradius(ND_FiKeyPipe) - ConRadius(ND_FiBwTrunk) + ConRadius(ND_FiBwManBranch)
] + Fi_origin, [0; 90; 0]*deg, ND_FiKeyPipe, ["FiTankCon"])
DrawFiKeyPipeBottom := PipeF([
    -L_Fi + ConRadius(ND_FiKeyPipe);
    W_Fi/2;
    -CapHeight(ND_FiKeyPipe) + ConRadius(ND_FiKeyPipe) - outerradius(ND_FiKeyPipe) - ConRadius(ND_FiBwTrunk) + ConRadius(ND_FiBwManBranch)
] + Fi_origin, ConRadius(ND_FiBwTrunk) - ConRadius(ND_FiBwManBranch) + N_FiLayer*H_FiLayer + ConRadius(ND_FiBwManBranch) + ConRadius(ND_FiTrunk) + CapHeight(ND_FiKeyPipe) + outerradius(ND_FiKeyPipe) - ShortTeeLength(ND_FiKeyPipe), [0; 90]*deg, ND_FiKeyPipe, PS_Default)
DrawFiKeyPipeTee := TeeF([
    -L_Fi + ConRadius(ND_FiKeyPipe) + ShortTeeLength(ND_FiKeyPipe);
    W_Fi/2;
    N_FiLayer*H_FiLayer + ConRadius(ND_FiBwManBranch) + ConRadius(ND_FiTrunk) + ConRadius(ND_FiKeyPipe)
] + Fi_origin, [270; 0; 90]*deg, ND_FiKeyPipe, PS_Default)
DrawFiKeyPipeTop := PipeF([
    -L_Fi + ConRadius(ND_FiKeyPipe);
    W_Fi/2;
    N_FiLayer*H_FiLayer + ConRadius(ND_FiBwManBranch) + ConRadius(ND_FiTrunk) + ConRadius(ND_FiKeyPipe) + ShortTeeLength(ND_FiKeyPipe)
] + Fi_origin, H_Fi - (N_FiLayer*H_FiLayer + ConRadius(ND_FiBwManBranch) + ConRadius(ND_FiTrunk) + ConRadius(ND_FiKeyPipe) + ShortTeeLength(ND_FiKeyPipe)), [0; 90]*deg, ND_FiKeyPipe, PS_Default)
FreezeFiKeyPipe := FreezeLayer("FiKeypipePlu")
FiKeyPipeScript := stack(FiKeyPipeLayer, DrawFiKeyPipeCap, DrawFiKeyPipeBottom, DrawFiKeyPipeTee, DrawFiKeyPipeTop, FreezeFiKeyPipe)
# Filter Box Manifold Connections: Fernco Couplings and Through-wall Pipes
LayerFiFernco := layer_new("FiFerncoCouplingsPlu", purple)
FiInnerFerncoBwCoupling := FerncoCouplingF(FiInnerFerncoBwCoupling_origin, [0; 0; 0]*deg, ND_FiBwTrunk, L_FiManFerncoCoupling)
FiOuterFerncoBwCoupling := FerncoCouplingF(FiOuterFerncoBwCoupling_origin, [180; 0; 0]*deg, ND_FiBwTrunk, L_FiManFerncoCoupling)
FiInnerFerncoCoupling := FerncoCouplingF(FiInnerFerncoCouplings_origin, [0; 0; 0]*deg, ND_FiTrunk, L_FiManFerncoCoupling)
ArrayFiFernco := ArrayLast(6, 1, H_FiLayer)
FiOuterFerncoCoupling := FerncoCouplingF(FiOuterFerncoCouplings_origin, [180; 0; 0]*deg, ND_FiTrunk, L_FiManFerncoCoupling)
LayerFiFerncoFreeze := FreezeLayer("FiFerncoCouplingsPlu")
LayerFiConPipes := layer_new("FiManConPipePlu", blue3)
FiBwConPipe := PipeSUBF(FiOuterFerncoBwCoupling_origin + [L_FiManFerncoCoupling/2; 0 m; 0 m], T_FiWall + L_FiManFerncoCoupling, [0; 0; 0]*deg, ND_FiBwTrunk, PS_Default, ["FiTankCon"])
FiConPipe1 := PipeSUBF(FiOuterFerncoCouplings_origin + [L_FiManFerncoCoupling/2; 0 m; 0 m], T_FiWall + L_FiManFerncoCoupling, [0; 0; 0]*deg, ND_FiTrunk, PS_Default, ["FiTankCon"])
FiConPipe2 := PipeSUBF(FiOuterFerncoCouplings_origin + [L_FiManFerncoCoupling/2; 0 m; H_FiLayer], T_FiWall + L_FiManFerncoCoupling, [0; 0; 0]*deg, ND_FiTrunk, PS_Default, ["FiTankCon"])
FiConPipe3 := PipeSUBF(FiOuterFerncoCouplings_origin + [L_FiManFerncoCoupling/2; 0 m; 2*H_FiLayer], T_FiWall + L_FiManFerncoCoupling, [0; 0; 0]*deg, ND_FiTrunk, PS_Default, ["FiTankCon"])
FiConPipe4 := PipeSUBF(FiOuterFerncoCouplings_origin + [L_FiManFerncoCoupling/2; 0 m; 3*H_FiLayer], T_FiWall + L_FiManFerncoCoupling, [0; 0; 0]*deg, ND_FiTrunk, PS_Default, ["FiTankCon"])
FiConPipe5 := PipeSUBF(FiOuterFerncoCouplings_origin + [L_FiManFerncoCoupling/2; 0 m; 4*H_FiLayer], T_FiWall + L_FiManFerncoCoupling, [0; 0; 0]*deg, ND_FiTrunk, PS_Default, ["FiTankCon"])
FiConPipe6 := PipeSUBF(FiOuterFerncoCouplings_origin + [L_FiManFerncoCoupling/2; 0 m; 5*H_FiLayer], T_FiWall + L_FiManFerncoCoupling, [0; 0; 0]*deg, ND_FiTrunk, PS_Default, ["FiTankCon"])
FrzFiConPipes := FreezeLayer("FiManConPipePlu")
FiManConScript := stack(LayerFiFernco, FiInnerFerncoBwCoupling, FiOuterFerncoBwCoupling, FiInnerFerncoCoupling, view("f"), ArrayFiFernco, view("t"), FiOuterFerncoCoupling, view("f"), ArrayFiFernco, view("t"), LayerFiFerncoFreeze, LayerFiConPipes, FiBwConPipe, FiConPipe1, FiConPipe2, FiConPipe3, FiConPipe4, FiConPipe5, FiConPipe6, FrzFiConPipes)
# Exit Box Drain Channel Coupling
LayerFiExitDrainCoupling := layer_new("FiExitDrainCouplingPlu", green)
FiExitDrainCoupling := CouplingSUBF([
    FiInletChannel_Origin[0] + T_PlantWall - SocketDepth(ND_FiExitWaste);
    FiExitCoupling3_origin[1];
    Z_FiBwBottom + S_Fitting + ConRadius(ND_FiEntranceOverflow)
], [0; 0], ND_FiExitWaste, PS_Default, ["DrainChannelCon"])
LayerFiExitDrainCouplingFrz := FreezeLayer("FiExitDrainCouplingPlu")
FiExitDrainCouplingScript := stack(LayerFiExitDrainCoupling, FiExitDrainCoupling, LayerFiExitDrainCouplingFrz)
mirror1 := Mirror3dGroup("filtercouplings", "y", [Fi_origin[0]; Fi_origin[1] - T_PlantWall; Fi_origin[2]], "n")
# Manifold Trunks and Branch Receivers
ND_FiBwBranchHolder := 3 in
LayerFiBranchHolder := layer_new("FiBranchHolderPlu", blue)
FiBranchHolder := PipeF([
    Fi_origin[0] - CapThickness(ND_FiBranchHolder) - S_FiManAssembly;
    Fi_origin[1] + ConRadius(ND_FiBwBranchHolder);
    Fi_origin[2] + H_FiBottomLayer + outerradius(ND_FiBwManBranch)
], L_Fi - 2*CapThickness(ND_FiBranchHolder) - 2*S_FiManAssembly, [0; 0]*deg, ND_FiBranchHolder, PS_Default)
FiBranchHolderCapRight := CapF([
    Fi_origin[0] - CapThickness(ND_FiBranchHolder) - S_FiManAssembly;
    Fi_origin[1] + ConRadius(ND_FiBwBranchHolder);
    Fi_origin[2] + H_FiBottomLayer + outerradius(ND_FiBwManBranch)
], [0; 0]*deg, ND_FiBranchHolder)
FiBranchHolderCapLeft := CapF([
    Fi_origin[0] - L_Fi + S_FiManAssembly + CapThickness(ND_FiBranchHolder);
    Fi_origin[1] + ConRadius(ND_FiBwBranchHolder);
    Fi_origin[2] + H_FiBottomLayer + outerradius(ND_FiBwManBranch)
], [180; 0]*deg, ND_FiBranchHolder)
ArrayFiBranchHolder := Array_All(2, 1, W_Fi - 2*ConRadius(ND_FiBwBranchHolder))
FiBranchHolderFrz := FreezeLayer("FiBranchHolderPlu")
LayerTrunks := layer_new("FiTrunksPlu", blue)
FiTrunk := PipeF([
    Fi_origin[0] - L_FiManFerncoCoupling/2;
    FiBwInletCoupling_origin[1];
    Fi_origin[2] + H_FiBottomLayer + outerradius(ND_FiBwManBranch)
], L_FiTrunk, [0; 0]*deg, ND_FiTrunk, PS_Default)
FiTrunkCap := CapF([
    Fi_origin[0] - L_FiManFerncoCoupling/2 - L_FiTrunk;
    FiBwInletCoupling_origin[1];
    Fi_origin[2] + H_FiBottomLayer + outerradius(ND_FiBwManBranch)
], [180; 0]*deg, ND_FiTrunk)
FreezeFiTrunkLayer := FreezeLayer("FiTrunksPlu")
FiTrunkOrifice := CylinderF([
    Fi_origin[0] - L_FiManFerncoCoupling - B_FiManifoldBranch/2;
    Fi_origin[1] + ConRadius(ND_FiBwBranchHolder);
    Fi_origin[2] + H_FiBottomLayer + outerradius(ND_FiBwManBranch)
], outerradius(ND_FiManBranch), W_Fi - 2*ConRadius(ND_FiBwBranchHolder), [-90; 0]*deg)
ArrayFiTrunkOrifice := ArrayLast(1, N_FiManBranch/2, -B_FiManifoldBranch)
# GroupAll
SubtractFiTrunkOrifices := SubtractF(["FiTrunksPlu"], "DeleteMe")
SubtractFiHolderOrifices := SubtractF(["FiBranchHolderPlu"], "DeleteMe")
SelectFiHolder := SelectLayer("FiBranchHolderPlu")
SelectFiTrunk := SelectLayer("FiTrunksPlu")
ArrayFiTrunks := array_all(N_FiLayer, 1, H_FiLayer)
# FreezeFiTrunkLayer
LayerBwTrunk := layer_new("FiBwTrunkPlu", blue)
BwTrunk := PipeF([
    Fi_origin[0] - L_FiManFerncoCoupling/2;
    FiBwInletCoupling_origin[1];
    Fi_origin[2] + outerradius(ND_FiBwManBranch)
], L_FiBwTrunk, [0; 0]*deg, ND_FiBwTrunk, PS_Default)
FiBwTrunkCap := CapF([
    Fi_origin[0] - L_FiManFerncoCoupling/2 - L_FiBwTrunk;
    FiBwInletCoupling_origin[1];
    Fi_origin[2] + outerradius(ND_FiBwManBranch)
], [180; 0; 0]*deg, ND_FiBwTrunk)
FreezeBwTrunkLayer := FreezeLayer("FiBwTrunkPlu")
LayerBwBranchHolder := layer_new("FiBwBranchHolderPlu", blue)
FiBwBranchHolder := PipeF([
    Fi_origin[0] - CapThickness(ND_FiBwBranchHolder) - S_FiManAssembly;
    Fi_origin[1] + ConRadius(ND_FiBwBranchHolder);
    Fi_origin[2] + outerradius(ND_FiBwManBranch)
], L_Fi - 2*CapThickness(ND_FiBranchHolder) - 2*S_FiManAssembly, [0; 0]*deg, ND_FiBwBranchHolder, PS_Default)
FiBwBranchHolderCapRight := CapF([
    Fi_origin[0] - CapThickness(ND_FiBwBranchHolder) - S_FiManAssembly;
    Fi_origin[1] + ConRadius(ND_FiBwBranchHolder);
    Fi_origin[2] + outerradius(ND_FiBwManBranch)
], [0; 0; 0]*deg, ND_FiBwBranchHolder)
FiBwBranchHolderCapLeft := CapF([
    Fi_origin[0] - L_Fi + S_FiManAssembly + CapThickness(ND_FiBwBranchHolder);
    Fi_origin[1] + ConRadius(ND_FiBwBranchHolder);
    Fi_origin[2] + outerradius(ND_FiBwManBranch)
], [180; 0; 0]*deg, ND_FiBwBranchHolder)
FreezeBwHolderLayer := FreezeLayer("FiBwBranchHolderPlu")
FiBwTrunkOrifice := CylinderF([
    Fi_origin[0] - L_FiManFerncoCoupling - B_FiManifoldBranch/2;
    Fi_origin[1] + ConRadius(ND_FiBwBranchHolder);
    Fi_origin[2] + outerradius(ND_FiBwManBranch)
], outerradius(ND_FiBwManBranch), W_Fi - 2*ConRadius(ND_FiBwBranchHolder), [-90; 0]*deg)
ArrayFiBwTrunkOrifice := ArrayLast(1, N_FiManBranch/2, -B_FiManifoldBranch)
# GroupAll
SubtractFiBwTrunkOrifices := SubtractF(["FiBwTrunkPlu"], "DeleteMe")
SubtractFiBwHolderOrifices := SubtractF(["FiBwBranchHolderPlu"], "DeleteMe")
FiBwTrunkCutout := BoxF([
    Fi_origin[0];
    Fi_origin[1] + W_Fi/2 - ConRadius(ND_FiBwTrunk);
    Fi_origin[2] - max(ConRadius(ND_FiBwTrunk), FerncoOuterDiameter(ND_FiBwTrunk)/2) + outerradius(ND_FiBwManBranch)
], [Fi_origin[0] - L_Fi; Fi_origin[1] + W_Fi/2 + ConRadius(ND_FiBwTrunk); Fi_origin[2]], [0; 0; 0]*deg)
FiBwBranchHolderCutout1 := BoxF([
    Fi_origin[0];
    Fi_origin[1];
    Fi_origin[2] - ConRadius(ND_FiBwBranchHolder) + outerradius(ND_FiBwManBranch)
], [Fi_origin[0] - L_Fi; Fi_origin[1] + 2*ConRadius(ND_FiBwBranchHolder); Fi_origin[2]], [0; 0; 0]*deg)
FiBwBranchHolderCutout2 := BoxF([
    Fi_origin[0];
    Fi_origin[1] + W_Fi;
    Fi_origin[2] - ConRadius(ND_FiBwBranchHolder) + outerradius(ND_FiBwManBranch)
], [Fi_origin[0] - L_Fi; Fi_origin[1] + W_Fi - 2*ConRadius(ND_FiBwBranchHolder); Fi_origin[2]], [0; 0; 0]*deg)
SubtractBwTrunkCutouts := SubtractF(["FiTankCon"], "DeleteMe")
FiTrunks := stack(LayerFiBranchHolder, FiBranchHolder, FiBranchHolderCapRight, FiBranchHolderCapLeft, ArrayFiBranchHolder, FiBranchHolderFrz, LayerTrunks, FiTrunk, FiTrunkCap, FreezeFiTrunkLayer, FiTrunkOrifice, ArrayFiTrunkOrifice, GroupDelete, SubtractFiTrunkOrifices, FiTrunkOrifice, ArrayFiTrunkOrifice, GroupDelete, SubtractFiHolderOrifices, SelectFiTrunk, view("f"), ArrayFiTrunks, view("t"), FreezeFiTrunkLayer, SelectFiHolder, view("f"), ArrayFiTrunks, view("t"), FiBranchHolderFrz)
FiBwTrunk := stack(LayerBwTrunk, BwTrunk, FiBwTrunkCap, FreezeBwTrunkLayer, LayerBwBranchHolder, FiBwBranchHolder, FiBwBranchHolderCapRight, FiBwBranchHolderCapLeft, ArrayFiBranchHolder, FreezeBwHolderLayer, FiBwTrunkOrifice, ArrayFiBwTrunkOrifice, GroupDelete, SubtractFiBwTrunkOrifices, FiBwTrunkOrifice, ArrayFiBwTrunkOrifice, GroupDelete, SubtractFiBwHolderOrifices, FiBwTrunkCutout, FiBwBranchHolderCutout1, FiBwBranchHolderCutout2, GroupDelete, SubtractBwTrunkCutouts)
FiTrunkScript := stack(FiTrunks, FiBwTrunk)
# Filter Branches (Slotted Pipes)
LayerMan := layer_new("FiManPlu", red)
FiManBranch := PipeF(Fi_origin + [
    -L_FiManFerncoCoupling - B_FiManifoldBranch/2;
    2*ConRadius(ND_FiBranchHolder) - L_FiManBranchExt;
    outerradius(ND_FiBwManBranch) + H_FiBottomLayer
], L_FiManBranch, [-90; 0]*deg, ND_FiManBranch, PS_FiBranch)
ArrayManBranches := array_all(1, N_FiManBranch/2, -B_FiManifoldBranch)
ArrayFiMan := array_all(N_FiLayer, 1, H_FiLayer)
FiManScript := stack(LayerMan, FiManBranch, ArrayManBranches, view("f"), ArrayFiMan, view("t"))
BwManBranch := PipeF(Fi_origin + [
    -L_FiManFerncoCoupling - B_FiManifoldBranch/2;
    2*ConRadius(ND_FiBranchHolder) - L_FiManBranchExt;
    outerradius(ND_FiBwManBranch)
], L_FiBwManBranch, [-90; 0]*deg, ND_FiBwManBranch, PS_FiBranch)
ArrayBwManBranches := ArrayLast(1, N_FiManBranch/2, -B_FiManifoldBranch)
MirrorFiManBranches := Mirror3dAll("zx", [Fi_origin[0]; Fi_origin[1] + W_Fi/2], "n")
FreezeFiManLayer := FreezeLayer("FiManPlu")
BwManScript := stack(BwManBranch, ArrayBwManBranches, MirrorFiManBranches, FreezeFiManLayer)
FiManifoldScript := stack(FiTrunkScript, FiManScript, BwManScript)
mirror2 := Mirror3dGroup("filter manifolds", "y", [Fi_origin[0]; Fi_origin[1] - T_PlantWall; Fi_origin[2]], "n")
mirrormanbranch := Mirror3dGroup("manifold branches", "y", [Fi_origin[0]; Fi_origin[1] - T_PlantWall; Fi_origin[2]], "n")
mirror3 := Mirror3dGroup("pipes", "y", [Fi_origin[0]; Fi_origin[1] - T_PlantWall; Fi_origin[2]], "n")
mirror4 := Mirror3dGroup("SRSF filters", "y", [Fi_origin[0]; Fi_origin[1] - T_PlantWall; Fi_origin[2]], "n")
FiScript := stack(FiTankScript, FiManConScript, FiExitDrainCouplingScript, FiManifoldScript)
# Entrance and Exit Box Concrete
FiLayerFiEntExBoxes := layer_new("FiEntexitboxesCon", grey)
FiExitBox := Tank(FiExitBox_origin + [0 m; 0 m; H_FiExit - FiExitBox_dim[2]], FiExitBox_dim, T_PlantWall)
FiEntBox := Tank(FiEntranceBox_origin + [0 m; 0 m; H_FiEntrance - FiEntranceBox_dim[2]], FiEntranceBox_dim, T_PlantWall)
FiLayerFiEntExBoxesFreeze := FreezeLayer("FiEntexitboxesCon")
FiAirRemovalBlockSlot := BoxF([
    FiEntranceBox_origin[0] - L_FiEntrance + L_FiOverflowWeir;
    FiEntranceBox_origin[1] - T_ConcreteMin;
    Z_FiAirRemovalBlockBottom
], [
    FiEntranceBox_origin[0] - L_FiEntrance + L_FiOverflowWeir;
    FiEntranceBox_origin[1] + T_ConcreteMin;
    Z_FiEntranceBottom + H_FiEntrance
] + [W_FiAirRemovalBlock; W_FiEntrance; 0], [0; 0; 0])
FiBaffle := BoxF([FiEntranceBox_origin[0]; FiEntranceBox_origin[1] - T_ConcreteMin; Z_FiEntranceBottom] + [-S_FiEntranceBaffle; 0; S_FiEntranceBaffle], [FiEntranceBox_origin[0]; FiEntranceBox_origin[1]; Z_FiEntranceBottom] + [-S_FiEntranceBaffle - T_SedWeir; W_FiEntrance + T_ConcreteMin; H_FiEntrance], [0; 0; 0])
FiSubtractEntExWeirs := SubtractF(["FiEntexitboxesCon"], "DeleteMe")
FiBaffleLayer := layer_new("FiBaffles", ltgrey)
FiAirRemovalBlock := BoxF([
    FiEntranceBox_origin[0] - S_FiEntranceBaffle - T_SedWeir - S_FiBaffleToBlock;
    FiEntranceBox_origin[1] - T_ConcreteMin;
    Z_FiAirRemovalBlockBottom
], [
    FiEntranceBox_origin[0] - S_FiEntranceBaffle - 2*T_SedWeir - S_FiBaffleToBlock;
    FiEntranceBox_origin[1] + T_ConcreteMin + W_FiEntrance;
    Z_FiAirRemovalBlockTop
], [0; 0; 0])
FiBaffleLayerFrz := FreezeLayer("FiBaffles")
FiBaffles := stack(FiBaffleLayer, FiBaffle, FiAirRemovalBlock, FiBaffleLayerFrz)
FiEntExTankScript := stack(FiLayerFiEntExBoxes, FiEntBox, FiExitBox, Union_All, FiLayerFiEntExBoxesFreeze, FiAirRemovalBlockSlot, FiBaffle, FiEntWeir, GroupDelete, FiSubtractEntExWeirs, FiBaffles)
# Entrance and Exit Box Couplings
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# This will be the pipe layout in the entrance and exit boxes to allow for 2 90 degree elbows in  Pipes 2 and 3 coming from the entrance box (on the right)
FiLayerEntExCoupling := layer_new("FiEntexitcouplingsPlu", green)
FiExCoupling0 := CouplingSUBF(FiExitCoupling0_origin, [0; 90]*deg, ND_FiTrunk, PS_Default, ["FiEntexitboxesCon"])
FiExCoupling1 := CouplingSUBF(FiExitCoupling1_origin, [0; 90]*deg, ND_FiTrunk, PS_Default, ["FiEntexitboxesCon"])
FiExCoupling3 := CouplingSUBF(FiExitCoupling2_origin, [0; 90]*deg, ND_FiTrunk, PS_Default, ["FiEntexitboxesCon"])
FiExCoupling2 := CouplingSUBF(FiExitCoupling3_origin, [0; 90]*deg, ND_FiExitWaste, PS_Default, ["FiEntexitboxesCon"])
FiEntCoupling0 := CouplingSUBF(FiBwInletCoupling_origin, [0; 90]*deg, ND_FiBwTrunk, PS_Default, ["FiEntexitboxesCon"])
FiEntCoupling1 := CouplingSUBF(FiInletCoupling1_origin, [0; 90]*deg, ND_FiTrunk, PS_Default, ["FiEntexitboxesCon"])
FiEntCoupling2 := CouplingSUBF(FiInletCoupling2_origin, [0; 90]*deg, ND_FiTrunk, PS_Default, ["FiEntexitboxesCon"])
FiEntCoupling3 := CouplingSUBF(FiInletCoupling3_origin, [0; 90]*deg, ND_FiTrunk, PS_Default, ["FiEntexitboxesCon"])
FiLayerFreezeEntExCouplings := FreezeLayer("FiEntexitcouplingsPlu")
FiEntExCouplingScript := stack(FiLayerEntExCoupling, FiExCoupling0, FiExCoupling1, FiExCoupling2, FiExCoupling3, FiEntCoupling0, FiEntCoupling1, FiEntCoupling2, FiEntCoupling3, FiLayerFreezeEntExCouplings)
mirror5 := Mirror3dGroup("controlcouplings", "y", [Fi_origin[0]; Fi_origin[1] - T_PlantWall; Fi_origin[2]], "n")  # Needs to be checked for N.Fi=2
# Entrance and Exit Plumbing
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# This is all of the piping between filter box, entrance and exit
# In means the pipe goes IN TO THE FILTER
# Out means it comes OUT OF THE FILTER
FiLayerFiPlu := layer_new("FiPlu", blue)
Z_FiInPipe0aStart := FiEntranceBox_origin[2] - CouplingLength(ND_FiBwTrunk) + SocketDepth(ND_FiBwTrunk)
Z_FiInPipe0aEnd := Fi_origin[2] + outerradius(ND_FiBwManBranch) + ShortTeeLength(ND_FiBwTrunk)
outerdiameter(8 in) =  # no stored result
outerdiameter(6 in) =  # no stored result
FiInPipe0a := PipeSUBF(FiBwInletCoupling_origin, FiBwInletCoupling_origin[2] - Z_FiInPipe0aEnd, [0; 270]*deg, ND_FiBwTrunk, PS_Default, ["FiEntexitboxesCon"])  # F
2*OuterRadiusFlex(6 in) =  # no stored result
FiInTee0a := TeeF([FiBwInletCoupling_origin[0]; FiBwInletCoupling_origin[1]; Z_FiInPipe0aEnd], [0; 0; 90]*deg, ND_FiBwTrunk, PS_Default)
X_FiBwTrunkPipeEnd := Fi_origin[0] + T_FiWall + L_FiManFerncoCoupling/2
FiInPipe0b := PipeSUBF([
    FiBwInletCoupling_origin[0] - ShortTeeLength(ND_FiBwTrunk);
    FiBwInletCoupling_origin[1];
    Z_FiInPipe0aEnd - ShortTeeLength(ND_FiBwTrunk)
], FiBwInletCoupling_origin[0] - TeeLength(ND_FiBwTrunk)/2 - X_FiBwTrunkPipeEnd, [0; 0]*deg, ND_FiBwTrunk, PS_Default, ["FiTankCon"])
FiInReducerLarge := CylinderF([
    FiBwInletCoupling_origin[0] + ShortTeeLength(ND_FiBwTrunk) + 10 cm;
    FiBwInletCoupling_origin[1];
    Z_FiInPipe0aEnd - ShortTeeLength(ND_FiBwTrunk)
], innerdiameter(ND_FiBwTrunk, PS_Default)/2, 10 cm, [0; 0]*deg)
FiInReducerSmall := CylinderF([
    FiBwInletCoupling_origin[0] + ShortTeeLength(ND_FiBwTrunk) + 2*10*cm;
    FiBwInletCoupling_origin[1];
    Z_FiInPipe0aEnd - ShortTeeLength(ND_FiBwTrunk)
], innerdiameter(3 in, PS_Default)/2, 10 cm, [0; 0]*deg)
FiInValve := insertdwg("VAL-Scaled-Gate-Valve-Threaded", [
    FiBwInletCoupling_origin[0] + ShortTeeLength(ND_FiBwTrunk) + 2*10*cm + 0.6*ValveLength(3 in);
    FiBwInletCoupling_origin[1];
    Z_FiInPipe0aEnd - ShortTeeLength(ND_FiBwTrunk)
], 3 in/(1.16 m), 3 in/(1.16 m), 0 deg)
# The valve length and socket functions are not returning the correct numbers, so for now, I am arbitrarily setting the valve over by 60% of its length as returned by the function
FiIn0Script := stack(FiInPipe0a, FiInTee0a, FiInPipe0b, FiInReducerLarge, FiInReducerSmall, FiInReducerLarge, FiInReducerSmall, FiInValve)
Z_FiInPipe1aEnd := Fi_origin[2] + outerradius(ND_FiBwManBranch) + H_FiBottomLayer + H_FiLayer + ElbowRadius(ND_FiTrunk)
FiInPipe1a := PipeSUBF(FiInletCoupling1_origin, FiInletCoupling1_origin[2] - Z_FiInPipe1aEnd, [0; 270]*deg, ND_FiTrunk, PS_Default, ["FiEntexitboxesCon"])
FiInElbow1a := ElbowF([FiInletCoupling1_origin[0]; FiInletCoupling1_origin[1]; Z_FiInPipe1aEnd], [0; 0; -90]*deg, ND_FiTrunk, PS_Default)
X_FiTrunkPipeEnd := Fi_origin[0] + T_FiWall + L_FiManFerncoCoupling/2
FiInPipe1b := PipeSUBF([
    FiInletCoupling1_origin[0] - ElbowRadius(ND_FiTrunk);
    FiBwInletCoupling_origin[1];
    Z_FiInPipe1aEnd - ElbowRadius(ND_FiTrunk)
], FiInletCoupling1_origin[0] - ElbowRadius(ND_FiTrunk) - X_FiTrunkPipeEnd, [0; 0]*deg, ND_FiTrunk, PS_Default, ["FiTankCon"])
FiIn1Script := stack(FiInPipe1a, FiInElbow1a, FiInPipe1b)
Z_FiInPipe2aEnd := Z_FiInPipe1aEnd + 2*H_FiLayer
FiInPipe2a := PipeSUBF(FiInletCoupling2_origin, FiInletCoupling2_origin[2] - Z_FiInPipe2aEnd, [0; 270]*deg, ND_FiTrunk, PS_Default, ["FiEntexitboxesCon"])
FiInElbow2a := ElbowF([FiInletCoupling2_origin[0]; FiInletCoupling2_origin[1]; Z_FiInPipe2aEnd], [0; 0; -90]*deg, ND_FiTrunk, PS_Default)
X_FiInPipe2bEnd := FiExitCoupling1_origin[0] - ConRadius(ND_FiTrunk) - T_ConcreteMin  # Gives 5 cm of clearance plus the elbow radius
FiInPipe2b := PipeF([
    FiInletCoupling2_origin[0] - ElbowRadius(ND_FiTrunk);
    FiInletCoupling2_origin[1];
    Z_FiInPipe2aEnd - ElbowRadius(ND_FiTrunk)
], FiInletCoupling2_origin[0] - ElbowRadius(ND_FiTrunk) - X_FiInPipe2bEnd, [0; 0]*deg, ND_FiTrunk, PS_Default)
FiInElbow2b := ElbowF([X_FiInPipe2bEnd; FiInletCoupling2_origin[1]; Z_FiInPipe2aEnd - ElbowRadius(ND_FiTrunk)], [-90; 180; 0]*deg, ND_FiTrunk, PS_Default)
Y_FiInPipe2cEnd := Fi_origin[1] + W_Fi/2 - ElbowRadius(ND_FiTrunk)  # This is BwTrunk because the Fi Trunks line up with that one
FiInPipe2c := PipeF([
    X_FiInPipe2bEnd - ElbowRadius(ND_FiTrunk);
    FiInletCoupling2_origin[1] + ElbowRadius(ND_FiTrunk);
    Z_FiInPipe2aEnd - ElbowRadius(ND_FiTrunk)
], Y_FiInPipe2cEnd - (FiInletCoupling2_origin[1] + ElbowRadius(ND_FiTrunk)), [-90; 0]*deg, ND_FiTrunk, PS_Default)
FiInElbow2c := ElbowF([
    X_FiInPipe2bEnd - ElbowRadius(ND_FiTrunk);
    Y_FiInPipe2cEnd;
    Z_FiInPipe2aEnd - ElbowRadius(ND_FiTrunk)
], [0; 0; 0]*deg, ND_FiTrunk, PS_Default)
FiInPipe2d := PipeSUBF([
    X_FiInPipe2bEnd - 2*ElbowRadius(ND_FiTrunk);
    Y_FiInPipe2cEnd + ElbowRadius(ND_FiTrunk);
    Z_FiInPipe2aEnd - ElbowRadius(ND_FiTrunk)
], X_FiInPipe2bEnd - 2*ElbowRadius(ND_FiTrunk) - X_FiTrunkPipeEnd, [0; 0]*deg, ND_FiTrunk, PS_Default, ["FiTankCon"])
FiIn2Script := stack(FiInPipe2a, FiInElbow2a, FiInPipe2b, FiInElbow2b, FiInPipe2c, FiInElbow2c, FiInPipe2d)
Z_FiInPipe3aEnd := Z_FiInPipe2aEnd + 2*H_FiLayer
FiInPipe3a := PipeSUBF(FiInletCoupling3_origin, FiInletCoupling3_origin[2] - Z_FiInPipe3aEnd, [0; 270]*deg, ND_FiTrunk, PS_Default, ["FiEntexitboxesCon"])
FiInElbow3a := ElbowF([FiInletCoupling3_origin[0]; FiInletCoupling3_origin[1]; Z_FiInPipe3aEnd], [0; 0; -90]*deg, ND_FiTrunk, PS_Default)
X_FiInPipe3bEnd := X_FiInPipe2bEnd
FiInPipe3b := PipeF([
    FiInletCoupling3_origin[0] - ElbowRadius(ND_FiTrunk);
    FiInletCoupling3_origin[1];
    Z_FiInPipe3aEnd - ElbowRadius(ND_FiTrunk)
], FiInletCoupling3_origin[0] - ElbowRadius(ND_FiTrunk) - X_FiInPipe3bEnd, [0; 0]*deg, ND_FiTrunk, PS_Default)
FiInElbow3b := ElbowF([X_FiInPipe3bEnd; FiInletCoupling3_origin[1]; Z_FiInPipe3aEnd - ElbowRadius(ND_FiTrunk)], [-90; 180; 0]*deg, ND_FiTrunk, PS_Default)
Y_FiInPipe3cEnd := Y_FiInPipe2cEnd
FiInPipe3c := PipeF([
    X_FiInPipe3bEnd - ElbowRadius(ND_FiTrunk);
    FiInletCoupling3_origin[1] + ElbowRadius(ND_FiTrunk);
    Z_FiInPipe3aEnd - ElbowRadius(ND_FiTrunk)
], Y_FiInPipe3cEnd - (FiInletCoupling3_origin[1] + ElbowRadius(ND_FiTrunk)), [-90; 0]*deg, ND_FiTrunk, PS_Default)
FiInElbow3c := ElbowF([
    X_FiInPipe3bEnd - ElbowRadius(ND_FiTrunk);
    Y_FiInPipe3cEnd;
    Z_FiInPipe3aEnd - ElbowRadius(ND_FiTrunk)
], [0; 0; 0]*deg, ND_FiTrunk, PS_Default)
FiInPipe3d := PipeSUBF([
    X_FiInPipe3bEnd - 2*ElbowRadius(ND_FiTrunk);
    Y_FiInPipe3cEnd + ElbowRadius(ND_FiTrunk);
    Z_FiInPipe3aEnd - ElbowRadius(ND_FiTrunk)
], X_FiInPipe3bEnd - 2*ElbowRadius(ND_FiTrunk) - X_FiTrunkPipeEnd, [0; 0]*deg, ND_FiTrunk, PS_Default, ["FiTankCon"])
FiIn3Script := stack(FiInPipe3a, FiInElbow3a, FiInPipe3b, FiInElbow3b, FiInPipe3c, FiInElbow3c, FiInPipe3d)
Z_FiOutPipe0aEnd := Z_FiInPipe1aEnd + H_FiLayer
FiOutPipe0a := PipeSUBF(FiExitCoupling0_origin, FiExitCoupling0_origin[2] - Z_FiOutPipe0aEnd, [0; -90]*deg, ND_FiTrunk, PS_Default, ["FiEntexitboxesCon"])
FiOutElbow0a := ElbowF([FiExitCoupling0_origin[0]; FiExitCoupling0_origin[1]; Z_FiOutPipe0aEnd], [0; 0; -90]*deg, ND_FiTrunk, PS_Default)
FiOutPipe0b := PipeSUBF([
    FiExitCoupling0_origin[0] - ElbowRadius(ND_FiTrunk);
    FiExitCoupling0_origin[1];
    Z_FiOutPipe0aEnd - ElbowRadius(ND_FiTrunk)
], FiExitCoupling0_origin[0] - ElbowRadius(ND_FiTrunk) - X_FiTrunkPipeEnd, [0; 0]*deg, ND_FiTrunk, PS_Default, ["FiTankCon"])
FiOut0Script := stack(FiOutPipe0a, FiOutElbow0a, FiOutPipe0b)
Z_FiOutPipe1aEnd := Z_FiOutPipe0aEnd + 2*H_FiLayer
FiOutPipe1a := PipeSUBF(FiExitCoupling1_origin, FiExitCoupling1_origin[2] - Z_FiOutPipe1aEnd, [0; -90]*deg, ND_FiTrunk, PS_Default, ["FiEntexitboxesCon"])
FiOutElbow1a := ElbowF([FiExitCoupling1_origin[0]; FiExitCoupling1_origin[1]; Z_FiOutPipe1aEnd], [0; 0; -90]*deg, ND_FiTrunk, PS_Default)
FiOutPipe1b := PipeSUBF([
    FiExitCoupling1_origin[0] - ElbowRadius(ND_FiTrunk);
    FiExitCoupling1_origin[1];
    Z_FiOutPipe1aEnd - ElbowRadius(ND_FiTrunk)
], FiExitCoupling1_origin[0] - ElbowRadius(ND_FiTrunk) - X_FiTrunkPipeEnd, [0; 0]*deg, ND_FiTrunk, PS_Default, ["FiTankCon"])
FiOut1Script := stack(FiOutPipe1a, FiOutElbow1a, FiOutPipe1b)
Z_FiOutPipe2aEnd := Z_FiBwBottom + S_Fitting + ElbowRadius(ND_FiExitWaste) + ConRadius(ND_FiExitWaste)
FiOutPipe2a := PipeSUBF(FiExitCoupling3_origin, FiExitCoupling2_origin[2] - Z_FiOutPipe2aEnd, [0; -90]*deg, ND_FiExitWaste, PS_Default, ["FiEntexitboxesCon"])
FiOutElbow2a := ElbowF([
    FiExitCoupling3_origin[0] + ElbowRadius(ND_FiExitWaste);
    FiExitCoupling3_origin[1];
    Z_FiOutPipe2aEnd - ElbowRadius(ND_FiExitWaste)
], [90; 0; 270]*deg, ND_FiExitWaste, PS_Default)
X_FiExitHorizDrainPipeStart := FiInletChannel_Origin[0] + T_PlantWall - CouplingLength(ND_FiExitWaste) + SocketDepth(ND_FiExitWaste)
X_FiExitHorizDrainPipeEnd := FiExitCoupling3_origin[0] + ElbowRadius(ND_FiExitWaste)
Z_FiExitDrainPipeEnd := Z_FiBwBottom + S_Fitting + ElbowRadius(ND_FiEntranceOverflow) + ConRadius(ND_FiEntranceOverflow) = -0.224496 m
FiExitDrainPipeHoriz := PipeSUBF([
    X_FiExitHorizDrainPipeStart;
    FiExitCoupling3_origin[1];
    Z_FiExitDrainPipeEnd - ElbowRadius(ND_FiEntranceOverflow)
], X_FiExitHorizDrainPipeStart - X_FiExitHorizDrainPipeEnd, [0; 0], ND_FiExitWaste, PS_Default, ["DrainChannelCon"])
FiOut2Script := stack(FiOutPipe2a, FiOutElbow2a, FiExitDrainPipeHoriz)
FiOut3PipeZ := PipeSUBF([
    FiExitCoupling2_origin[0];
    FiExitCoupling2_origin[1];
    Fi_origin[2] + ConRadius(ND_FiBwManBranch) + H_FiBottomLayer + ElbowRadius(ND_FiTrunk)
], FiExitCoupling2_origin[2] - (Fi_origin[2] + ConRadius(ND_FiBwManBranch) + H_FiLayer + ElbowRadius(ND_FiTrunk) + CouplingLength(ND_FiTrunk) - 2*SocketDepth(ND_FiTrunk)), [0; 90]*deg, ND_FiTrunk, PS_Default, ["FiEntexitboxesCon"])
FiOut3PipeX := PipeSUBF([
    FiExitCoupling2_origin[0] - ElbowRadius(ND_FiTrunk);
    FiExitCoupling0_origin[1];
    Fi_origin[2] + ConRadius(ND_FiBwManBranch) + H_FiBottomLayer
], FiExitCoupling2_origin[0] - (Fi_origin[0] + T_FiWall + L_FiManFerncoCoupling/2) - ElbowRadius(ND_FiTrunk), [0; 0]*deg, ND_FiTrunk, PS_Default, ["FiTankCon"])
FiOut3PipeY := PipeSUBF([
    FiExitCoupling2_origin[0];
    FiExitCoupling2_origin[1] + ElbowRadius(ND_FiTrunk);
    Fi_origin[2] + ConRadius(ND_FiBwManBranch) + H_FiBottomLayer
], FiExitCoupling0_origin[1] - FiExitCoupling2_origin[1] - 2*ElbowRadius(ND_FiTrunk), [270; 0]*deg, ND_FiTrunk, PS_Default, ["FiTankCon"])
FiOut3ElbowYZ := ElbowF([
    FiExitCoupling2_origin[0];
    FiExitCoupling2_origin[1] + ElbowRadius(ND_FiTrunk);
    Fi_origin[2] + ConRadius(ND_FiBwManBranch) + H_FiBottomLayer
], [180; 270; 0]*deg, ND_FiTrunk, PS_Default)
FiOut3ElbowXY := ElbowF([
    FiExitCoupling2_origin[0];
    FiExitCoupling0_origin[1] - ElbowRadius(ND_FiTrunk);
    Fi_origin[2] + ConRadius(ND_FiBwManBranch) + H_FiBottomLayer
], [0; 0; 0]*deg, ND_FiTrunk, PS_Default)
FiOut3Script := stack(FiOut3PipeZ, FiOut3PipeX, FiOut3PipeY, FiOut3ElbowYZ, FiOut3ElbowXY)
FiLayerFreezeFiPlu := FreezeLayer("FiPlu")
FiEntExitPipingScript := stack(FiLayerFiPlu, FiIn0Script, FiIn1Script, FiIn2Script, FiIn3Script, FiOut0Script, FiOut1Script, FiOut2Script, FiOut3Script, FiLayerFreezeFiPlu)
FiEntExitScript := stack(FiEntExTankScript, FiEntExCouplingScript, FiEntExitPipingScript)
mirror6 := Mirror3dGroup("controlpipes", "y", [Fi_origin[0]; Fi_origin[1] - T_PlantWall; Fi_origin[2]], "n")
mirror7 := Mirror3dGroup("SRSF controlboxes", "y", [Fi_origin[0]; Fi_origin[1] - T_PlantWall; Fi_origin[2]], "n")
# Auxiliary Concrete Tanks (Backwash, Distribution, and Overflow Boxes)
LayerFiOverflow := layer_new("FiOverflowCon", grey)
FiOverflowTank := Tank(FiOverflowBox_Origin, FiOverflowBox_Dim, T_PlantWall)
FiDistTank := Tank(FiDistTank_Origin, FiDistTank_Dim, T_PlantWall)
LayerFiOverflowFreeze := FreezeLayer("FiOverflowCon")
ArrayBaffleSlots := Array_All(2, 1, -W_FiEntrance - W_FiOverflow - 2*T_PlantWall)
SubtractBaffleSlotsOverflow := SubtractF(["FiOverflowCon"], "DeleteMe")
FiBwBoxLayer := layer_new("FiBwBoxCon", grey)
FiBwTank := Tank([
    FiInletChannel_Origin[0];
    {
        (min(Fi_origin[1] - T_FiWall/2, FiEntranceBox_origin[1] - T_PlantWall - W_FiOverflow/2) - L_FiBwWeir/2) if N_Fi > 1
        (0.5*(max(Fi_origin[1] + 2*(T_ConcreteMin + ConRadius(ND_FiSiphon)), FiEntranceBox_origin[1] + 2*(T_ConcreteMin + ConRadius(ND_FiTrunk))) + min(Fi_origin[1] - T_FiWall/2, FiEntranceBox_origin[1] - T_PlantWall - W_FiOverflow/2)) - L_FiBwWeir/2) otherwise
    };
    Z_FiBwBottom
], [W_FiBw; L_FiBwWeir; H_FiBw], T_PlantWall)
FreezeFiBwBox := FreezeLayer("FiBwBoxCon")
FiBwWeir := BoxF([
    FiInletChannel_Origin[0];
    {
        (min(Fi_origin[1] - T_FiWall/2, FiEntranceBox_origin[1] - T_PlantWall - W_FiOverflow/2) - L_FiBwWeir/2) if N_Fi > 1
        (0.5*(max(Fi_origin[1] + 2*(T_ConcreteMin + ConRadius(ND_FiSiphon)), FiEntranceBox_origin[1] + 2*(T_ConcreteMin + ConRadius(ND_FiTrunk))) + min(Fi_origin[1] - T_FiWall/2, FiEntranceBox_origin[1] - T_PlantWall - W_FiOverflow/2)) - L_FiBwWeir/2) otherwise
    };
    Z_FiBwWeir
], [
    FiInletChannel_Origin[0] + T_PlantWall;
    {
        (min(Fi_origin[1] - T_FiWall/2, FiEntranceBox_origin[1] - T_PlantWall - W_FiOverflow/2) + L_FiBwWeir/2) if N_Fi > 1
        (0.5*(max(Fi_origin[1] + 2*(T_ConcreteMin + ConRadius(ND_FiSiphon)), FiEntranceBox_origin[1] + 2*(T_ConcreteMin + ConRadius(ND_FiTrunk))) + min(Fi_origin[1] - T_FiWall/2, FiEntranceBox_origin[1] - T_PlantWall - W_FiOverflow/2)) + L_FiBwWeir/2) otherwise
    };
    Z_FiBwTop
], [0; 0; 0]*deg)
FiBwHalfBox := BoxF([
    FiInletChannel_Origin[0] + T_ChannelWall + zc;
    min(Fi_origin[1] - T_FiWall/2, FiEntranceBox_origin[1] - T_PlantWall - W_FiOverflow/2) - L_FiBwWeir/2 - T_ChannelWall - zc;
    Z_FiBwBottom - zc - T_ChannelWall
], [
    FiInletChannel_Origin[0] - W_FiBw - T_ChannelWall - zc;
    min(Fi_origin[1] - T_FiWall/2, FiEntranceBox_origin[1] - T_PlantWall - W_FiOverflow/2);
    Z_FiBwBottom + H_FiBw + zc
], [0; 0; 0]*deg)
# GroupDelete
SubtractBwWeir := SubtractF(["FiBwBoxCon"], "DeleteMe")
FiBw :=
    stack(FiBwBoxLayer, FiBwTank, FreezeFiBwBox, FiBwWeir, GroupDelete, SubtractBwWeir) if N_Fi == 1
    stack(FiBwBoxLayer, FiBwTank, FreezeFiBwBox, FiBwHalfBox, FiBwWeir, GroupDelete, SubtractBwWeir) otherwise
FiAuxTanksScript := stack(LayerFiOverflow, FiOverflowTank, FiDistTank, Union_All, LayerFiOverflowFreeze, FiBaffle, FiAirRemovalBlockSlot, ArrayBaffleSlots, GroupDelete, SubtractBaffleSlotsOverflow)
# Auxiliary Tank Couplings
LayerFiCoupling := layer_new("FiCouplingPlu", green)
FiOverflowToDistCoupling := CouplingSUBF([
    FiExitBox_origin[0] + T_PlantWall - SocketDepth(ND_DistPipe);
    min(Fi_origin[1] - T_FiWall/2, FiEntranceBox_origin[1] - T_PlantWall - W_FiOverflow/2);
    Z_FiOverflowBottom - 2*T_ConcreteMin - ConRadius(ND_DistPipe) + H_FiEntrance
], [0; 0]*deg, ND_DistPipe, PS_Default, ["FiOverflowCon"])
FiOverflowCoupling := CouplingSUBF([
    FiEntranceBox_origin[0] - L_FiEntrance/2;
    min(Fi_origin[1] - T_FiWall/2, FiEntranceBox_origin[1] - T_PlantWall - W_FiOverflow/2);
    Z_FiOverflowBottom - CouplingLength(ND_FiEntranceOverflow) + SocketDepth(ND_FiEntranceOverflow)
], [0; 90]*deg, ND_FiEntranceOverflow, PS_Default, ["FiOverflowCon"])
FiOverflowDrainCouplingHoriz := CouplingSUBF([
    FiInletChannel_Origin[0] + T_PlantWall - SocketDepth(ND_FiEntranceOverflow);
    min(Fi_origin[1] - T_FiWall/2, FiEntranceBox_origin[1] - T_PlantWall - W_FiOverflow/2);
    Z_FiBwBottom + S_Fitting + ConRadius(ND_FiEntranceOverflow)
], [0; 0], ND_FiEntranceOverflow, PS_Default, ["DrainChannelCon"])
DistCoupling := CouplingSUBF([
    FiExitBox_origin[0] - L_FiExit/2;
    min(Fi_origin[1] - T_FiWall/2, FiEntranceBox_origin[1] - T_PlantWall - W_FiOverflow/2);
    Z_FiOverflowBottom - CouplingLength(ND_DistPipe) + SocketDepth(ND_DistPipe)
], [0; 90]*deg, ND_DistPipe, PS_Default, ["FiOverflowCon"])
LayerFiCouplingFreeze := FreezeLayer("FiCouplingPlu")
FiAuxCouplingScript := stack(LayerFiCoupling, FiOverflowToDistCoupling, FiOverflowCoupling, FiOverflowDrainCouplingHoriz, DistCoupling, LayerFiCouplingFreeze)
# Auxiliary Pipes
# For all pipes, if the coupling does not extend out of the concrete floor, the pipe needs to extend 1 socket depth out of the concrete for the subsequent fitting.  If it does extend out of the concrete, we only want to the pipe length to be 2 socket depths: 1 for the coupling, 1 for the other fitting
LayerFiAuxPiping := layer_new("FiAuxPlu", blue)
FiOverflowConnectingPipe := PipeSUBF([
    FiExitBox_origin[0] + T_PlantWall + SocketDepth(ND_DistPipe) - CouplingLength(ND_DistPipe);
    min(Fi_origin[1] - T_FiWall/2, FiEntranceBox_origin[1] - T_PlantWall - W_FiOverflow/2);
    Z_FiOverflowBottom - 2*T_ConcreteMin - ConRadius(ND_DistPipe) + H_FiEntrance
], max(T_PlantWall - CouplingLength(ND_DistPipe) + 2*SocketDepth(ND_DistPipe), 2*SocketDepth(ND_DistPipe)), [0; 0]*deg, ND_DistPipe, PS_Default, ["FiOverflow"])
FiOverflowToDistElbow := ElbowF([
    FiExitBox_origin[0] + T_PlantWall - SocketDepth(ND_DistPipe) - CouplingLength(ND_DistPipe);
    min(Fi_origin[1] - T_FiWall/2, FiEntranceBox_origin[1] - T_PlantWall - W_FiOverflow/2);
    Z_FiOverflowBottom - 2*T_ConcreteMin - ConRadius(ND_DistPipe) + H_FiEntrance
], [90; 0; 90]*deg, ND_DistPipe, PS_Default)
FiOverflowConnectingPipe2 := PipeF([
    FiExitBox_origin[0] - ElbowRadius(ND_DistPipe) + T_PlantWall - SocketDepth(ND_DistPipe) - CouplingLength(ND_DistPipe);
    min(Fi_origin[1] - T_FiWall/2, FiEntranceBox_origin[1] - T_PlantWall - W_FiOverflow/2);
    Z_FiOverflowBottom - 2*T_ConcreteMin - ConRadius(ND_DistPipe) + H_FiEntrance - ElbowRadius(ND_DistPipe)
], H_FiExit - (ConRadius(ND_DistPipe) + ElbowRadius(ND_DistPipe) + 2*T_ConcreteMin + S_Fitting), [0; 270]*deg, ND_DistPipe, PS_Default)
Z_FiOverflowDrainPipeStart := Z_FiOverflowBottom - CouplingLength(ND_FiEntranceOverflow) + SocketDepth(ND_FiEntranceOverflow) = 0.505236 m
Z_FiOverflowDrainPipeEnd := Z_FiBwBottom + S_Fitting + ElbowRadius(ND_FiEntranceOverflow) + ConRadius(ND_FiEntranceOverflow) = -0.224496 m
FiOverflowDrainPipe := PipeSUBF([
    FiEntranceBox_origin[0] - L_FiEntrance/2;
    min(Fi_origin[1] - T_FiWall/2, FiEntranceBox_origin[1] - T_PlantWall - W_FiOverflow/2);
    Z_FiOverflowDrainPipeStart
], Z_FiOverflowDrainPipeStart - Z_FiOverflowDrainPipeEnd, [0; 270]*deg, ND_FiEntranceOverflow, PS_Default, ["FiOverflowCon"])
FiOverflowDrainElbow := ElbowF([
    FiEntranceBox_origin[0] - L_FiEntrance/2;
    min(Fi_origin[1] - T_FiWall/2, FiEntranceBox_origin[1] - T_PlantWall - W_FiOverflow/2);
    Z_FiOverflowDrainPipeEnd
], [180; 0; 90]*deg, ND_FiEntranceOverflow, PS_Default)
X_FiOverflowHorizDrainPipeStart := FiInletChannel_Origin[0] + T_PlantWall - CouplingLength(ND_FiEntranceOverflow) + SocketDepth(ND_FiEntranceOverflow)
X_FiOverflowHorizDrainPipeEnd := FiEntranceBox_origin[0] - L_FiEntrance/2 + ElbowRadius(ND_FiEntranceOverflow)
FiOverflowDrainPipeHoriz := PipeSUBF([
    X_FiOverflowHorizDrainPipeStart;
    min(Fi_origin[1] - T_FiWall/2, FiEntranceBox_origin[1] - T_PlantWall - W_FiOverflow/2);
    Z_FiOverflowDrainPipeEnd - ElbowRadius(ND_FiEntranceOverflow)
], X_FiOverflowHorizDrainPipeStart - X_FiOverflowHorizDrainPipeEnd, [0; 0], ND_FiEntranceOverflow, PS_Default, ["FiBwBoxCon"])
# This does not require a start/end because the elbow extends deeper than 10 cm and is under the Bw box so splashing shouldn't be a concern
LayerFiPipingFreeze := FreezeLayer("FiAuxPlu")
FiAuxPipeScript := stack(LayerFiAuxPiping, FiOverflowConnectingPipe, FiOverflowToDistElbow, FiOverflowConnectingPipe2, FiOverflowDrainPipe, FiOverflowDrainElbow, FiOverflowDrainPipeHoriz, LayerFiPipingFreeze)
FiAuxScript := stack(FiAuxTanksScript, FiAuxCouplingScript, FiAuxPipeScript)
# Sand Drain
# this all needs to be updated to a wye at some point
FiSandDrainPipe_Origin := Fi_origin + [
    -L_Fi + ConRadius(ND_FiSandOutlet);
    W_Fi/2 - ConRadius(ND_FiBwTrunk) - S_Fitting;
    2*ConRadius(ND_FiBwManBranch)
]
L_FiSandDrainPipeVert := H_FiSandOutlet + CapHeight(ND_FiSandOutlet) + B_FiManifoldBranch + T_FiWall + 2*ValveLength(ND_FiSandOutlet)
FiSandDrainPipeLayer := layer_new("FiSandDrainPlu", blue)
DrawFiSandDrainPipeVert := PipeF(FiSandDrainPipe_Origin, L_FiSandDrainPipeVert, [0; 90]*deg, ND_FiSandOutlet, PS_Default)
L_FiSandDrainPipeAngled := sqrt(2)*(2*outerradius(ND_FiSandOutlet) + B_FiManifoldBranch + T_FiWall + 2*ValveLength(ND_FiSandOutlet) - (ValveLength(ND_FiSandOutlet) + ValveSocket(ND_FiSandOutlet))/sqrt(2))
DrawFiSandDrainPipeAngled := PipeSUBF([
    FiSandDrainPipe_Origin[0] - (B_FiManifoldBranch + T_FiWall + 2*ValveLength(ND_FiSandOutlet));
    FiSandDrainPipe_Origin[1];
    Fi_origin[2] + H_FiSandOutlet - (ValveLength(ND_FiSandOutlet) + ValveSocket(ND_FiSandOutlet))/sqrt(2) + 2*outerradius(ND_FiManBranch)
], L_FiSandDrainPipeAngled, [0; 135]*deg, ND_FiSandOutlet, PS_Default, ["FiTank"])
DrawFiOutletCap := CapF([0; 0; L_FiSandDrainPipeVert] + FiSandDrainPipe_Origin, [0; 270]*deg, ND_FiSandOutlet)
DrawFiSandOutletValve := insertdwg("VAL-Scaled-Gate-Valve-Threaded", [
    FiSandDrainPipe_Origin[0] - (B_FiManifoldBranch + T_FiWall + 2*ValveLength(ND_FiSandOutlet)) - (ValveLength(ND_FiSandOutlet) - ValveSocket(ND_FiSandOutlet))/sqrt(2);
    FiSandDrainPipe_Origin[1];
    Fi_origin[2] + H_FiSandOutlet - (ValveLength(ND_FiSandOutlet) + ValveSocket(ND_FiSandOutlet))/sqrt(2) + 2*outerradius(ND_FiManBranch) - (ValveLength(ND_FiSandOutlet) - ValveSocket(ND_FiSandOutlet))/sqrt(2)
], 2*outerradius(ND_FiSandOutlet)/(1.16 m), 2*outerradius(ND_FiSandOutlet)/(1.16 m), 0 deg)
RotateFiSandOutletValve1 := Rotate3DLast([
    FiSandDrainPipe_Origin[0] - (B_FiManifoldBranch + T_FiWall + 2*ValveLength(ND_FiSandOutlet)) - (ValveLength(ND_FiSandOutlet) - ValveSocket(ND_FiSandOutlet))/sqrt(2);
    FiSandDrainPipe_Origin[1];
    Fi_origin[2] + H_FiSandOutlet - (ValveLength(ND_FiSandOutlet) + ValveSocket(ND_FiSandOutlet))/sqrt(2) + 2*outerradius(ND_FiManBranch) - (ValveLength(ND_FiSandOutlet) - ValveSocket(ND_FiSandOutlet))/sqrt(2)
], "z", 180 deg)
RotateFiSandOutletValve2 := Rotate3DLast([
    FiSandDrainPipe_Origin[0] - (B_FiManifoldBranch + T_FiWall + 2*ValveLength(ND_FiSandOutlet)) - (ValveLength(ND_FiSandOutlet) - ValveSocket(ND_FiSandOutlet))/sqrt(2);
    FiSandDrainPipe_Origin[1];
    Fi_origin[2] + H_FiSandOutlet - (ValveLength(ND_FiSandOutlet) + ValveSocket(ND_FiSandOutlet))/sqrt(2) + 2*outerradius(ND_FiManBranch) - (ValveLength(ND_FiSandOutlet) - ValveSocket(ND_FiSandOutlet))/sqrt(2)
], "y", -45 deg)
FreezeFiSandDrain := FreezeLayer("FiSandDrainPlu")
FiSandDrainScript := stack(FiSandDrainPipeLayer, DrawFiSandDrainPipeVert, DrawFiSandDrainPipeAngled, DrawFiOutletCap, DrawFiSandOutletValve, RotateFiSandOutletValve1, RotateFiSandOutletValve2, FreezeFiSandDrain)
# Array the Filter
ThawFilter := ThawMultiple(["Fi*"])
FiArray1Frz := ["FiAuxPlu"; "FiCouplingPlu"; "FiOverflowCon"; "FiInletchannelCon"; "Fi*Siphon*"]
FreezeFiPieces := FreezeMultiple(FiArray1Frz)
ArrayFi1 := Array_All(2, 1, -(W_Fi + T_FiWall))
FreezeRestFi := FreezeMultiple(["Fi*"])
FiSiphonCouplingsLayer := layer_new("FiSiphonCouplingsPlu", green)
FiSiphonCoupling := CouplingSUBF([
    Fi_origin[0] + T_FiWall - SocketDepth(ND_FiSiphon);
    Fi_origin[1] + T_ConcreteMin + ConRadius(ND_FiSiphon);
    Z_FiSiphonCoupling
], [0; 0]*deg, ND_FiSiphon, PS_Default, ["FiTankCon"])
L_FiSiphonPipeBottom := W_PlantDC/2 + FiInletChannel_Origin[0] - (Fi_origin[0] + T_FiWall + SocketDepth(ND_FiSiphon) + ShortTeeLength(ND_FiSiphon) + ElbowRadius(ND_FiSiphon)) - ElbowRadius(ND_FiSiphon) = 2.8926 m
FiSiphonChannelCoupling_Origin := [
    Fi_origin[0] + T_FiWall + SocketDepth(ND_FiSiphon) + ShortTeeLength(ND_FiSiphon) + 2*ElbowRadius(ND_FiSiphon) + L_FiSiphonPipeBottom;
    Fi_origin[1] + T_ConcreteMin + ConRadius(ND_FiSiphon);
    Plant_Origin[2] - T_PlantWall - H_PlantDC - Slope_PlantDC*(L_PlantDC - (Fi_origin[1] - Plant_Origin[1] + T_ConcreteMin + 2*ConRadius(ND_FiSiphon))) - SocketDepth(ND_FiSiphon)
]
FiSiphonChannelCoupling := CouplingSUBF(FiSiphonChannelCoupling_Origin, [0; 270]*deg, ND_FiSiphon, PS_Default, ["DrainChannelCon"])
LayerFiSiphonCouplingsFreeze := FreezeLayer("FiSiphonCouplingsPlu")
LayerFiSiphon := layer_new("FiSiphonPlu", blue)
# Starting from the coupling going into the filter
X_FiSiphonPipe1End := Fi_origin[0] + T_FiWall - CouplingLength(ND_FiSiphon) + SocketDepth(ND_FiSiphon) - max((T_FiWall - CouplingLength(ND_FiSiphon)) + 2*SocketDepth(ND_FiSiphon), 2*SocketDepth(ND_FiSiphon))
FiSiphonPipe1 := PipeSUBF([
    Fi_origin[0] + T_FiWall - CouplingLength(ND_FiSiphon) + SocketDepth(ND_FiSiphon);
    Fi_origin[1] + T_ConcreteMin + ConRadius(ND_FiSiphon);
    Z_FiSiphonCoupling
], L_Fi/2 - ElbowRadius(ND_FiSiphon) + T_FiWall - CouplingLength(ND_FiSiphon) + SocketDepth(ND_FiSiphon), [0; 0]*deg, ND_FiSiphon, PS_Default, ["FiTankCon"])
FiSiphonElbow1 := ElbowF([
    Fi_origin[0] - L_Fi/2 + ElbowRadius(ND_FiSiphon);
    Fi_origin[1] + T_ConcreteMin + ConRadius(ND_FiSiphon);
    Z_FiSiphonCoupling
], [90; 0; 90]*deg, ND_FiSiphon, PS_Default)
FiSiphonPipe2 := PipeF([
    Fi_origin[0] - L_Fi/2;
    Fi_origin[1] + T_ConcreteMin + ConRadius(ND_FiSiphon);
    Z_FiSiphonCoupling - ElbowRadius(ND_FiSiphon)
], Z_FiSiphonCoupling - ElbowRadius(ND_FiSiphon) - (Z_FiSiphonInlet + ShortTeeLength(ND_FiSiphon)), [0; -90]*deg, ND_FiSiphon, PS_Default)
FiSiphonTee := TeeF([
    Fi_origin[0] - L_Fi/2;
    Fi_origin[1] + T_ConcreteMin + ConRadius(ND_FiSiphon);
    Z_FiSiphonInlet + ShortTeeLength(ND_FiSiphon)
], [0; 0; 90]*deg, ND_FiSiphon, PS_Default)
X_FiSiphonManifoldStart := X_FiSiphonPipe1End - ElbowRadius(ND_FiSiphon) - ShortTeeLength(ND_FiSiphon)
X_FiSiphonManifoldEnd := Fi_origin[0] - L_Fi
FiSiphonManifold1 := PipeF([
    Fi_origin[0] - L_Fi/2 - ShortTeeLength(ND_FiSiphon);
    Fi_origin[1] + T_ConcreteMin + ConRadius(ND_FiSiphon);
    Z_FiSiphonInlet
], L_Fi/2 - ShortTeeLength(ND_FiSiphon) - ConRadius(ND_FiSiphon) + outerradius(ND_FiSiphon), [0; 0]*deg, ND_FiSiphon, PS_Default)
FiSiphonManifold2 := PipeF([
    Fi_origin[0] - ConRadius(ND_FiSiphon) + outerradius(ND_FiSiphon);
    Fi_origin[1] + T_ConcreteMin + ConRadius(ND_FiSiphon);
    Z_FiSiphonInlet
], L_Fi/2 - ShortTeeLength(ND_FiSiphon) - ConRadius(ND_FiSiphon) + outerradius(ND_FiSiphon), [0; 0]*deg, ND_FiSiphon, PS_Default)
FiSiphonManifoldCap1 := CapF([
    X_FiSiphonManifoldEnd + ConRadius(ND_FiSiphon) - outerradius(ND_FiSiphon);
    Fi_origin[1] + T_ConcreteMin + ConRadius(ND_FiSiphon);
    Z_FiSiphonInlet
], [180; 0]*deg, ND_FiSiphon)
FiSiphonManifoldCap2 := CapF([
    Fi_origin[0] - ConRadius(ND_FiSiphon) + outerradius(ND_FiSiphon);
    Fi_origin[1] + T_ConcreteMin + ConRadius(ND_FiSiphon);
    Z_FiSiphonInlet
], [0; 0]*deg, ND_FiSiphon)
FreezeFiSiphon := FreezeLayer("FiSiphonPlu")
FirstFiSiphonManOrifice := CylinderF([
    Fi_origin[0] - B_FiSiphonManOrifices/2 - ConRadius(ND_FiSiphon) + outerradius(ND_FiSiphon);
    Fi_origin[1] + T_ConcreteMin + ConRadius(ND_FiSiphon);
    Z_FiSiphonInlet
], D_FiSiphonManOrifices/2, 1.2*ConRadius(ND_FiSiphon), [0; 90]*deg)
ArrayFiSiphonManOrifices := array_all(1, N_FiSiphonManOrifices/2, -B_FiSiphonManOrifices)
MirrorFiSiphonManOrifices := Mirror3dAll("yz", [Fi_origin[0] - L_Fi/2; 0 m], "n")
FiSiphonOrifices := stack(FirstFiSiphonManOrifice, ArrayFiSiphonManOrifices, MirrorFiSiphonManOrifices)
# GroupAll
SubtractFiSiphonManOrifices := SubtractF(["FiSiphonPlu"], "DeleteMe")
SelectFiSiphon := SelectLayer("FiSiphonPlu")
# Starting from the coupling going out of the filter
FiSiphonPipe3 := PipeF([
    Fi_origin[0] + T_FiWall - SocketDepth(ND_FiSiphon);
    Fi_origin[1] + T_ConcreteMin + ConRadius(ND_FiSiphon);
    Z_FiSiphonCoupling
], 2*SocketDepth(ND_FiSiphon), [180; 0]*deg, ND_FiSiphon, PS_Default)
FiSiphonTee2 := TeeF([
    Fi_origin[0] + T_FiWall + SocketDepth(ND_FiSiphon);
    Fi_origin[1] + T_ConcreteMin + ConRadius(ND_FiSiphon);
    Z_FiSiphonCoupling
], [90; 0; 90]*deg, ND_FiSiphon, PS_Default)
Z_FiSiphonPipe4End := Z_FiBwBottom
FiSiphonPipe4 := PipeF([
    Fi_origin[0] + T_FiWall + SocketDepth(ND_FiSiphon) + ShortTeeLength(ND_FiSiphon);
    Fi_origin[1] + T_ConcreteMin + ConRadius(ND_FiSiphon);
    Z_FiSiphonCoupling - ShortTeeLength(ND_FiSiphon)
], Z_FiSiphonCoupling - ElbowRadius(ND_FiSiphon) - ShortTeeLength(ND_FiSiphon) - Fi_origin[2], [0; -90]*deg, ND_FiSiphon, PS_Default)
FiSiphonElbow0 := ElbowF([
    Fi_origin[0] + T_FiWall + SocketDepth(ND_FiSiphon) + ShortTeeLength(ND_FiSiphon) + ElbowRadius(ND_FiSiphon);
    Fi_origin[1] + T_ConcreteMin + ConRadius(ND_FiSiphon);
    Fi_origin[2]
], [90; 0; 270]*deg, ND_FiSiphon, PS_Default)
FiSiphonPipe5 := PipeF([
    Fi_origin[0] + T_FiWall + SocketDepth(ND_FiSiphon) + ShortTeeLength(ND_FiSiphon) + ElbowRadius(ND_FiSiphon) + L_FiSiphonPipeBottom;
    Fi_origin[1] + T_ConcreteMin + ConRadius(ND_FiSiphon);
    Fi_origin[2]
], L_FiSiphonPipeBottom, [0; 0], ND_FiSiphon, PS_Default)
FiSiphonElbow01 := ElbowF([
    Fi_origin[0] + T_FiWall + SocketDepth(ND_FiSiphon) + ShortTeeLength(ND_FiSiphon) + ElbowRadius(ND_FiSiphon) + L_FiSiphonPipeBottom;
    Fi_origin[1] + T_ConcreteMin + ConRadius(ND_FiSiphon);
    Fi_origin[2]
], [270; 0; 90]*deg, ND_FiSiphon, PS_Default)
FiSiphonChannelPipe := PipeSUBF([
    Fi_origin[0] + T_FiWall + SocketDepth(ND_FiSiphon) + ShortTeeLength(ND_FiSiphon) + 2*ElbowRadius(ND_FiSiphon) + L_FiSiphonPipeBottom;
    Fi_origin[1] + T_ConcreteMin + ConRadius(ND_FiSiphon);
    Fi_origin[2] + ElbowRadius(ND_FiSiphon)
], Z_FiBottom + ElbowRadius(ND_FiSiphon) - (FiSiphonChannelCoupling_Origin[2] - CouplingLength(ND_FiSiphon) + 2*SocketDepth(ND_FiSiphon)), [0; -90]*deg, ND_FiSiphon, PS_Default, ["DrainChannelCon"])
FiSiphonReducerCyl1 := CylinderF([
    Fi_origin[0] + T_FiWall + SocketDepth(ND_FiSiphon) + ShortTeeLength(ND_FiSiphon);
    Fi_origin[1] + T_ConcreteMin + ConRadius(ND_FiSiphon);
    Z_FiSiphonCoupling + ShortTeeLength(ND_FiSiphon)
], outerradius(ND_FiSiphon), SocketDepth(ND_FiSiphon), [0; 90]*deg)
LayerFiSiphonFreeze := FreezeLayer("FiSiphonPlu")
FiSiphonReducerCyl2 := CylinderF([
    Fi_origin[0] + T_FiWall + SocketDepth(ND_FiSiphon) + ShortTeeLength(ND_FiSiphon);
    Fi_origin[1] + T_ConcreteMin + ConRadius(ND_FiSiphon);
    Z_FiSiphonCoupling + ShortTeeLength(ND_FiSiphon)
], outerradius(ND_FiSiphonAirValve), SocketDepth(ND_FiSiphon), [0; 90]*deg)
FiSiphonReducerGroup := GroupLast("DeleteMe")
FiSiphonReducerSubtract := SubtractF(["FiSiphonPlu"], "DeleteMe")
# maybe don't need this pipe?
FiSiphonAirPipe1 := PipeF([
    Fi_origin[0] + T_FiWall + SocketDepth(ND_FiSiphon) + ShortTeeLength(ND_FiSiphon);
    Fi_origin[1] + T_ConcreteMin + ConRadius(ND_FiSiphon);
    Z_FiSiphonCoupling + ShortTeeLength(ND_FiSiphon)
], Fi_origin[2] + H_Fi - (Z_FiSiphonCoupling + ShortTeeLength(ND_FiSiphon)), [0; 90]*deg, ND_FiSiphonAirValve, PS_Default)
FiSiphonAirValve := insertdwg("MetalBallValve", [
    Fi_origin[0] + T_FiWall + SocketDepth(ND_FiSiphon) + ShortTeeLength(ND_FiSiphon);
    Fi_origin[1] + T_ConcreteMin + ConRadius(ND_FiSiphon);
    Z_FiSiphonCoupling + ShortTeeLength(ND_FiSiphon) + SocketDepth(ND_FiSiphon)
], 2*outerradius(ND_FiSiphonAirValve)*1/(125 in), 2*outerradius(ND_FiSiphonAirValve)*1/(125 in), 0 deg)
FiSiphonSelectLayer := SelectLayer("FiSiphonPlu")
FiSiphonAirValveReducer := stack(FiSiphonReducerCyl1, LayerFiSiphonFreeze, FiSiphonReducerCyl2, FiSiphonReducerGroup, FiSiphonReducerSubtract, FiSiphonSelectLayer, FiSiphonAirValve)
FiSiphonManLedgeL := BoxF([
    Fi_origin[0];
    Fi_origin[1] + T_ConcreteMin + ConRadius(ND_FiSiphon) - 2*S_Fitting;
    Z_FiSiphonInlet - ConRadius(ND_FiSiphon)
], [
    Fi_origin[0] - T_ConcreteMin;
    Fi_origin[1] + T_ConcreteMin + ConRadius(ND_FiSiphon) + 2*S_Fitting;
    Z_FiSiphonInlet - ConRadius(ND_FiSiphon) - T_ConcreteMin
], [0; 0; 0]*deg)
FiSiphonManLedgeR := BoxF([
    Fi_origin[0] - L_Fi;
    Fi_origin[1] + T_ConcreteMin + ConRadius(ND_FiSiphon) - 2*S_Fitting;
    Z_FiSiphonInlet - ConRadius(ND_FiSiphon)
], [
    Fi_origin[0] - L_Fi + T_ConcreteMin;
    Fi_origin[1] + T_ConcreteMin + ConRadius(ND_FiSiphon) + 2*S_Fitting;
    Z_FiSiphonInlet - ConRadius(ND_FiSiphon) - T_ConcreteMin
], [0; 0; 0]*deg)
HL_FiSiphonOutletPipeWeir := Headloss_weir(Q_Plant, innerdiameter(ND_FiSiphon, PS_Default)) = 19.4092 cm
L_FiSiphonPlumbingEst := (Z_FiSiphonCoupling - Z_FiSiphonInlet) + (Z_FiSiphonCoupling - Z_FiBwBottom) + (Z_FiSiphonInlet - Z_FiBwBottom) + (FiSiphonChannelCoupling_Origin[0] - Fi_origin[0] + L_Fi/2) = 7.20477 m
HL_FiSiphonPlumbing := h_l(Q_Plant/N_Fi, innerdiameter(ND_FiSiphon, PS_Default), L_FiSiphonPlumbingEst, K_PipeEnt + K_PipeExit + 5*K_El90, Nu_Water, E_Pvc) = 0.0870975 m
L_FiSiphonChannelStub := max(Z_FiSiphonInlet + ConRadius(ND_FiSiphon) + H_FiSiphonNoSuckAir - HL_FiSiphonOutletPipeWeir - HL_FiSiphonPlumbing - FiSiphonChannelCoupling_Origin[2], SocketDepth(ND_FiSiphon)) = 0.291432 m
FiSiphonDrainChannelStub := PipeF(FiSiphonChannelCoupling_Origin + [0 m; 0 m; 0 m], L_FiSiphonChannelStub, [0; 90; 0]*deg, ND_FiSiphon, PS_Default)
FiSiphonScript := stack(FiSiphonCouplingsLayer, FiSiphonCoupling, FiSiphonChannelCoupling, LayerFiSiphonCouplingsFreeze, LayerFiSiphon, FiSiphonManifold1, FiSiphonManifold2, FiSiphonManifoldCap1, FiSiphonManifoldCap2, FiSiphonTee, FreezeFiSiphon, FiSiphonOrifices, GroupDelete, SubtractFiSiphonManOrifices, SelectFiSiphon, FirstFiSiphonManOrifice, GroupDelete, SubtractFiSiphonManOrifices, SelectFiSiphon, FiSiphonElbow0, FiSiphonPipe1, FiSiphonElbow1, FiSiphonElbow01, FiSiphonPipe2, FiSiphonPipe5, FiSiphonChannelPipe, FiSiphonPipe3, FiSiphonTee2, FiSiphonPipe4, FiSiphonAirValveReducer, FiSiphonDrainChannelStub, LayerFiSiphonFreeze, SelectLayer("FiTankCon"), FiSiphonManLedgeL, FiSiphonManLedgeR, Union_All, LayerFiTankFreeze)
# First Filter's Backwash Siphon
# Second Filter's Siphon
SelectFiSiphonCouplings := SelectLayer("FiSiphonCouplingsPlu")
Fi2ndSiphonCoupling := CouplingSUBF([
    Fi_origin[0] + T_FiWall - SocketDepth(ND_FiSiphon);
    Fi_origin[1] - T_FiWall - T_ConcreteMin - ConRadius(ND_FiSiphon);
    Z_FiSiphonCoupling
], [0; 0]*deg, ND_FiSiphon, PS_Default, ["FiTankCon"])
Fi2ndSiphonChannelCoupling_Origin := [
    Fi_origin[0] + T_FiWall + SocketDepth(ND_FiSiphon) + ShortTeeLength(ND_FiSiphon) + 2*ElbowRadius(ND_FiSiphon) + L_FiSiphonPipeBottom;
    Fi_origin[1] - T_FiWall - T_ConcreteMin - ConRadius(ND_FiSiphon);
    Plant_Origin[2] - T_PlantWall - H_PlantDC - Slope_PlantDC*(L_PlantDC - (Fi_origin[1] - Plant_Origin[1] - T_FiWall - T_ConcreteMin)) - SocketDepth(ND_FiSiphon)
]
Fi2ndSiphonChannelCoupling := CouplingSUBF(Fi2ndSiphonChannelCoupling_Origin, [0; 270]*deg, ND_FiSiphon, PS_Default, ["DrainChannelCon"])
SelectFiSiphonLayer := SelectLayer("FiSiphonPlu")
# Starting from the coupling going into the filter
Fi2ndSiphonPipe1 := PipeSUBF([
    Fi_origin[0] + T_FiWall - CouplingLength(ND_FiSiphon) + SocketDepth(ND_FiSiphon);
    Fi_origin[1] - T_FiWall - T_ConcreteMin - ConRadius(ND_FiSiphon);
    Z_FiSiphonCoupling
], L_Fi/2 - ElbowRadius(ND_FiSiphon) + T_FiWall - CouplingLength(ND_FiSiphon) + SocketDepth(ND_FiSiphon), [0; 0]*deg, ND_FiSiphon, PS_Default, ["FiTankCon"])
Fi2ndSiphonElbow1 := ElbowF([
    Fi_origin[0] - L_Fi/2 + ElbowRadius(ND_FiSiphon);
    Fi_origin[1] - T_FiWall - T_ConcreteMin - ConRadius(ND_FiSiphon);
    Z_FiSiphonCoupling
], [90; 0; 90]*deg, ND_FiSiphon, PS_Default)
Fi2ndSiphonPipe2 := PipeF([
    Fi_origin[0] - L_Fi/2;
    Fi_origin[1] - T_FiWall - T_ConcreteMin - ConRadius(ND_FiSiphon);
    Z_FiSiphonCoupling - ElbowRadius(ND_FiSiphon)
], Z_FiSiphonCoupling - ElbowRadius(ND_FiSiphon) - (Z_FiSiphonInlet + ShortTeeLength(ND_FiSiphon)), [0; -90]*deg, ND_FiSiphon, PS_Default)
Fi2ndSiphonTee := TeeF([
    Fi_origin[0] - L_Fi/2;
    Fi_origin[1] - T_FiWall - T_ConcreteMin - ConRadius(ND_FiSiphon);
    Z_FiSiphonInlet + ShortTeeLength(ND_FiSiphon)
], [0; 0; 90]*deg, ND_FiSiphon, PS_Default)
Fi2ndSiphonManifold1 := PipeF([
    Fi_origin[0] - L_Fi/2 - ShortTeeLength(ND_FiSiphon);
    Fi_origin[1] - T_FiWall - T_ConcreteMin - ConRadius(ND_FiSiphon);
    Z_FiSiphonInlet
], L_Fi/2 - ShortTeeLength(ND_FiSiphon) - ConRadius(ND_FiSiphon) + outerradius(ND_FiSiphon), [0; 0]*deg, ND_FiSiphon, PS_Default)
Fi2ndSiphonManifold2 := PipeF([
    Fi_origin[0] - ConRadius(ND_FiSiphon) + outerradius(ND_FiSiphon);
    Fi_origin[1] - T_FiWall - T_ConcreteMin - ConRadius(ND_FiSiphon);
    Z_FiSiphonInlet
], L_Fi/2 - ShortTeeLength(ND_FiSiphon) - ConRadius(ND_FiSiphon) + outerradius(ND_FiSiphon), [0; 0]*deg, ND_FiSiphon, PS_Default)
Fi2ndSiphonManifoldCap1 := CapF([
    X_FiSiphonManifoldEnd + ConRadius(ND_FiSiphon) - outerradius(ND_FiSiphon);
    Fi_origin[1] - T_FiWall - T_ConcreteMin - ConRadius(ND_FiSiphon);
    Z_FiSiphonInlet
], [180; 0]*deg, ND_FiSiphon)
Fi2ndSiphonManifoldCap2 := CapF([
    Fi_origin[0] - ConRadius(ND_FiSiphon) + outerradius(ND_FiSiphon);
    Fi_origin[1] - T_FiWall - T_ConcreteMin - ConRadius(ND_FiSiphon);
    Z_FiSiphonInlet
], [0; 0]*deg, ND_FiSiphon)
First2ndFiSiphonManOrifice := CylinderF([
    Fi_origin[0] - B_FiSiphonManOrifices/2 - ConRadius(ND_FiSiphon) + outerradius(ND_FiSiphon);
    Fi_origin[1] - T_FiWall - T_ConcreteMin - ConRadius(ND_FiSiphon);
    Z_FiSiphonInlet
], D_FiSiphonManOrifices/2, 1.2*ConRadius(ND_FiSiphon), [0; 90]*deg)
Array2ndFiSiphonManOrifices := array_all(1, N_FiSiphonManOrifices/2, -B_FiSiphonManOrifices)
Mirror2ndFiSiphonManOrifices := Mirror3dAll("yz", [Fi_origin[0] - L_Fi/2; 0 m], "n")
Fi2ndSiphonOrifices := stack(First2ndFiSiphonManOrifice, Array2ndFiSiphonManOrifices, Mirror2ndFiSiphonManOrifices)
# GroupAll
# Starting from the coupling going out of the filter
Fi2ndSiphonPipe3 := PipeF([
    Fi_origin[0] + T_FiWall - SocketDepth(ND_FiSiphon);
    Fi_origin[1] - T_FiWall - T_ConcreteMin - ConRadius(ND_FiSiphon);
    Z_FiSiphonCoupling
], 2*SocketDepth(ND_FiSiphon), [180; 0]*deg, ND_FiSiphon, PS_Default)
Fi2ndSiphonTee2 := TeeF([
    Fi_origin[0] + T_FiWall + SocketDepth(ND_FiSiphon);
    Fi_origin[1] - T_FiWall - T_ConcreteMin - ConRadius(ND_FiSiphon);
    Z_FiSiphonCoupling
], [90; 0; 90]*deg, ND_FiSiphon, PS_Default)
Fi2ndSiphonPipe4 := PipeF([
    Fi_origin[0] + T_FiWall + SocketDepth(ND_FiSiphon) + ShortTeeLength(ND_FiSiphon);
    Fi_origin[1] - T_FiWall - T_ConcreteMin - ConRadius(ND_FiSiphon);
    Z_FiSiphonCoupling - ShortTeeLength(ND_FiSiphon)
], Z_FiSiphonCoupling - ElbowRadius(ND_FiSiphon) - ShortTeeLength(ND_FiSiphon) - Fi_origin[2], [0; -90]*deg, ND_FiSiphon, PS_Default)
Fi2ndSiphonElbow0 := ElbowF([
    Fi_origin[0] + T_FiWall + SocketDepth(ND_FiSiphon) + ShortTeeLength(ND_FiSiphon) + ElbowRadius(ND_FiSiphon);
    Fi_origin[1] - T_FiWall - T_ConcreteMin - ConRadius(ND_FiSiphon);
    Fi_origin[2]
], [90; 0; 270]*deg, ND_FiSiphon, PS_Default)
Fi2ndSiphonPipe5 := PipeF([
    Fi_origin[0] + T_FiWall + SocketDepth(ND_FiSiphon) + ShortTeeLength(ND_FiSiphon) + ElbowRadius(ND_FiSiphon) + L_FiSiphonPipeBottom;
    Fi_origin[1] - T_FiWall - T_ConcreteMin - ConRadius(ND_FiSiphon);
    Fi_origin[2]
], L_FiSiphonPipeBottom, [0; 0], ND_FiSiphon, PS_Default)
Fi2ndSiphonElbow01 := ElbowF([
    Fi_origin[0] + T_FiWall + SocketDepth(ND_FiSiphon) + ShortTeeLength(ND_FiSiphon) + ElbowRadius(ND_FiSiphon) + L_FiSiphonPipeBottom;
    Fi_origin[1] - T_FiWall - T_ConcreteMin - ConRadius(ND_FiSiphon);
    Fi_origin[2]
], [270; 0; 90]*deg, ND_FiSiphon, PS_Default)
Fi2ndSiphonChannelPipe := PipeSUBF([
    Fi_origin[0] + T_FiWall + SocketDepth(ND_FiSiphon) + ShortTeeLength(ND_FiSiphon) + 2*ElbowRadius(ND_FiSiphon) + L_FiSiphonPipeBottom;
    Fi_origin[1] - T_FiWall - T_ConcreteMin - ConRadius(ND_FiSiphon);
    Fi_origin[2] + ElbowRadius(ND_FiSiphon)
], Z_FiBottom + ElbowRadius(ND_FiSiphon) - (FiSiphonChannelCoupling_Origin[2] - CouplingLength(ND_FiSiphon) + 2*SocketDepth(ND_FiSiphon)), [0; -90]*deg, ND_FiSiphon, PS_Default, ["DrainChannelCon"])
Fi2ndSiphonReducerCyl1 := CylinderF([
    Fi_origin[0] + T_FiWall + SocketDepth(ND_FiSiphon) + ShortTeeLength(ND_FiSiphon);
    Fi_origin[1] - T_FiWall - T_ConcreteMin - ConRadius(ND_FiSiphon);
    Z_FiSiphonCoupling + ShortTeeLength(ND_FiSiphon)
], outerradius(ND_FiSiphon), SocketDepth(ND_FiSiphon), [0; 90]*deg)
Fi2ndSiphonReducerCyl2 := CylinderF([
    Fi_origin[0] + T_FiWall + SocketDepth(ND_FiSiphon) + ShortTeeLength(ND_FiSiphon);
    Fi_origin[1] - T_FiWall - T_ConcreteMin - ConRadius(ND_FiSiphon);
    Z_FiSiphonCoupling + ShortTeeLength(ND_FiSiphon)
], outerradius(ND_FiSiphonAirValve), SocketDepth(ND_FiSiphon), [0; 90]*deg)
# maybe don't need this pipe?
Fi2ndSiphonAirPipe1 := PipeF([
    Fi_origin[0] + T_FiWall + SocketDepth(ND_FiSiphon) + ShortTeeLength(ND_FiSiphon);
    Fi_origin[1] - T_FiWall - T_ConcreteMin - ConRadius(ND_FiSiphon);
    Z_FiSiphonCoupling + ShortTeeLength(ND_FiSiphon)
], Fi_origin[2] + H_Fi - (Z_FiSiphonCoupling + ShortTeeLength(ND_FiSiphon)), [0; 90]*deg, ND_FiSiphonAirValve, PS_Default)
Fi2ndSiphonAirValve := insertdwg("MetalBallValve", [
    Fi_origin[0] + T_FiWall + SocketDepth(ND_FiSiphon) + ShortTeeLength(ND_FiSiphon);
    Fi_origin[1] - T_FiWall - T_ConcreteMin - ConRadius(ND_FiSiphon);
    Z_FiSiphonCoupling + ShortTeeLength(ND_FiSiphon) + SocketDepth(ND_FiSiphon)
], 2*outerradius(ND_FiSiphonAirValve)*1/(125 in), 2*outerradius(ND_FiSiphonAirValve)*1/(125 in), 0 deg)
Fi2ndSiphonAirValveReducer := stack(Fi2ndSiphonReducerCyl1, LayerFiSiphonFreeze, Fi2ndSiphonReducerCyl2, FiSiphonReducerGroup, FiSiphonReducerSubtract, FiSiphonSelectLayer, Fi2ndSiphonAirValve)
Fi2ndSiphonManLedgeL := BoxF([
    Fi_origin[0];
    Fi_origin[1] - T_FiWall - T_ConcreteMin - ConRadius(ND_FiSiphon) - 2*S_Fitting;
    Z_FiSiphonInlet - ConRadius(ND_FiSiphon)
], [
    Fi_origin[0] - T_ConcreteMin;
    Fi_origin[1] - T_FiWall - T_ConcreteMin - ConRadius(ND_FiSiphon) + 2*S_Fitting;
    Z_FiSiphonInlet - ConRadius(ND_FiSiphon) - T_ConcreteMin
], [0; 0; 0]*deg)
Fi2ndSiphonManLedgeR := BoxF([
    Fi_origin[0] - L_Fi;
    Fi_origin[1] - T_FiWall - T_ConcreteMin - ConRadius(ND_FiSiphon) - 2*S_Fitting;
    Z_FiSiphonInlet - ConRadius(ND_FiSiphon)
], [
    Fi_origin[0] - L_Fi + T_ConcreteMin;
    Fi_origin[1] - T_FiWall - T_ConcreteMin - ConRadius(ND_FiSiphon) + 2*S_Fitting;
    Z_FiSiphonInlet - ConRadius(ND_FiSiphon) - T_ConcreteMin
], [0; 0; 0]*deg)
Fi2ndSiphonDrainChannelStub := PipeF(Fi2ndSiphonChannelCoupling_Origin + [0 m; 0 m; 0 m], L_FiSiphonChannelStub, [0; 90; 0]*deg, ND_FiSiphon, PS_Default)
Fi2ndSiphonScript := stack(SelectFiSiphonCouplings, Fi2ndSiphonCoupling, Fi2ndSiphonChannelCoupling, LayerFiSiphonCouplingsFreeze, SelectFiSiphon, Fi2ndSiphonManifold1, Fi2ndSiphonManifold2, Fi2ndSiphonManifoldCap1, Fi2ndSiphonManifoldCap2, Fi2ndSiphonTee, FreezeFiSiphon, Fi2ndSiphonOrifices, GroupDelete, SubtractFiSiphonManOrifices, SelectFiSiphon, First2ndFiSiphonManOrifice, GroupDelete, SubtractFiSiphonManOrifices, SelectFiSiphon, Fi2ndSiphonElbow0, Fi2ndSiphonPipe1, Fi2ndSiphonElbow1, Fi2ndSiphonElbow01, Fi2ndSiphonPipe2, Fi2ndSiphonPipe5, Fi2ndSiphonChannelPipe, Fi2ndSiphonPipe3, Fi2ndSiphonTee2, Fi2ndSiphonPipe4, Fi2ndSiphonAirValveReducer, Fi2ndSiphonDrainChannelStub, LayerFiSiphonFreeze, SelectLayer("FiTankCon"), Fi2ndSiphonManLedgeL, Fi2ndSiphonManLedgeR, Union_All, LayerFiTankFreeze)
# Overflow and Distribution Weirs
ThawFiEntExit := ThawMultiple(["FiEntexitBoxesCon"])
FreezeFiEntExit := FreezeLayer("FiEntexitBoxesCon")
ThawFiOverflow := ThawMultiple(["FiOverflowCon"])
FreezeFiOverflow := FreezeLayer("FiOverflowCon")
FiOverflowWeir := BoxF([
    FiEntranceBox_origin[0] - L_FiEntrance;
    FiEntranceBox_origin[1] - 2*T_PlantWall - zc;
    Z_FiOverflowWeir
], [
    FiEntranceBox_origin[0] - L_FiEntrance + L_FiOverflowWeir;
    FiEntranceBox_origin[1] + zc;
    Z_FiEntranceBottom + H_FiEntrance + zc + H_PlantFreeboard
], [0; 0; 0]*deg)
FiDistWeir := BoxF([FiExitBox_origin[0]; FiEntranceBox_origin[1] - 2*T_PlantWall - zc; Z_FiExitWeir], [
    FiExitBox_origin[0] - L_FiDistWeir;
    FiEntranceBox_origin[1] + zc;
    FiEntranceBox_origin[2] + FiExitBox_dim[2]
], [0; 0; 0]*deg)
MirrorFiWeir := Mirror3dAll("zx", [FiOverflowBox_Origin[0]; FiOverflowBox_Origin[1] + W_FiOverflow/2], "n")
# GroupAll
FiSubtractOverDistWeirs := SubtractF(["FiOverflowCon"; "FiEntexitboxesCon"], "DeleteMe")
FiWeirs := stack(FiOverflowWeir, FiDistWeir, MirrorFiWeir, GroupDelete, FiSubtractOverDistWeirs)
# Array Filters and Union Backwash Box
# ThawFilter
ArrayFi2 := array_all(N_Fi, 1, -(2*W_Fi + T_FiWall))
UnionFiBw := stack(FreezeMultiple(["~FiBwBoxCon"]), Union_All, FreezeLayer("FiBwBoxCon"))
# FreezeRestFi
# Just setting the drain size to be that of the exit box drain, since it probably doesn't need to drain very fast or very often.
FiBwDrainLayer := layer_new("FiBwDrainPlu", blue)
FiBwDrainPipeVert := PipeSUBF([
    FiInletChannel_Origin[0] + T_ChannelWall - max(CouplingLength(ND_FiExitWaste), T_ChannelWall) - SocketDepth(ND_FiExitWaste) - ElbowRadius(ND_FiExitWaste);
    {
        min(Fi_origin[1] - T_FiWall/2, FiEntranceBox_origin[1] - T_PlantWall - W_FiOverflow/2) if N_Fi > 1
        (0.5*(max(Fi_origin[1] + 2*(T_ConcreteMin + ConRadius(ND_FiSiphon)), FiEntranceBox_origin[1] + 2*(T_ConcreteMin + ConRadius(ND_FiTrunk))) + min(Fi_origin[1] - T_FiWall/2, FiEntranceBox_origin[1] - T_PlantWall - W_FiOverflow/2))) otherwise
    };
    Z_FiBwBottom + SocketDepth(ND_FiExitWaste) - CouplingLength(ND_FiExitWaste)
], 2*SocketDepth(ND_FiExitWaste) + max(T_ChannelWall - CouplingLength(ND_FiExitWaste), 0), [0; 270 deg], ND_FiExitWaste, PS_Default, ["FiBwBoxCon"])
FiBwDrainPipeHoriz := PipeF([
    FiInletChannel_Origin[0] + T_ChannelWall - CouplingLength(ND_FiExitWaste) + SocketDepth(ND_FiExitWaste);
    {
        min(Fi_origin[1] - T_FiWall/2, FiEntranceBox_origin[1] - T_PlantWall - W_FiOverflow/2) if N_Fi > 1
        (0.5*(max(Fi_origin[1] + 2*(T_ConcreteMin + ConRadius(ND_FiSiphon)), FiEntranceBox_origin[1] + 2*(T_ConcreteMin + ConRadius(ND_FiTrunk))) + min(Fi_origin[1] - T_FiWall/2, FiEntranceBox_origin[1] - T_PlantWall - W_FiOverflow/2))) otherwise
    };
    Z_FiBwBottom - max(T_PlantWall, CouplingLength(ND_FiExitWaste)) - SocketDepth(ND_FiExitWaste) - ElbowRadius(ND_FiExitWaste)
], 2*SocketDepth(ND_FiExitWaste) + max(T_PlantWall - CouplingLength(ND_FiExitWaste)), [0; 0], ND_FiExitWaste, PS_Default)
FreezeFiBwDrain := FreezeLayer("FiBwDrainPlu")
FiBwDrainFittingLayer := layer_new("FiBwDrainFitPlu", green)
FiBwDrainCouplingVert := CouplingSUBF([
    FiInletChannel_Origin[0] + T_ChannelWall - max(CouplingLength(ND_FiExitWaste), T_ChannelWall) - SocketDepth(ND_FiExitWaste) - ElbowRadius(ND_FiExitWaste);
    {
        min(Fi_origin[1] - T_FiWall/2, FiEntranceBox_origin[1] - T_PlantWall - W_FiOverflow/2) if N_Fi > 1
        (0.5*(max(Fi_origin[1] + 2*(T_ConcreteMin + ConRadius(ND_FiSiphon)), FiEntranceBox_origin[1] + 2*(T_ConcreteMin + ConRadius(ND_FiTrunk))) + min(Fi_origin[1] - T_FiWall/2, FiEntranceBox_origin[1] - T_PlantWall - W_FiOverflow/2))) otherwise
    };
    Z_FiBwBottom - SocketDepth(ND_FiExitWaste)
], [0; 270 deg], ND_FiExitWaste, PS_Default, ["FiBwBoxCon"])
FiBwDrainElbowHoriz := ElbowF([
    FiInletChannel_Origin[0] + T_ChannelWall - max(CouplingLength(ND_FiExitWaste), T_ChannelWall) - SocketDepth(ND_FiExitWaste) - ElbowRadius(ND_FiExitWaste);
    {
        min(Fi_origin[1] - T_FiWall/2, FiEntranceBox_origin[1] - T_PlantWall - W_FiOverflow/2) if N_Fi > 1
        (0.5*(max(Fi_origin[1] + 2*(T_ConcreteMin + ConRadius(ND_FiSiphon)), FiEntranceBox_origin[1] + 2*(T_ConcreteMin + ConRadius(ND_FiTrunk))) + min(Fi_origin[1] - T_FiWall/2, FiEntranceBox_origin[1] - T_PlantWall - W_FiOverflow/2))) otherwise
    };
    Z_FiBwBottom - SocketDepth(ND_FiExitWaste) - ElbowRadius(ND_FiExitWaste)
], [180 deg; 0; 90 deg], ND_FiExitWaste, PS_Default)
FiBwDrainCouplingHoriz := CouplingF([
    FiInletChannel_Origin[0] + T_ChannelWall - SocketDepth(ND_FiExitWaste);
    {
        min(Fi_origin[1] - T_FiWall/2, FiEntranceBox_origin[1] - T_PlantWall - W_FiOverflow/2) if N_Fi > 1
        (0.5*(max(Fi_origin[1] + 2*(T_ConcreteMin + ConRadius(ND_FiSiphon)), FiEntranceBox_origin[1] + 2*(T_ConcreteMin + ConRadius(ND_FiTrunk))) + min(Fi_origin[1] - T_FiWall/2, FiEntranceBox_origin[1] - T_PlantWall - W_FiOverflow/2))) otherwise
    };
    Z_FiBwBottom - max(T_PlantWall, CouplingLength(ND_FiExitWaste)) - SocketDepth(ND_FiExitWaste) - ElbowRadius(ND_FiExitWaste)
], [0; 0], ND_FiExitWaste, PS_Default)
FreezeFiBwDrainFit := FreezeLayer("FiBwDrainFitPlu")
FiBwDrain := stack(FiBwDrainLayer, FiBwDrainPipeVert, FiBwDrainPipeHoriz, FreezeFiBwDrain, FiBwDrainFittingLayer, FiBwDrainCouplingVert, FiBwDrainElbowHoriz, FiBwDrainCouplingHoriz, FreezeFiBwDrainFit)
# Backwash Drain
# Distribution Piping
FiDistPipingLayer := layer_new("FiDistPipingPlu", blue)
FiDistPipe1 := PipeSUBF([
    FiExitBox_origin[0] - L_FiExit/2;
    min(Fi_origin[1] - T_FiWall/2, FiEntranceBox_origin[1] - T_PlantWall - W_FiOverflow/2);
    Z_FiOverflowBottom - CouplingLength(ND_DistPipe) + SocketDepth(ND_DistPipe)
], 2*SocketDepth(ND_DistPipe) + max(0, T_PlantWall - CouplingLength(ND_DistPipe)), [0; 270]*deg, ND_DistPipe, PS_Default, ["FiOverflowCon"])
FiDistPipe2 := PipeF([
    FiExitBox_origin[0] - L_FiExit/2;
    min(Fi_origin[1] - T_FiWall/2, FiEntranceBox_origin[1] - T_PlantWall - W_FiOverflow/2) - ElbowRadius(ND_DistPipe);
    Z_FiOverflowBottom - CouplingLength(ND_DistPipe) - ElbowRadius(ND_DistPipe) - SocketDepth(ND_DistPipe)
], max((W_Fi + T_FiWall)*2, 2*W_FiEntrance + W_FiOverflow + 3*T_PlantWall) - ShortTeeLength(ND_DistPipe) - ElbowRadius(ND_DistPipe), [90; 0]*deg, ND_DistPipe, PS_Default)
FiDistPipe3 := PipeSUBF([
    FiExitBox_origin[0] - L_FiExit/2;
    FiExitBox_origin[1] - T_PlantWall - W_FiOverflow/2 - max((W_Fi + T_FiWall)*2, 2*W_FiEntrance + W_FiOverflow + 3*T_PlantWall);
    Z_FiOverflowBottom - CouplingLength(ND_DistPipe) + SocketDepth(ND_DistPipe)
], 2*SocketDepth(ND_DistPipe) + max(0, T_PlantWall - CouplingLength(ND_DistPipe)) + ElbowRadius(ND_DistPipe) - ShortTeeLength(ND_DistPipe), [0; 270]*deg, ND_DistPipe, PS_Default, ["FiOverflowCon"])
ND_DistPipe =  # no stored result
FiDistPipe4 := PipeF([
    FiExitBox_origin[0] - L_FiExit/2 - ElbowRadius(ND_DistPipe);
    min(Fi_origin[1] - T_FiWall/2, FiEntranceBox_origin[1] - T_PlantWall - W_FiOverflow/2);
    Z_FiOverflowBottom - CouplingLength(ND_DistPipe) - ElbowRadius(ND_DistPipe) - SocketDepth(ND_DistPipe)
], 2*SocketDepth(ND_DistPipe), [0; 0]*deg, ND_DistPipe, PS_Default)
FiDistPipe5 := PipeF([
    FiExitBox_origin[0] - L_FiExit/2 - 2*ElbowRadius(ND_DistPipe) - 2*SocketDepth(ND_DistPipe);
    min(Fi_origin[1] - T_FiWall/2, FiEntranceBox_origin[1] - T_PlantWall - W_FiOverflow/2) - ElbowRadius(ND_DistPipe);
    Z_FiOverflowBottom - CouplingLength(ND_DistPipe) - ElbowRadius(ND_DistPipe) - SocketDepth(ND_DistPipe)
], W_Fi, [90; 0; 0]*deg, ND_DistPipe, PS_Default)
FiDistPipingFrz := FreezeLayer("FiDistPipingPlu")
FiDistElbow1 := ElbowF([
    FiExitBox_origin[0] - L_FiExit/2 - ElbowRadius(ND_DistPipe)*(N_Fi ≤ 2);
    min(Fi_origin[1] - T_FiWall/2, FiEntranceBox_origin[1] - T_PlantWall - W_FiOverflow/2) - ElbowRadius(ND_DistPipe)*(N_Fi > 2);
    Z_FiOverflowBottom - CouplingLength(ND_DistPipe) - ElbowRadius(ND_DistPipe) - SocketDepth(ND_DistPipe)
], [270*(N_Fi ≤ 2); 90*(N_Fi > 2); 90*(N_Fi ≤ 2)]*deg, ND_DistPipe, PS_Default)
FiDistElbow2 := ElbowF([
    FiExitBox_origin[0] - L_FiExit/2 - ElbowRadius(ND_DistPipe) - 2*SocketDepth(ND_DistPipe);
    min(Fi_origin[1] - T_FiWall/2, FiEntranceBox_origin[1] - T_PlantWall - W_FiOverflow/2);
    Z_FiOverflowBottom - CouplingLength(ND_DistPipe) - ElbowRadius(ND_DistPipe) - SocketDepth(ND_DistPipe)
], [90; 0; 0]*deg, ND_DistPipe, PS_Default)
FiDistTee := TeeF([
    FiExitBox_origin[0] - L_FiExit/2;
    min(Fi_origin[1] - T_FiWall/2, FiEntranceBox_origin[1] - T_PlantWall - W_FiOverflow/2) - max((W_Fi + T_FiWall)*2, 2*W_FiEntrance + W_FiOverflow + 3*T_PlantWall);
    Z_FiOverflowBottom - CouplingLength(ND_DistPipe) - ElbowRadius(ND_DistPipe) - SocketDepth(ND_DistPipe) + ShortTeeLength(ND_DistPipe)
], [90; 90; 0]*deg, ND_DistPipe, PS_Default)
FiDist :=
    stack(FiDistPipingLayer, FiDistPipe1, FiDistElbow1, FiDistPipe4, FiDistElbow2, FiDistPipe5, FiDistPipingFrz) if N_Fi < 3
    stack(FiDistPipingLayer, FiDistPipe1, FiDistElbow1, FiDistPipe2, FiDistTee, FiDistPipe3, FiDistPipingFrz) otherwise
AC_Filter :=
    stack(FiInletChannelScript, FiAuxScript, FiScript, FiSandDrainScript, FiSiphonScript, FiEntExitScript, FiDist) if N_Fi == 1
    stack(FiInletChannelScript, FiAuxScript, FiScript, FiSandDrainScript, FiEntExitScript, ThawFilter, FreezeFiPieces, ArrayFi1, FreezeRestFi, FiSiphonScript, Fi2ndSiphonScript, ThawFiEntExit, FreezeFiEntExit, ThawFiOverflow, FreezeFiOverflow, FreezeRestFi, FiWeirs, FiDist) if N_Fi == 2
    stack(FiInletChannelScript, FiAuxScript, FiScript, FiSandDrainScript, FiEntExitScript, ThawFilter, FreezeFiPieces, ArrayFi1, FreezeRestFi, FiSiphonScript, Fi2ndSiphonScript, ThawFiEntExit, FreezeFiEntExit, ThawFiOverflow, FreezeFiOverflow, FreezeRestFi, FiWeirs, ThawFilter, ArrayFi2, FreezeRestFi, FiDist) otherwise
# [component: inputs AC_Filter]
