# Automated Design: AutoCAD: Flocculation Tank
EN_FlocHoriz =  # error: This variable is undefined.
H_FlocOption =  # error
Q_Plant =  # error
# Dimensions
totalfloc_dim := [
    L_FlocTank/N_FlocChannels;
    (N_FlocChannels*W_FlocChannel) + ((N_FlocChannels - 1)*T_PlantWall);
    H_Floc
]
wall_dim := [totalfloc_dim[0] + (2*T_PlantWall); T_PlantWall; totalfloc_dim[2]]
L_Sed =  # error
flocport_dim :=
    for i ∈ 0 .. (N_FlocChannels - 2)
        flocport_dim[0, i] ← [W_FlocPort[N_FlocChannels - 2 - i]; T_PlantWall; (-H_FlocPort)[i]]
    return flocport_dim
# Floc ports connect the channels.
channelopening_dim := [W_InletChannelEst; T_PlantWall; (H_Floc - H_Sed) + H_InletChannel + (HW_Sed - HW_FlocChannel)]
# normally want a 30deg slope, unless baffle is too close | set slope to be 5 cm away from nearest baffle
flocdrainslope_dim :=
    [sqrt(3)*H_FlocSlope; -D_FlocValve; -H_FlocSlope] if sqrt(3)*H_FlocSlope < W_FlocPort[0] + S_FlocPortGap - 5 cm
    [W_FlocPort[0] + S_FlocPortGap - 5 cm; -D_FlocValve; -H_FlocSlope] otherwise
Port_Dim := [T_FlocBaffle + 2*zc; L_BafflePort + L_Slot; L_BafflePort]
# Origin Points
floc_origin := [
    Plant_Origin[0];
    Plant_Origin[1] + N_SedTanks*(W_Sed + T_PlantWall);
    Plant_Origin[2] + (HW_Sed - HW_FlocChannel)
]
(floc_origin[0] - L_Sed + 3.259 m) + T_FlocBaffle =  # error
wall_origin :=
    for i ∈ 0 .. (N_FlocChannels - 2)
        wall_origin[0, i] ← [
            floc_origin[0] - totalfloc_dim[0] - T_PlantWall;
            floc_origin[1] + (W_FlocChannel*(1 + i)) + (T_PlantWall*i);
            floc_origin[2]
        ]
    return wall_origin
4
flocport_origin :=
    for i ∈ 0 .. (N_FlocChannels - 2)
        if mod(i, 2) == 0
            flocport_origin[0, i] ← [
                floc_origin[0] - W_FlocPort[N_FlocChannels - 2 - i];
                floc_origin[1] + (W_FlocChannel*(1 + i)) + (T_PlantWall*i);
                floc_origin[2] + H_FlocPort[i]
            ]
        otherwise
            flocport_origin[0, i] ← [
                floc_origin[0] - totalfloc_dim[0];
                floc_origin[1] + (W_FlocChannel*(1 + i)) + (T_PlantWall*i);
                floc_origin[2] + H_FlocPort[i]
            ]
    return flocport_origin
# The flocport origins were set to start at the top height of the ports themselves (added to the origin otherwise it disappears).  This changes the flocports to be at the bottom of the channel dividing walls instead of at the top (more structurally sound).
flocport_origin =  # error
# The x values were negative. I don't understand how the change in the floc code caused this problem.
# The Channel Opening was changed in the z-direction so that the bottom opening aligned with the bottom of the tank (for the same reason as the flocports).
channelopening_origin := [
    floc_origin[0] - totalfloc_dim[0];
    floc_origin[1] - T_PlantWall;
    floc_origin[2] + totalfloc_dim[2] - channelopening_dim[2]
]
Origin_FlocModulePipe :=
    for i ∈ 0 .. rows(N_FlocChannelsModules) - 1
        for j ∈ 0 .. cols(N_FlocChannelsModules) - 1
            origin[i, j] ← [
                -L_Slot + Y_FlocBaffles[0, j] + Y_FlocModulePipe;
                floc_origin[2] + Z_FlocModulePipe;
                floc_origin[0] - L_Sed + X_FlocModulePipe[i, j]
            ]
    return origin
Origin_FlocModuleCoupling :=
    for i ∈ 0 .. rows(N_FlocChannelsModules) - 1
        for j ∈ 0 .. cols(N_FlocChannelsModules) - 1
            origin[i, j] ← [
                Origin_FlocModulePipe[i, j][0];
                Origin_FlocModulePipe[i, j][1];
                Origin_FlocModulePipe[i, j][2] + L_FlocModulePipe[i, j] + L_FlocModuleCoupling - SocketDepth_FlocModuleCoupling
            ]
    return origin
# Flocculation Tank Script
FlocTankInitialize :=
    NewAdapter ← layer_new("FlocDrainAdapter", green)
    NewBaffle ← layer_new("Baffle", ltpurple)
    NewDrainValve ← layer_new("FlocDrainValve", blue)
    NewFlocTank ← layer_new("FlocTank", dkgrey)
    NewLayers ← stack(NewAdapter, NewBaffle, NewDrainValve, NewFlocTank)
    Set ← layer_set("0")
    FreezeAdapter ← layer_freeze("FlocDrainAdapter")
    FreezeBaffle ← layer_freeze("Baffle")
    FreezeDrainValve ← layer_freeze("FlocDrainValve")
    FreezeFlocTank ← layer_freeze("FlocTank")
    FreezeLayers ← stack(FreezeAdapter, FreezeBaffle, FreezeDrainValve, FreezeFlocTank)
    return stack(NewLayers, Set, FreezeLayers)
FlocTankTankScript :=
    Local ← SelectLayer("FlocTank")
    Local ← stack(Local, Tank(floc_origin, totalfloc_dim, T_PlantWall))
    for i ∈ 0 .. (N_FlocChannels - 2)
        Local ← stack(Local, box(wall_origin[0, i], wall_origin[0, i] + wall_dim), box(flocport_origin[0, i], flocport_origin[0, i] + flocport_dim[0, i]), subtractD(wall_origin[0, i], flocport_origin[0, i]))
        Local
    BigUnion ← union_allA
    FreezeTank ← FreezeLayer("FlocTank")
    return stack(Local, BigUnion, FreezeTank)  # The floc tank and dividing walls are now a single object
FlocTankChannelOpeningScript :=
    ChannelBox ← box(channelopening_origin, channelopening_origin + channelopening_dim)
    LayerSelect ← SelectLayer("FlocTank")
    ViewTop ← viewtop1
    SubtractChannel ← subtractD(floc_origin, [
        floc_origin[0] - totalfloc_dim[0];
        floc_origin[1] - T_PlantWall;
        floc_origin[2] + totalfloc_dim[2] - H_InletChannel
    ])
    LayerFreeze ← FreezeLayer("FlocTank")
    return stack(ChannelBox, LayerSelect, ViewTop, SubtractChannel, LayerFreeze)
FlocChannelSlotScript :=
    if L_Slot ≠ 0 m
        for j ∈ 0 .. (N_FlocChannels - 1)
            for i ∈ 0 .. (N_FlocChannelBaffles[j] - 1)
                Slot_Origin[i] ← [floc_origin[0] - L_Sed; -L_Slot; floc_origin[2]] + [X_FlocBaffles[i, j]; Y_FlocBaffles[0, j]; Z_FlocBaffles[i, j]]
                Slot_Dim[i] ← [T_FlocBaffle; W_FlocChannel + 2*L_Slot; H_Floc - Z_FlocBaffles[i, j]]
                SlotBox ← box(Slot_Origin[i], Slot_Origin[i] + Slot_Dim[i])
                Local ← stack(Local, SlotBox)
        LayerSelect ← SelectLayer("FlocTank")
        ViewTop ← viewtop1
        SubtractSlots ← subtractDall(floc_origin)
        LayerFreeze ← FreezeLayer("FlocTank")
        Local ← stack(Local, LayerSelect, ViewTop, SubtractSlots, LayerFreeze)
        return Local
    return Local
# This script will not execute if the user choses not to draw slots.
# The slots are drawn and then subtracted all at once
FlocTankBaffleScriptVR :=
    if EN_FlocHoriz == 0
        Local ← SelectLayer("Baffle")
        for j ∈ 0 .. (N_FlocChannels - 1)
            for i ∈ 0 .. (N_FlocChannelBaffles[j] - 1)
                Baffle_Origin[i] ← [floc_origin[0] - L_Sed; -L_Slot; floc_origin[2]] + [X_FlocBaffles[i, j]; Y_FlocBaffles[0, j]; Z_FlocBaffles[i, j]]
                Baffle_Dim[i] ← [T_FlocBaffle; W_FlocChannel + 2*L_Slot; L_FlocBaffles[i, j]]
                BaffleBox ← box(Baffle_Origin[i], Baffle_Origin[i] + Baffle_Dim[i])
                Local ← stack(Local, BaffleBox)
        ViewTop ← viewtop1
        Union ← union_allA
        LayerFreeze ← FreezeLayer("Baffle")
        Local ← stack(Local, ViewTop, Union, LayerFreeze)
    return Local
EN_FlocBaffle =  # error
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FlocTankBaffleScriptVP :=
    local ← layer_new("baffle", ltpurple)
    for j ∈ 0 .. cols(N_FlocChannelsModules) - 1
        ind ← 0
        for i ∈ 0 .. rows(N_FlocChannelsModules) - 1
            pipe1 ← Pipe(Origin_FlocModulePipe[i, j], ND_SedModulePipe, L_FlocModulePipe[i, j], EN_PipeSpec12)
            coupling ← couplingscript1(Origin_FlocModuleCoupling[i, j], ConRadius(ND_SedModulePipe), outerradius(ND_SedModulePipe), outerradius(ND_SedModulePipe), innerdiameter(ND_SedModulePipe, EN_PipeSpec12)/2, L_FlocModuleCoupling - 2*SocketDepth_FlocModuleCoupling, SocketDepth_FlocModuleCoupling)
            array ← concat("-array", sp, "all", sp, sp, "R", sp, stringit_nounits(3), sp, stringit_nounits(2), sp, stringit((L_FlocModuleCommon - 2*S_SedPlateModuleMin)/2), sp, stringit(3*W_FlocBaffle/4))
            local ← stack(local, viewrightside1, pipe1, viewrightside1, array, viewtop1) if i == rows(N_FlocChannelsModules) - 1
            local ← stack(local, viewrightside1, pipe1, coupling, array, viewtop1) otherwise
            block_origin[i, j] ← [
                floc_origin[0] - L_Sed + X_FlocBaffles[ind, j];
                -L_Slot + Y_FlocBaffles[0, j];
                floc_origin[2] + Z_FlocBaffles[ind, j]
            ]
            for k ∈ 0 .. N_FlocChannelsModules[i, j] - 1
                baffle_origin[ind, j] ← [
                    floc_origin[0] - L_Sed + X_FlocBaffles[ind, j];
                    -L_Slot + Y_FlocBaffles[0, j];
                    floc_origin[2] + Z_FlocBaffles[ind, j]
                ]
                baffle_dim[ind] ← [T_FlocBaffle; W_FlocChannel + 2*L_Slot; L_FlocBaffles[ind, j]]
                bafflebox ← box(baffle_origin[ind, j], baffle_origin[ind, j] + baffle_dim[ind])
                ind ← ind + 1
                local ← stack(local, bafflebox)
            block_one ← concat("-block", sp, "module", stringit_nounits(i), stringit_nounits(j))
            block_two ← concat(point(block_origin[i, j]), sp, "all", sp)
            local ← stack(local, block_one, block_two)
    for j ∈ 0 .. cols(N_FlocChannelsModules) - 1
        for i ∈ 0 .. rows(N_FlocChannelsModules) - 1
            block_three ← concat("-insert", sp, "module", stringit_nounits(i), stringit_nounits(j))
            block_four ← concat(point(block_origin[i, j]), sp)
            block_five ← concat(sp)
            local ← stack(local, block_three, block_four, block_five)
    return local
FlocTankBaffleScriptH :=
    if EN_FlocHoriz == 1
        Local ← SelectLayer("Baffle")
        for j ∈ 0 .. (N_FlocChannels - 1)
            for i ∈ 0 .. (N_FlocChannelBaffles[j] - 1)
                Baffle_Origin[i] ← [floc_origin[0] - L_Sed; -L_Slot; floc_origin[2]] + [X_FlocBaffles[i, j]; Y_FlocBaffles[i, j]; Z_FlocBaffles[i, j]]
                Baffle_Dim[i] ← [T_FlocBaffle; L_FlocBaffles[i, j]; H_Floc]
                BaffleBox ← box(Baffle_Origin[i], Baffle_Origin[i] + Baffle_Dim[i])
                Local ← stack(Local, BaffleBox)
        ViewTop ← viewtop1
        Union ← union_allA
        LayerFreeze ← FreezeLayer("Baffle")
        Local ← stack(Local, ViewTop, Union, LayerFreeze)
    return Local
# Baffles are drawn as rectangles, not lamina.
# The baffles are unioned so as to subtract the ports (see following script) in a single command
FlocTankBafflePortScript :=
    if EN_FlocHoriz == 0
        for j ∈ 0 .. (N_FlocChannels - 1)
            for i ∈ 0 .. N_FlocChannelBaffles[j] - 1
                if (mod(i, 2) == 1 and j == N_FlocChannels - 1) or (mod(i, 2) == 0 and j ≠ N_FlocChannels - 1)
                    Port_Origin[i] ← [floc_origin[0] - L_Sed - zc; W_FlocChannel - L_BafflePort; floc_origin[2]] + [X_FlocBaffles[i, j]; Y_FlocBaffles[0, j]; Z_FlocBaffles[i, j]] if (mod(i, 4) == 0 and j ≠ (N_FlocChannels - 1)) or (mod(i - 1, 4) == 0 and j == (N_FlocChannels - 1))
                    Port_Origin[i] ← [floc_origin[0] - L_Sed - zc; -L_Slot; floc_origin[2]] + [X_FlocBaffles[i, j]; Y_FlocBaffles[0, j]; Z_FlocBaffles[i, j]] otherwise
                    PortBox ← box(Port_Origin[i], Port_Origin[i] + Port_Dim)
                    Local ← stack(Local, PortBox)
        ViewTop ← viewtop1
        Union ← union_allA
        LayerSelect ← SelectLayer("Baffle")
        SubtractPort ← subtractD([floc_origin[0] - L_Sed; -L_Slot; floc_origin[2]] + [
            X_FlocBaffles[0, N_FlocChannels - 1];
            Y_FlocBaffles[0, N_FlocChannels - 1];
            Z_FlocBaffles[0, N_FlocChannels - 1]
        ], [T_FlocBaffle + 2*zc; W_FlocChannel; L_BafflePort] + [floc_origin[0] - L_Sed - zc; 0; floc_origin[2]] + [X_FlocBaffles[0, 0]; Y_FlocBaffles[0, 0]; Z_FlocBaffles[0, 0]])
        LayerFreeze ← FreezeLayer("Baffle")
        Local ← stack(Local, ViewTop, Union, LayerSelect, SubtractPort, LayerFreeze)
    return Local
# Adds the dimension of the slot in the y-direction for ease of construction
# This is only for vertical
# Currently selecting the left side of the port, the upper corner of the port inside the slot.
# This selects the first baffle to subtract from and the first port in the last channel
# This draws the valves on the far side (left side from top view) viewing from the right side
FlocTankDrainAdapterScript :=
    Local ← SelectLayer("FlocDrainAdapter")
    for i ∈ 0 .. last(Y_FlocDrainValves)
        Local ← stack(Local, MaleAdapterSUBF([-L_Sed - (T_PlantWall + 0.5*D_FlocValve + 15 cm)/2; Y_FlocDrainValves[i]; floc_origin[2]], T_PlantWall + 0.5*D_FlocValve + 15 cm, [0; 0]*deg, ND_FlocValve, EN_PipeSpec, "FlocDrainAdapter", ["FlocTank"]))
    LayerFreeze ← FreezeLayer("FlocDrainAdapter")
    return stack(Local, LayerFreeze)
# add extra 15 cm to make it easy to turn valve wheel
FlocTankDrainValveScript :=
    Local ← stack(SelectLayer("FlocDrainValve"), viewtop1)
    for i ∈ 0 .. last(Y_FlocDrainValves)
        Insert ← insertdwg("VAL-Scaled-Gate-Valve-Threaded", [-L_Sed - T_PlantWall - 15 cm; Y_FlocDrainValves[i]; floc_origin[2]], D_FlocScale, 0 deg)
        Local ← stack(Local, Insert)
    Local ← stack(Local, FreezeLayer("FlocDrainValve"))
    return Local  # Iterates through the values of drain locations and inserts a valve
# For this script to work, you need to modify the search path in AutoCAD everytime you want to test this on a different computer.  Go to tools->options the under search directory add a new file path.  Browse to find the Final Desgins Folder (or equivalent on a different sevrer).
FlocTankDrainSlopeScript :=
    Local ← stack(SelectLayer("FlocTank"), viewtop1)
    for i ∈ 0 .. last(Y_FlocDrainValves)
        Wedge ← wedge3d([-L_Sed; Y_FlocDrainValves[i] + 0.5*D_FlocValve; floc_origin[2]], flocdrainslope_dim + [-L_Sed; Y_FlocDrainValves[i] + 0.5*D_FlocValve; floc_origin[2]])
        Local ← stack(Local, Wedge)
        return Local
    Local ← stack(Local, union_allA, viewtop1)
    SubtractWedge ← subtractD(floc_origin, [flocdrainslope_dim[0] - L_Sed; Y_FlocDrainValves[0]; floc_origin[2]])
    LayerFreeze ← FreezeLayer("FlocTank")
    Local ← stack(Local, SubtractWedge, FreezeLayer("FlocTank"))
    return Local
# Iterates through all of the drain lcoations and draws a wedge that is as deep as the radius of the valve and as wide as the diameter of the valve, starting at-grade
# Wedges are unioned then subtracted
FlocTankEndScript :=
    layerset ← layer_set("0")
    return layerset
AC_FlocTank :=
    stack(FlocTankInitialize, FlocTankTankScript, FlocTankChannelOpeningScript, FlocChannelSlotScript, FlocTankBaffleScriptH, FlocTankDrainValveScript, FlocTankDrainSlopeScript, FlocTankDrainAdapterScript, FlocTankEndScript) if EN_FlocHoriz == 1
    stack(FlocTankInitialize, FlocTankTankScript, FlocTankChannelOpeningScript, FlocChannelSlotScript, FlocTankBaffleScriptVR, FlocTankBafflePortScript, FlocTankDrainValveScript, FlocTankDrainSlopeScript, FlocTankDrainAdapterScript, FlocTankEndScript, FlocTankDrainSlopeScript, FlocTankDrainAdapterScript, FlocTankEndScript) otherwise
