# Alauca inputs entered by monroe on 12/20/2010
# BASIC INPUTS
Language := 0
# Overall Plant Inputs
# Only parameters with units need to be entered in this file. The units must be attached as SI (meters, kg, s)
Q_Plant := 12*L/s
T_PlantWall := .15*m
T_ConcreteMin := 5 cm
EN_DrillSeries := 1
# Chemical Storage Tanks, Entrance Tank
# and Rapid Mixer Inputs
C_CoagDoseMax := 60*mg/L
C_ChlorineStock := 50*gm/L
C_CoagStock := 120*gm/L
C_ChlorineDoseMax := 2*mg/L
Ti_CoagStock := 30 hr
Ti_ChlorineStock := 30 hr
# Flocculator Inputs
T_FlocBaffleRigidH := 5 cm
T_FlocBaffleRigidV := 5 cm
H_FlocOption := 0
# Sedimentation Inputs
N_SedTanks := 2
N_SedBaysEst := 2
W_SedPlate := 108*cm
L_SedPlateSheet := 365.8 cm
T_SedPlate := 0.2 cm
T_SedWeir := 5 cm
# code fixes to handle poor definition of input variables. These variables need to be replaced in all code and in the VNG
EN_FcmTube := 0
W_SedBay := W_SedPlate
W_Plastic := W_SedPlate
C_FcmDoseMax := C_AlumDoseMax  # error: This variable is undefined.
C_FcmAlum := C_AlumStock  # error: This variable is undefined.
Ti_StockMin := Ti_AlumStock  # error: This variable is undefined.
# Pipes availability will be defined by the following variable. As a default is 0, corresponding to Honduras.
Country := 0
