# [reference: MasterProgram.xmcd]
Q_AlumStockMax := Q_Plant*C_FcmDoseMax/C_FcmAlum
# Currently defined in VNG as the volume of the stock tank IN the FCM. Is this correct?
H_AlumTank(Q_AlumStockMax, Kvc, D_FcmValveOrifice, g) := (Q_AlumStockMax/(Kvc*(.5*D_FcmValveOrifice)^2*π))^2/(2*g) + .1 m
V_AlumtTank(Q_FcmAlum, Ti_StockMin) := Ti_StockMin*Q_AlumStockMax
W_AlumTank(V_AlumTank, H_AlumTank) := (V_AlumTank/H_AlumTank)^.5
