## Flocculation Design
CP_Floc := 110 m^(2/3)
ED_Floc := [6.4; 0.4]*mW/kg  # Must be a two element array defining initial and final energy dissipation rates in the flocculator
W_FlocChannelMin := 45 cm
# Ratio of the length of dissipation zone after a 180 deg turn over the distance between baffles
Pi_FlocDissipation := 2
# This is the minumum overlap between adjacent baffles to prevent short circuiting.
H_FlocOverlapMin := 2 cm
S_FlocPort := 1.5 cm
# This is extra space around the hole that the water flows through when making the u turn. This space is between the hole and the last baffle.
Pi_FlocBaffle := 1.0
# This is the ratio of the baffle spacing to the distance between the bottom of a baffle and the bottom of the tank (or top of a baffle and water surface.
## Sed Design
ED_SedInlet := 0.4*mW/kg  # This is the maximum energy disipation rate in the channels that transfer the water from the floc tank to the sedimentation tank
Pi_FlowManifold := 0.8  # Ratio of min to max flow through ports in inlet manifold
V_SedUpBod := 70*m/day  # Maximum upflow velocity to allow sludge blanket formation
# We assume a maximum critical velocity for particles to settle in plate settlers
V_SedCBod := 10*m/day
# Critical velocity must be low enough to allow for almost all
# of the particles to settle out
HW_SedEst := 2 m  # Estimated waterheight in the sedimentation tank, used to determine specifics of the tank drain
H_SedBetween := 0 in  # Distance between the top of the sed tank slopes and the bottom of the lamella
AN_SedTopInlet := 60 deg  # Angle of the top panel forming inlet manifold the sed tank
AN_SedBottom := 10 deg  # Angle of the bottom of the sedimentation tank slopes.
AN_SedBottomInlet := 10 deg  # conflict!! make sure only one of these is used and delete the other!!!
W_SedSludgeSF := 2.5 cm  # This safety factor width will prevent an adequate distance extending beneath the slope plate to prevent breaking.
AN_SedPlate := 60 deg  # Degree lamella is installed relative to the horizontal (so flocs slide down lamella)
W_SedSludgeFlat := 5.0 cm  # Distance left for drain holes
# Minimum perpendicular space between lamella (based on research)
B_SedPlateMin := 2 cm
N_SedLaunders := 2  # Number of Sedimentation Tank Launder Pipes, per bay
# Ratio of the flow between the launders, the long path flow divided by the short path flow
Pi_Launder := 0.95
HL_SedLaunderBod := 4 cm  # Allowable headloss in sed launders
Pi_QLaunderOrifices := 0.8  # Ratio of the flow between the orifices within a launder (the farthest orifice divided by the closest orifice)
# But there are two rows of these!
# conflict!! check that there we are calculating two rows of launder orifices
B_SedLaunderOrifices := 10 cm
Pi_QSludgeOrifices := 0.85  # Ratio of the flow between the sludge orifices
## Inlet Channel
HW_InletChannelMax := 50 cm  # Maximum water depth of the Inlet Channel
## Floc Hopper
V_UpFlocHopper := 30*m/day  # Upward Velocity in the hopper
## Entrance Tank
V_EtUp := 700*m/day
ED_DiffusionMin := 0.733*W/kg
ED_FlocEntryOrifice := 0.8*W/kg
HW_EtMax := 20 cm
