# [reference: MasterProgram.xmcd]
# Automated Design: AutoCAD: Flocculation Tank
N_SedTanks = 1
L_Sed = 5.36646 m
# Dimensions
totalfloc_dim := [
    L_FlocTank/N_FlocChannels;
    (N_FlocChannels*W_FlocChannel) + ((N_FlocChannels - 1)*T_PlantWall);
    H_Floc
]
wall_dim := [totalfloc_dim[0] + (2*T_PlantWall); T_PlantWall; totalfloc_dim[2]]
flocport_dim :=
    for i ∈ 0 .. (N_FlocChannels - 2)
        flocport_dim[0, i] ← [W_FlocPort[N_FlocChannels - 2 - i]; T_PlantWall; (-H_FlocPort)[i]]
    return flocport_dim
# Floc ports connect the channels.
channelopening_dim := [W_InletChannel; T_PlantWall; H_InletChannel]
# Origin Points
floc_origin := [Plant_Origin[0]; Plant_Origin[1] + N_SedTanks*(W_Sed + T_PlantWall); Plant_Origin[2]]
wall_origin :=
    for i ∈ 0 .. (N_FlocChannels - 2)
        wall_origin[0, i] ← [
            Plant_Origin[0] - totalfloc_dim[0] - T_PlantWall;
            floc_origin[1] + (W_FlocChannel*(1 + i)) + (T_PlantWall*i);
            Plant_Origin[2]
        ]
    return wall_origin
flocport_origin :=
    for i ∈ 0 .. (N_FlocChannels - 2)
        if mod(i, 2) == 0
            flocport_origin[0, i] ← [
                Plant_Origin[0] - W_FlocPort[N_FlocChannels - 2 - i];
                floc_origin[1] + (W_FlocChannel*(1 + i)) + (T_PlantWall*i);
                floc_origin[2] + H_FlocPort[i]
            ]
        otherwise
            flocport_origin[0, i] ← [
                Plant_Origin[0] - totalfloc_dim[0];
                floc_origin[1] + (W_FlocChannel*(1 + i)) + (T_PlantWall*i);
                floc_origin[2] + H_FlocPort[i]
            ]
    return flocport_origin
# The flocport origins were set to start at the top height of the ports themselves (added to the origin otherwise it disappears).  This changes the flocports to be at the bottom of the channel dividing walls instead of at the top (more structurally sound).
flocport_origin = [[-0.135269; 3.36; 0.640774], [-5.36646; 3.96; 0.640774], [-0.117941; 4.56; 0.640774], [-5.36646; 5.16; 0.616335]] m
# The x values were negative. I don't understand how the change in the floc code caused this problem.
# The Channel Opening was changed in the z-direction so that the bottom opening aligned with the bottom of the tank (for the same reason as the flocports).
channelopening_origin := [
    floc_origin[0] - totalfloc_dim[0];
    floc_origin[1] - T_PlantWall;
    floc_origin[2] + totalfloc_dim[2] - channelopening_dim[2]
]
Y_FlocBaffles :=
    for j ∈ 0 .. (N_FlocChannels - 1)
        Y_FlocBaffles[0, j] ← Plant_Origin[1] + (N_SedTanks*(W_Sed + T_PlantWall)) + ((N_FlocChannels - j - 1)*(W_FlocChannel + T_PlantWall))
    return Y_FlocBaffles
# Flocculation Tank Script
Floctanktankscript :=
    layer1 ← layer_new("floctank", dkgrey)
    tank1 ← Tank(floc_origin, totalfloc_dim, T_PlantWall)
    layerset1 ← layer_set("0")
    layerfreeze1 ← layer_freeze("floctank")
    one ← stack(layer1, tank1, layerset1, layerfreeze1)
    return one
Floctankwallscript :=
    local ← layer_new("floctankwall", dkgrey)
    for i ∈ 0 .. (N_FlocChannels - 2)
        local ← stack(local, box(wall_origin[0, i], wall_origin[0, i] + wall_dim), box(flocport_origin[0, i], flocport_origin[0, i] + flocport_dim[0, i]), subtractD(wall_origin[0, i], flocport_origin[0, i]))
        local
    layerset2 ← layer_set("0")
    layerthaw2 ← layer_thaw("floctank")
    bigunion1 ← union_allA
    layerfreeze2 ← layer_freeze("floctankwall")
    layerfreeze3 ← layer_freeze("floctank")
    local ← stack(local, layerset2, layerthaw2, bigunion1, layerset2, layerfreeze2, layerfreeze3)
    return local
Floctankchannelopeningscript :=
    layer3 ← layer_new("flocchannelhole", dkgrey)
    box3 ← box(channelopening_origin, channelopening_origin + channelopening_dim)
    layerset3 ← layer_set("0")
    layerthaw3 ← layer_thaw("floctankwall")
    viewtop ← viewtop1
    subtract3 ← subtractD(floc_origin, [
        floc_origin[0] - totalfloc_dim[0];
        floc_origin[1] - T_PlantWall;
        floc_origin[2] + totalfloc_dim[2] - H_InletChannel
    ])
    bigunion ← union_allA
    layerfreeze3 ← layer_freeze("floctankwall")
    layerfreeze4 ← layer_freeze("flocchannelhole")
    one ← stack(layer3, box3, layerset3, layerthaw3, viewtop, subtract3, bigunion, layerfreeze3, layerfreeze4)
    return ← one
Flocchannelslotscript :=
    if L_slot ≠ 0 m
        local ← layer_new("flocchannelslot", dkgrey)
        layerthaw4 ← layer_thaw("floctankwall")
        x(j) ←
            a ← 0
            for t ∈ 0 .. (rows(X_FlocBaffles) - 1)
                a ← a + 1 if X_FlocBaffles[t, j] ≠ 0
            return a
        for j ∈ 0 .. (N_FlocChannels - 1)
            for i ∈ 0 .. (x(j) - 1)
                slot_origin[i] ← [Plant_Origin[0] - L_Sed; -L_slot; Plant_Origin[2]] + [X_FlocBaffles[i, j]; Y_FlocBaffles[0, j]; Z_FlocBaffles[i, j]]
                slot_dim[i] ← [T_FlocBaffle; W_FlocChannel + 2*L_slot; H_Floc - Z_FlocBaffles[i, j]]
                boxslots ← box(slot_origin[i], slot_origin[i] + slot_dim[i])
                subtract4 ← subtractD(floc_origin, slot_origin[i])
                local ← stack(local, layerthaw4, boxslots, subtract4)
                local
            local
        layerfreeze5 ← layer_freeze("floctankwall")
        local ← stack(local, layerfreeze5)
    return local
Floctankbafflescript :=
    local ← layer_new("baffle", ltpurple)
    x(j) ←
        a ← 0
        for t ∈ 0 .. (rows(X_FlocBaffles) - 1)
            a ← a + 1 if X_FlocBaffles[t, j] ≠ 0
        return a
    for j ∈ 0 .. (N_FlocChannels - 1)
        for i ∈ 0 .. (x(j) - 1)
            baffle_origin[i] ← [Plant_Origin[0] - L_Sed; -L_slot; Plant_Origin[2]] + [X_FlocBaffles[i, j]; Y_FlocBaffles[0, j]; Z_FlocBaffles[i, j]]
            baffle_length[i] ← L_FlocBaffles[i, j]
            local ← stack(local, lamina(baffle_origin[i], Amp_FlocBaffle, W_FlocChannel + 2*L_slot, baffle_length[i], T_FlocBaffle, Per_FlocBaffle, AN_FlocBaffle, N_Baffle, N_FlocBaffleCol, X_FlocBaffle, Y_FlocBaffle)) if Baffle_complex == 1
            local ← stack(local, laminaplain1(baffle_origin[i], W_FlocChannel + 2*L_slot, baffle_length[i], T_FlocBaffle, AN_FlocBaffle - 60 deg, N_Baffle, N_FlocBaffleCol, X_FlocBaffle)) otherwise
            local
        local
    return local
Z_FlocBaffles = [
    0, 0, 0, 0, 0.195063;
    0.167941, 0.167941, 0.167941, 0.185269, 0;
    0, 0, 0, 0, 0.195063;
    0.167941, 0.167941, 0.167941, 0.185269, 0;
    0, 0, 0, 0, 0.195063;
    0.167941, 0.167941, 0.167941, 0.185269, 0;
    0, 0, 0, 0, 0.195063;
    0.167941, 0.167941, 0.167941, 0.185269, 0;
    0, 0, 0, 0, 0.195063;
    0.167941, 0.167941, 0.167941, 0.185269, 0;
    0, 0, 0, 0, 0.195063;
    0.167941, 0.167941, 0.167941, 0.185269, 0;
    0, 0, 0, 0, 0.195063;
    0.167941, 0.167941, 0.167941, 0.185269, 0;
    0, 0, 0, 0, 0.195063;
    0.167941, 0.167941, 0.167941, 0.185269, 0;
    0, 0, 0, 0, 0.195063;
    0.167941, 0.167941, 0.167941, 0.185269, 0;
    0, 0, 0, 0, 0.195063;
    0.167941, 0.167941, 0.167941, 0.185269, 0;
    0, 0, 0, 0, 0.195063;
    0.167941, 0.167941, 0.167941, 0.185269, 0;
    0, 0, 0, 0, 0.195063;
    0.167941, 0.167941, 0.167941, 0, 0;
    0, 0, 0, 0, 0.195063
] m
Floctankendscript :=
    layerset ← layer_set("0")
    layerfreeze1 ← layer_freeze("baffle")
    one ← stack(layerset, layerfreeze1)
    return one
AC_FlocTank := stack(Floctanktankscript, Floctankwallscript, Floctankchannelopeningscript, Flocchannelslotscript, Floctankbafflescript, Floctankendscript)
# [component: inputs AC_FlocTank]
