## Model Inputs
D_Fractal := 2.3  # based on data from Adachi
d_Clay := 2 μm
d_0 := d_Clay
Φ := 45/24  # shape factor for drag on flocs
## Initial densities
ρ_Clay := 2650*kg/m^3
ρ_AlOH3 := 2420*kg/m^3
ρ_H2O := 1000*kg/m^3
ν := 1*10^-6*m^2/s
Al := 27*gm/mole
S := 32.064*gm/mole
O := 16*gm/mole
H := 1.008*gm/mole
Ca := 40*gm/mole
Carbon := 12*gm/mole
MW_Alum := 2*Al + 3*(S + 4*O) + 14.3*(2*H + O)
MW_Alum = 599.821 gm/mol
MW_CalciumCarbonate := Ca + Carbon + 3*O
MW_CalciumCarbonate = 100 gm/mol
MW_AlOH3 := Al + 3*(O + H)
MW_AlPolymer := 13*Al + 32*(O + H) = 895.256 gm/mol
MW_Alum/(2*Al) = 11.1078
# Given alum dose find alum hydroxide concentration
C_AlOH3(C_Al) := C_Al/Al*MW_AlOH3/1
C_AlPolymer(C_Alum) := C_Alum/(MW_Alum/2)*MW_AlPolymer/13
C_Floc(C_Al, C_Clay) := C_AlOH3(C_Al) + C_Clay
Mole_Al(C_Al) := C_Al/Al
N_A := 6.0221415*10^23*mole^-1
# annotation to a formula above: from The NIST Reference on Constants, Units, and Uncertainty, from CODATA Recommended Values of the Fundamental Constants - 2002, by Peter J. Mohr and Barry N. Taylor, National Institute of Standards and Technology.
L_SeparationAl(C_Al) := (1/(N_A*Mole_Al(C_Al)))^(1/3)  # Separation distance between Aluminum molecules
N_Clay(C_Clay) := C_Clay/(ρ_Clay*1/6*π*d_Clay^3)
L_SeparationColloids(C_Clay) := (ρ_Clay/C_Clay*π*d_Clay^3/6)^(1/3)  # Separation distance between clay particles
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ϕ_Floc.0(C_Al, C_Clay) := C_AlOH3(C_Al)/ρ_AlOH3 + C_Clay/ρ_Clay
## Fractal functions
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d(D_Fractal, d_0, i) := d_0*2^(i/D_Fractal)
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n(D_Fractal, d_0, d) := D_Fractal*log(d/d_0, 2)
L_Separation(C_Al, C_Clay, D_Fractal, d_0, d) := d_0*(π/(6*ϕ_Floc.0(C_Al, C_Clay)))^(1/3)*(d/d_0)^(D_Fractal/3)
ϕ(C_Al, C_Clay, D_Fractal, d_0, d) := ϕ_Floc.0(C_Al, C_Clay)*(d/d_0)^(3 - D_Fractal)
ρ_Floc.0(C_Al, C_Clay) := C_Floc(C_Al, C_Clay)/ϕ_Floc.0(C_Al, C_Clay)
## Floc density as a function of size
ρ_Floc(C_Al, C_Clay, D_Fractal, d_0, d) := ((ρ_Floc.0(C_Al, C_Clay) - ρ_H2O)*(d_0/d)^(3 - D_Fractal) + ρ_H2O)
## Floc terminal velocity
V_t(C_Al, C_Clay, D_Fractal, d_0, d) := g*d_0^2/(18*Φ*ν)*(ρ_Floc.0(C_Al, C_Clay) - ρ_H2O)/ρ_H2O*(d/d_0)^(D_Fractal - 1)
## Floc diameter as a function of terminal velocity
d_fVt(C_Al, C_Clay, D_Fractal, d_0, V_t) := d_0*(18*V_t*Φ*ν/(g*d_0^2)*ρ_H2O/(ρ_Floc.0(C_Al, C_Clay) - ρ_H2O))^(1/(D_Fractal - 1))
## Collision times for laminar and turbulent flow mediated collisions
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t_claminar(C_Al, C_Clay, D_Fractal, d_0, d, ε) := 1/6*(6/π)^(1/3)*ϕ_Floc.0(C_Al, C_Clay)^(-2/3)*(ν/ε)^(1/2)*(d/d_0)^(2*D_Fractal/3 - 2)
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t_cturbulent(C_Al, C_Clay, D_Fractal, d_0, d, ε) := 1/6*(6/π)^(1/9)*ϕ_Floc.0(C_Al, C_Clay)^(-8/9)*ε^(-1/3)*d^(2/3)*(d/d_0)^(8*(D_Fractal - 3)/9)
## Kolmogorov length scale
η_Kolmogorov(ε) := (ν^3/ε)^(1/4)
# Size of the floc that has separation distances equal to the Kolmogorov length scale
D_Kolmogorov(C_Al, C_Clay, d_0, D_Fractal, ε) := d_0*(1/d_0*(ν^3/ε)^(1/4)*(6*ϕ_Floc.0(C_Al, C_Clay)/π)^(1/3))^(3/D_Fractal)
t_c(C_Al, C_Clay, D_Fractal, d_0, d, ε) :=
    t_c ← t_claminar(C_Al, C_Clay, D_Fractal, d_0, d, ε) if L_Separation(C_Al, C_Clay, D_Fractal, d_0, d) ≤ η_Kolmogorov(ε)
    t_c ← t_cturbulent(C_Al, C_Clay, D_Fractal, d_0, d, ε) otherwise
    return t_c
t_FlocTotal(C_Al, C_Clay, D_Fractal, d_0, d_Final, ε) :=
    n ← n(D_Fractal, d_0, d_Final)
    t ← 0 s
    for i ∈ 0 .. n - 1
        t ← t + t_c(C_Al, C_Clay, D_Fractal, d_0, d(D_Fractal, d_0, i), ε)
    return t
# Use this function for turbulent flow reactors to calculate the total time for a sequence of collisions
t_FlocTotalLaminar(C_Al, C_Clay, D_Fractal, d_0, d_Final, ε, Π) :=
    n ← n(D_Fractal, d_0, d_Final)
    t ← 0 s
    for i ∈ 0 .. n - 1
        t ← t + t_claminar(C_Al, C_Clay, D_Fractal, d_0, d(D_Fractal, d_0, i), ε)
    return t*Π  # Use this function for laminar flow reactors to calculate the total time for a sequence of collisions
D_FlocMaxf(ε) := 75*μm*(ε/(W/kg))^(-1/3)
# based on Ian's work with floc size as a function of energy dissipation rate, but this is for the average energy dissipation rate in a tube flocculator. It isn't clear how to convert this to the turbulent flow case. Maybe the flocs are mostly experiencing viscous shear. But that isn't clear. Some authors have made the case that floc breakup is due to viscous effects. If that is the case, then the results from the tube flocculatolr should be applicable to the turbulent case. But we have to account for the temporal and spatial variability in the turbulent energy dissipation rate.
