# AguaClara Water Treatment Plants
# Automated Design
# Add variable descriptions next to every varible so it is easy to interpret what this all means.
# Design References
# [reference: BasicInputs3Sed1Bay.xmcd]
# Use BasicClientInputs and ExpertClientInputs when this is run by LabVIEW.
# Use BasicInputs and ExpertInputs to use the program in MathCAD
# Change the reference by
# - right clicking
# - select properties
# - reference tab
# - type in the correct file name
# [reference: ExpertInputs.xmcd]
# [reference: DesignAssumptions.xmcd]
# [reference: MathFunctions.xmcd]
# [reference: PipeDatabase.xmcd]
# [reference: MinorLossCoefficients.xmcd]
# [reference: FluidsFunctions.xmcd]
# [reference: Sedimentation Tank.xmcd]
# [reference: Floc Hopper.xmcd]
# [reference: FCM.xmcd]
# [reference: Flocculator 3.xmcd]
# [reference: RapidMixer.xmcd]
# [reference: Materials List.xmcd]
# [reference: EntranceTankDim.xmcd]
# Sed Tanks and Slopes:
B_SedPort = 3.68418 cm  # Height of the narrowest part of the manifold ports
N_SedTanks = 1
W_SedPort = 3.68418 cm
H_SedBetween = 0 cm  # Distance from the top of the inlet manifold to the bottom of the ledge supporting the lamella frame
A_SedPort = 13.5732 cm^2  # Port Area
L_Sed = 6.70807 m
W_SedSludgeFlat = 5 cm  # Distance between tips of manifold plates (space alloted for the drain holes
N_SedBays = 3  # Number of bays of inlet manifolds in each sed tank
AN_SedTopInlet = 60 deg  # Angle of the top of the inlet manifold
L_SedPort = 4.25412 cm  # Length of the port through which water exits the inlet manifold
AN_SedBottom = 10 deg  # Angle of the bottom of inlet manifold
W_SedSlopePlate = 30 cm  # Width of ferrous cement plates in whice one manifold port is cut
Q_SedBay = 5 L/s
W_SedBayActual = 0.82 m
L_SedSlopeManifold = 0.700718 m  # This is the extra distance between the last slope and the wall
# Sedimentation Tank Sludge Drain:
N_SedSludgeOrifices = 44  # per cell
Ti_SludgeDrain = 30 min  # Tank Drain time
W_SedSludge = 12.6303 cm  # Width of the sludge channel
B_SedSludgeOrifices = 15 cm  # Distance center to center between drain orifices
H_SedSludge = 6.31516 cm  # Depth of the sludge channel
T_SedSludge = 7.4641 cm
T_SedSludge = 7.4641 cm
# Thickness of the plate topping the sludge channel
# through which drain holes are formed
W_SedDrainCover = 19.2376 cm
D_SedSludgeOrifice = 0.012 m  # Diameter of drain orifices
W_SedInletBottom = 0.313812 m
N_SedSludgeOrifices = 44
ND_SedSludgeValve = 3 in
# Sedimentation Tank Dimensions:
Z_SedSludge = 0.137793 m  # Height from 0 of the top of the sludge drain
H_SedBottomSlope = 0.0559525 m  # Height of the bottom slope
H_SedTopSlope = 0.60684 m  # Height of the top of the inlet manifold
Z_SedSlopes = 0.744632 m  # Height from 0 of the top of the inlet manifold
W_Sed = 2.76 m  # Total tank wall height
L_Sed = 6.70807 m  # Total tank length
# Inlet Channel:
HW_InletChannel = 0.319174 m  # Width of the drop chimneys connecting channel to sed inlet manifolds
W_InletChannel = 0.319174 m  # length of drop chimmneys
L_Channel = 3.06 m
W_SedManifoldEntrance = 0.2632 m
L_SedManifoldEntrance = 0.161412 m
H_SedManifoldPort = 0.255132 m  # Ports at bottom of inlet chimney are set to be triangles
W_SedManifoldPort = 0.248759 m
N_SedInletPipes = 2  # per sed bay
H_InletChannel = 0.419174 m
# Sedimentation Tank Effluent Launder:
N_SedLaunderOrifices = 118  # Number of orifices per launder
Q_SedLaunderOrifices = 2.11864e-5 m^3/s  # More Launder Dimensions
ND_SedLaunder = 4 in
B_SedLaunderOrifices = 0.1 m  # Center to center launder spacing
L_SedLaunder = 5.9849 m
# Exit Channel:
D_SedLaunderOrifice = 0.275591 in
W_ExitChannel = 0.254 m
H_ExitChannel = 0.419174 m
L_ExitChannel = 3.06 m
H_PltWeir = 0.223754 m  # height of the weir carrying water to the distribution tank
HW_ExitChannel = 0.279174 m  # water height in exit channel from 0
# Lamella:
L_SedPlate = 0.36576 m
B_SedPlate = 2.12617 cm  # center to center distance between lamella
S_SedPlate = 1.7 cm  # spacing between lamella
N_SedPlates = 232  # Number of Sed Plates per Sedimentation Tank Bay.
AN_SedPlate = 60 deg
ZW_ExitChannel = 1.34221 m
V_SedC = 9.38802 m/day
L_SedActive = 4.84835 m
T
V_SedUp = 70 m/day
Z_SedLaunder = 1.28506 m
H_SedPlate = 0.316757 m
H_SedAbove = 0.1543 m  # Height of water needed above the lamella
N_SedPlates = 232
HW_Sed = 1.38221 m
H_Sed = 1.48221 m
Z_Mp = 1.06304 m
N_SedPorts = 20
H_SedBayDivider = 0.814632 m
W_SedSlopePlateRemaining = 0.708075 m
W_SedBayDivider = 0.15 m
# Sedimentation Tank Floc Hopper:
A_FlocHopper = 1.5552 m^2
L_FlocHopper = 1.89659 m  # Length of the hopper cement plate
L_FlocHopperOffset = 0.18288 m  # distance from the edge of the channel to the bottom of the first lamella (collection distance)
W_FlocHopper = 0.82 m  # width of the hopper set within each bay
# Flow Controller:
# [reference: FCM.xmcd]
N_Fcm = 2
ID_FcmTube = 4.318 mm
ID_FcmTube = 0.17 in
L_FcmTube = 286.178 cm
Q_FcmTubeMax = 337.5 mL/min
HL_FcmValve = 21.1625 cm
# Flocculator: | Look at Flocculator Positioning arrays
# [reference: Flocculation Energy Dissapation.xmcd]
W_FlocChannel = 0.45 m
# Fill last channel with bafffles from last channel
# Fix port width to be based on energy dissipation in that channel
ED_Floc = [20; 2] mW/kg
# Adjust spacing after the number of baffles per channel is known.
# Check the residence time of the flocculator should be at least 20minutes
HW_FlocEnd = 1.38221 m
X_FlocBaffles = [
    0.201003, 0.24117, 0.409872, 0.409872;
    0.442005, 0.52234, 0.859743, 0.859743;
    0.683008, 0.803509, 1.30961, 1.30961;
    0.924011, 1.08468, 1.75949, 1.75949;
    1.16501, 1.36585, 2.20936, 2.20936;
    1.40602, 1.64702, 2.65923, 2.65923;
    1.64702, 1.92819, 3.1091, 3.1091;
    1.88802, 2.20936, 3.55897, 3.55897;
    2.12902, 2.49053, 4.00884, 4.00884;
    2.37003, 2.7717, 4.45872, 4.45872;
    2.61103, 3.05287, 4.90859, 4.90859;
    2.85203, 3.33404, 5.35846, 5.35846;
    3.09303, 3.61521, 5.80833, 5.80833;
    3.33404, 3.89638, 6.2582, 6.2582;
    3.57504, 4.17755, 0, 0;
    3.81604, 4.45872, 0, 0;
    4.05705, 4.73989, 0, 0;
    4.29805, 5.02106, 0, 0;
    4.53905, 5.30223, 0, 0;
    4.78005, 5.5834, 0, 0;
    5.02106, 5.86457, 0, 0;
    5.26206, 6.14573, 0, 0;
    5.50306, 6.4269, 0, 0;
    5.74406, 0, 0, 0;
    5.98507, 0, 0, 0;
    6.22607, 0, 0, 0;
    6.46707, 0, 0, 0
] m
L_FlocBaffles = [
    1.54906, 1.50889, 1.34019, 1.34019;
    1.18121, 1.14104, 0.972338, 0.972338;
    1.54906, 1.50889, 1.34019, 1.34019;
    1.18121, 1.14104, 0.972338, 0.972338;
    1.54906, 1.50889, 1.34019, 1.34019;
    1.18121, 1.14104, 0.972338, 0.972338;
    1.54906, 1.50889, 1.34019, 1.34019;
    1.18121, 1.14104, 0.972338, 0.972338;
    1.54906, 1.50889, 1.34019, 1.34019;
    1.18121, 1.14104, 0.972338, 0.972338;
    1.54906, 1.50889, 1.34019, 1.34019;
    1.18121, 1.14104, 0.972338, 0.972338;
    1.54906, 1.50889, 1.34019, 1.34019;
    1.18121, 1.14104, 0.972338, 0.972338;
    1.54906, 1.50889, 0, 0;
    1.18121, 1.14104, 0, 0;
    1.54906, 1.50889, 0, 0;
    1.18121, 1.14104, 0, 0;
    1.54906, 1.50889, 0, 0;
    1.18121, 1.14104, 0, 0;
    1.54906, 1.50889, 0, 0;
    1.18121, 1.14104, 0, 0;
    1.54906, 1.50889, 0, 0;
    1.18121, 0, 0, 0;
    1.54906, 0, 0, 0;
    1.18121, 0, 0, 0;
    1.54906, 0, 0, 0
] m
Z_FlocBaffles = [
    0, 0, 0, 0;
    0.201003, 0.24117, 0.409872, 0.409872;
    0, 0, 0, 0;
    0.201003, 0.24117, 0.409872, 0.409872;
    0, 0, 0, 0;
    0.201003, 0.24117, 0.409872, 0.409872;
    0, 0, 0, 0;
    0.201003, 0.24117, 0.409872, 0.409872;
    0, 0, 0, 0;
    0.201003, 0.24117, 0.409872, 0.409872;
    0, 0, 0, 0;
    0.201003, 0.24117, 0.409872, 0.409872;
    0, 0, 0, 0;
    0.201003, 0.24117, 0.409872, 0.409872;
    0, 0, 0, 0;
    0.201003, 0.24117, 0, 0;
    0, 0, 0, 0;
    0.201003, 0.24117, 0, 0;
    0, 0, 0, 0;
    0.201003, 0.24117, 0, 0;
    0, 0, 0, 0;
    0.201003, 0.24117, 0, 0;
    0, 0, 0, 0;
    0.201003, 0, 0, 0;
    0, 0, 0, 0;
    0.201003, 0, 0, 0;
    0, 0, 0, 0
] m
N_FlocChannels = 4
L_FlocTank = 26.8323 m
HL_Floc = 26.7851 cm
HW_FlocStart = 1.65006 m
S_FlocBaffle = [20.1003; 24.117; 40.9872; 40.9872] cm
B_FlocBaffle = [24.1003; 28.117; 44.9872; 44.9872] cm
N_FlocChannelBaffles = [27; 23; 14; 14]
W_FlocPort = [0.151003; 0.19117; 0.359872; 0.359872] m
HL_FlocChannels = [12.7642; 7.84078; 3.09007; 3.09007] cm
L_FlocBaffleLower = [1.18121; 1.14104; 0.972338; 0.972338] m
L_FlocBaffleUpper = [1.54906; 1.50889; 1.34019; 1.34019] m
H_FlocPort = [0.599004; 0.567696; 0.512522; 0.512522] m
Ti_Floc = 18.5439 min  # residence time of the flocculator
N_FlocBaffles = 78
# Rapid Mix Unit and Entrance Tank:
# [reference: EntranceTankDim.xmcd]
L_Et = 1.36067 m
W_Et = 1.36067 m
H_Et = 2.05006 m  # Height of Entrance Tank Orifice
W_EtOrifice[30] = 0.031 m
L_trueET[30] = 0.387792 m  # Length of Entrance Tank Orifice
Pi_EtFlow[30] = 0.278388  # Ratio of the minimum flow divided by the maximum flow through the plant.
L_FlocEntryOrifice = 45 cm  # Length of orifice entering into flocculator from Rapid Mix Unit
W_FlocEntryOrifice = 4.08693 cm  # Height of orifice entering into flocculator
ED_Diffusion =  # error: This variable is undefined.  # Minimum Energy Dissipation needed
HL_FlocEntryOrifice = 5.06164 cm  # Head loss caused by entering flocculation tank.
A_FlocEntry = 0.0183912 m^2
A_EtOrifice = 120.215 cm^2
HW_EtTotal =  # error  # Total Height of water at beginning of rapid mix unit
HW_Channel2 =  # error  # Height of water at the back of the entrance tank channel (from channel bottom)
HW_EtChannel = 5.38269 cm  # Height of Waterfall into flocculator
W_EtChannel = 20.1003 cm  # Widt of entrance tank channel
Vol_Stock = 1215 L  # Volume of chemical stock tanks
ZW_ExitChannel = 1.34221 m  # Water Level at the end of the plant in the exit channel and exit channel box
HW_Sed = 1.38221 m
HW_FlocStart = 1.65006 m  # Water level at the beginning of the floc tank
HL_Floc = 26.7851 cm  # just for ref. the head loss throught the floc tank
HW_EtTotal =  # error  # Height of the water in the entrance channel
# Materials List:
# [reference: Materials List.xmcd]
L_LaunderPipe =  # error
N_Launders = 6
L_LaunderPipeTotal = 35.9094 m
N_Valves = 3
N_LaunderCouplings = 6
N_ValveCouplings = 3
N_SedPlatesTotal = 696
N_SedPlatesPerSheet = 10
N_SedPlateSheets = 70
N_PipeSedPlateStand =  # error
A_SedTank = 21.4447 m^2
# [reference: AutoCADMasterProgram.xmcd]
# AutoCAD References
AC_SedTank = [
    "_-view o t"; "-layer m tank"; "c t 132,132,132"; "tank"; "  "; "_-view o t _zoom w 0.16,-0.16,0 -6.86807,2.92,1.48221 _box 0,0,0 -6.70807,2.76,1.48221 _box 0.15,-0.15,-0.15 -6.85807,2.91,1.48221 _subtract 0.15,-0.15,-0.15  0,0,0 "; "-layer s 0"; "  "; "-layer f tank"; "  "
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]
AC_EntranceTank = [
    "-layer m entrancetank";
    "c t 214,214,214";
    "entrancetank";
    "  ";
    "_-view o t _zoom w 0.16,5.15,0 -1.52067,6.83067,2.05006 _box 0,5.31,0 -1.36067,6.67067,2.05006 _box 0.15,5.16,-0.15 -1.51067,6.82067,2.05006 _subtract 0.15,5.16,-0.15  0,5.31,0 ";
    "-layer s 0";
    "  ";
    "-layer f entrancetank";
    "  ";
    "-layer s entrancetank";
    "  ";
    "_box -1.36067,5.16,2.00006 -1.15967,5.31,2.05006";
    "-layer s 0";
    "  ";
    "-layer t entrancetank";
    "  ";
    "_-view o t";
    "_subtract 0.15,5.31,0  -1.36067,5.16,2.00006 ";
    "-layer f entrancetank";
    "  "
]
AC_FlocTank = [
    "-layer m floctank"; "c t 91,91,91"; "floctank"; "  "; "_-view o t _zoom w 0.16,2.75,0 -6.86807,5.32,1.75006 _box 0,2.91,0 -6.70807,5.16,1.75006 _box 0.15,2.76,-0.15 -6.85807,5.31,1.75006 _subtract 0.15,2.76,-0.15  0,2.91,0 "; "-layer s 0"; "  "; "-layer f floctank"; "  "; "-layer m floctankwall"
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]
