# [reference: MasterProgram.xmcd]
# Automated Materials List
# **Remove foundation from wall calculations. Foundation is designed by on-site engineers so dimensions and thickness are unknown**
N_SedPlatesTotal := N_SedPlates*N_SedBays*N_SedTanks
N_SedPlatesPerSheet := floor(L_SedPlateSheet/L_SedPlate)
N_SedPlateSheets := ceil(N_SedPlatesTotal/N_SedPlatesPerSheet) = 70  # Total number of corrugated sheets needed to construct lamella/plate settlers
# This area is the area of the side of tank in plan view.
A_SedTank := (L_Sed + 2*T_PltWall)*(W_Sed*N_SedTanks + (N_SedTanks + 1)*T_PltWall) = 21.4447 m^2
A_FlocTank := (L_Sed + 2*T_PltWall)*(W_FlocChannel*N_FlocChannels + (N_FlocChannels - 1)*T_PltWall) = 19.973 m^2
# Standard Cement
Vol_FlocTank := 2*(L_Sed + T_PlantWall)*T_PlantWall*H_Floc + 2*(W_FlocChannel*N_FlocChannels + N_FlocChannels*T_PlantWall)*T_PlantWall*H_Floc + A_FlocTank*T_PlantWall + (N_FlocChannels - 1)*T_PlantWall*L_Sed*H_Floc = 15.9087 m^3
Vol_InletChannel := (W_InletChannel*H_InletChannel*T_SedManifoldEntrance) + (W_InletChannel + 2*T_ChannelWall)*T_PlantWall*L_Channel + 2*(L_Channel*T_ChannelWall*H_InletChannel) - (A_SedManifoldEntrance*T_SedManifoldEntrance*N_SedInletPipes) = 0.731018 m^3
# **Includes Sedimentation Manifold Entrance**
Vol_ExitChannel := (W_ExitChannel + 2*T_PlantWall)*T_PlantWall*H_ExitChannel + 2*(L_ExitChannel*T_ChannelWall*H_ExitChannel) = 0.426864 m^3
# **Does not include inlet from sed tank and exit to storage tank**
Vol_SedTank := A_SedTank*T_PlantWall + 2*((L_Sed + T_PltWall)*T_PlantWall*H_Sed) + 2*(W_Sed*N_SedTanks + N_SedTanks*T_PltWall)*T_PlantWall*H_Sed - (A_SedSludge*L_Sed) = 7.5067 m^3
Vol_EntranceTank := 2*(W_Et*T_EtWall*H_Et) + 2*(L_Et*T_EtWall*H_Et) - (T_EtWall*W_EtChannel*W_EtChannel) = 1.74869 m^3  # **basic dimensions - no grit chamber**
Vol_StockTank := Q_AlumStockMax*Ti_StockMin = 1.215 m^3
Vol_ExitChannelTank := (2*(S_Elbow + 3*ND_PltWeir + T_ChannelWall) + 2*(4*ND_PltWeir + 3*S_Elbow + T_ChannelWall))*H_Sed*T_ChannelWall = 0.85482 m^3
Vol_InletChannelTank := (2*(S_Elbow + 3*ND_PltWeir + T_ChannelWall) + 2*(2*ND_PltWeir + 2*S_Elbow + T_ChannelWall))*H_Sed*T_ChannelWall = 0.651876 m^3
N_SedInletChimneys := N_SedInletPipes*N_SedBays*N_SedTanks = 6
Vol_SedChimneyPipe := π*(.5*D_SedChimneyPipe)^2*(H_Sed - H_InletChannel - T_ChannelWall - H_SedSludge - T_SedSludge) = 0.0251406 m^3
Vol_SedInletChimneys := N_SedInletChimneys*(W_SedInletBottom*(W_InletChannel + T_ChannelWall)*(H_Sed - H_InletChannel - T_ChannelWall - H_SedSludge - T_SedSludge) - Vol_SedChimneyPipe) = 0.708591 m^3
Vol_TotalWalls := Vol_EntranceTank + Vol_FlocTank + Vol_InletChannel + Vol_SedTank + Vol_ExitChannel + Vol_StockTank + Vol_ExitChannelTank + Vol_InletChannelTank + Vol_SedInletChimneys = 29.7523 m^3
# Ferrous Cement
Vol_DistributionTunnelCovers := T_SedSlopePlate*L_SedSlopeManifold*W_SedSlopePlate*N_SedPorts = 0.168172 m^3
Vol_FlocBafflesTotal := W_FlocChannel*T_FlocBaffle*(L_FlocBaffleLower*ceil(N_FlocChannelBaffles/2) + L_FlocBaffleUpper*floor(N_FlocChannelBaffles/2)) = 2.50481 m^3
# Pipes and Valves
N_PipeSedPlateFrame := W_Sed/B_SedPipe - 1 + L_Sed/B_SedPipe - 1 = 29.5602
L_PipeSedPlateFrameTotal := N_SedTanks*((W_Sed/B_SedPipe - 1)*L_Sed + (L_Sed/B_SedPipe - 1)*W_Sed) = 113.96 m
# Length of pipe needed for Sedimentation Tank Plate Frame at ND.SedPlateFrame
H_SedWeirInlet = 0.300095 m
L_Weir := 2*H_PltWeir = 0.447507 m  # Total length of Weir pipe in Inlet and Exit Channel Tanks at ND.PltWeir
H_SedWeirExit = 0.260095 m
N_Launders := N_SedTanks*N_SedBays*N_SedLaunders
L_LaunderPipeTotal := L_SedLaunder*N_Launders = 34.5019 m  # Total length of launder pipe at ND.SedLaunder
H_PltWeir = 0.223754 m
N_LaunderCouplings := N_Launders  # Number of couplings for launder pipe going through concrete wall
W_SedWeir = 3.06 m
N_Valves := N_SedBays*N_SedTanks  # Valves and valve couplings to drain sedimentation tanks
N_ValveCouplings := N_Valves
ND_PltWeir = 0.2032 m
Del_PltWeirH = 0.0554203 m
