Z_RMMacroOrifice := Z_SedWeirExit
L_RMPipeEst := L_Sed + W_MpWalkway + Z_SedWeirExit
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K_RMPipe := 2*K_El90 + K_PipeExit
# Size the rapid mixer pipe
ND_RMPipe := D_pipeschedule(Q_Plant, EN_PipeSpec, HL_RMPipeEst, L_RMPipeEst, Nu_Water, E_Pvc, K_RMPipe)
D_RMPipe := innerD(ND_RMPipe, EN_PipeSpec)
V_RMPipe := Q_Plant/A_circle(D_RMPipe)
HL_RMPipe := h_l(Q_Plant, D_RMPipe, L_RMPipeEst, K_RMPipe, Nu_Water, E_Pvc)
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HL_RMMicroOrifice := Q_Plant^2/(2*g)*(4/(π*((0.34*4*Q_Plant/π)^3/ED_RMMicroOrifice)^(2/7)) - 1/A_circle(D_RMPipe))^2
# Minimum HL to get target energy dissipation rate
# Minimum head loss for dose controller to work
HL_PlantTotal := HL_SedWeirExit + HL_SedLaunder + HL_Floc + HL_RMPipe + HL_RMMicroOrifice
HL_SedLaunderCum := HL_SedWeirExit + HL_SedLaunder
HL_FlocCum := HL_Floc + HL_SedLaunderCum
HL_RMPipeCum := HL_RMPipe + HL_FlocCum
HL_RMMicroOrificeCum := HL_RMMicroOrifice + HL_RMPipeCum
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# Total area through all of the micro mix orifices
A_RMMicroOrifices := A_circle(D_RMPipe)/(Pi_VenaContractaOrifice*(sqrt(HL_RMMicroOrifice*2*g/V_RMPipe^2) + 1))
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# Diameter of micro mix orifice (if there is only one used)
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D_RMMicroOrifice := D_circle(A_RMMicroOrifices)
# Velocity through the orifice if no jet
V_RMMicroOrifice := Q_Plant/A_RMMicroOrifices
# Velocity through micro orifice jet
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V_RMMicroOrificeJet := V_RMMicroOrifice/Pi_VenaContractaOrifice
# This is the energy dissipation rate through the micro mix orifice if only one orifice is used.  If this value is greater than the minimum ED through the micro mix, then OK.  Else, increase the number
# of orifices
ED_RMMicroOrificeOne := (0.34*V_RMMicroOrificeJet)^3/(D_RMMicroOrifice*sqrt(Pi_VenaContractaOrifice))
D_RMMicroOrificeMax := 1/sqrt(Pi_VenaContractaOrifice)*((0.34*(4*Q_Plant/π))^3/ED_RMMicroOrifice)^(1/7)
# Calculating: Size of Entrance Tank
A_Et := Q_Plant/V_EtUp
L_Et := sqrt(A_Et)
W_Et := A_Et/L_Et
H_Et := HL_PlantTotal + 2*D_RMPipe + H_PlantFreeboard
Z_EtTop := Z_SedWeirExit + HL_PlantTotal + H_PlantFreeboard
