# Sed Tank Functions
Q_Plant := 170*L/s
# [reference: ExpertInputs.xmcd]
# [reference: MathFunctions.xmcd]
# [reference: PipeDatabase.xmcd]
# [reference: MaterialsDatabase.xmcd]
# [reference: FluidsFunctions.xmcd]
Q_SedManifoldMax := Q_PipeED(ED_SedInlet, innerdiameter(ND_SedManifoldMax, PS_Default), Pi_VenaContractaOrifice, Pi_Jet)
Q_SedManifoldMin := Q_PipeED(ED_SedInlet, innerdiameter(ND_SedManifoldMin, PS_Default), Pi_VenaContractaOrifice, Pi_Jet)
N_SedTanks(Q_Plant) := max(min(ceil(Q_Plant/Q_PipeED(ED_SedInlet, innerdiameter(ND_SedManifoldMin, PS_Default), Pi_VenaContractaOrifice, Pi_Jet)), N_SedTanksMin), ceil(Q_Plant/(2*Q_PipeED(ED_SedInlet, innerdiameter(ND_SedManifoldMax, PS_Default), Pi_VenaContractaOrifice, Pi_Jet))))
Q_Sed(Q_Plant, N_SedTanks) := Q_Plant/N_SedTanks
L_SedUpflowMax := Q_SedManifoldMax/(V_SedUpBod*W_SedBay) = 5.57621 m
N_SedBaysTotal(Q_Plant) := ceil(Q_Plant/(V_SedUpBod*W_SedBay*L_SedUpflowMax))
N_SedBaysMin(N_SedTanks) := ceil(ceil(Q_Plant/(V_SedUpBod*W_SedBay*L_SedUpflowMax))/N_SedTanks)
N_SedBaysEst(Q_Plant, N_SedTanks) := min(ceil(Q_Plant/(ceil(ceil(Q_Plant/(V_SedUpBod*W_SedBay*L_SedUpflowMax))/N_SedTanks)*Q_SedManifoldMax)), 2)
N_SedBays(N_SedTanks, Q_Plant) := max(N_SedBaysMin, N_SedBaysEst(Q_Plant, N_SedTanks))  # error: This value has the form: (ƒ(Unitless) → Unitless, Unitless), but must have the form: UniTup2 ƒ(Unitless) → Unitless.
Q_SedBay(Q_Plant, N_SedTanks) := Q_Plant/N_SedTanks/N_SedBays  # error: This variable is undefined.
ND_SedManifold(ED_SedInlet, Q_SedBay) := NominalDiameter(D_PipeED(ED_SedInlet, Q_SedBay, Pi_VenaContractaOrifice, Pi_Jet), PS_Default)
A_SedInletChannelED(Q_Plant, ED_SedInlet) := A_Channel(Q_Plant, ED_SedInlet, Pi_VenaContractaOrifice, Pi_Jet)
W_SedInletChannelPlumbing(ND_SedManifold) := 2*ConRadius(ND_SedManifold) + 2*S_Fitting
L_SedUpflowEst(Q_SedBay, W_SedBay) := Q_SedBay/(W_SedBay*V_SedUpBod)
ND_SedLaunder(Q_SedBay, L_SedUpflowEst) := ND_Manifold(Q_SedBay, HL_SedLaunderBod, L_SedUpflowEst, Pi_QLaunderOrifices, PS_Default, Nu_Water, E_Pvc, K_PipeExit, 2*floor(L_SedUpflowEst/B_SedLaunderOrificesEst))
W_Sed(N_SedBays, W_SedBay) := N_SedBays*W_SedBay
L_SedChannel(N_SedTanks, W_Sed) := N_SedTanks*W_Sed + (N_SedTanks - 1)*T_SedWallDivider + T_PlantWall - T_SedWallDivider
HL_SedWeirExit(Q_Plant, L_SedChannel) := Headloss_weir(Q_Plant, L_SedChannel)
HW_SedInletChannelPlumbing(ND_SedLaunder, HL_SedWeirExit) := HL_SedLaunderBod + 2*ConRadius(ND_SedLaunder) + S_Fitting + HL_SedWeirExit
W_SedInletChannelPreWeir(W_SedInletChannelPlumbing, HW_SedInletChannelPlumbing, A_SedInletChannelED) :=
    W ← W_SedInletChannelPlumbing
    HW ← HW_SedInletChannelPlumbing
    while W*HW < A_SedInletChannelED
        HW ← HW + 1 mm if HW < W
        W ← W + 1 mm otherwise
    return W
HW_SedInletChannel(W_SedInletChannelPlumbing, HW_SedInletChannelPlumbing, A_SedInletChannelED) :=
    W ← W_SedInletChannelPlumbing
    HW ← HW_SedInletChannelPlumbing
    while W*HW < A_SedInletChannelED
        HW ← HW + 1 mm if HW < W
        W ← W + 1 mm otherwise
    return H
EN_InletChannelGeom(Q_Plant, W_SedInletChannelPreWeir) :=
    hl_weir ← Headloss_weir(Q_Plant, W_SedInletChannelPreWeir)
    Geom_Channel ← Perpendicular_Weir if (hl_weir ≤ HL_SedWeirMax)
    Geom_Channel ← Parallel_Weir otherwise
    return Geom_Channel
W_SedWeirInlet(W_SedInletChannelPreWeir, EN_InletChannelGeom, L_SedChannel) :=
    W_SedInletChannelPreWeir if EN_InletChannelGeom == Perpendicular_Weir
    L_SedChannel otherwise
HL_SedWeirInlet(Q_Plant, W_SedWeirInlet) := Headloss_weir(Q_Plant, W_SedWeirInlet)
H_SedWeirInlet(HW_SedInletChannel, HL_SedWeirInlet) := HW_SedInletChannel - HL_SedWeirInlet
W_SedInletChannelPostWeir(Q_Plant, H_SedWeirInlet, L_SedChannel) := max(W_ChannelMin, W_HorizChannel(Q_Plant, H_SedWeirInlet, HL_ChannelMax, L_SedChannel, Nu_Water, E_Concrete, 1))
W_SedInletChannel(W_SedInletChannelPreWeir, EN_InletChannelGeom, W_SedInletChannelPostWeir) :=
    W_SedInletChannelPreWeir if EN_InletChannelGeom == Perpendicular_Weir
    (W_SedInletChannelPreWeir + T_SedWeir + W_SedInletChannelPostWeir) if EN_InletChannelGeom == Parallel_Weir
L_FiEntrancePipeEst(W_SedInletChannel) := W_DCWalkway + W_SedInletChannel + 1 m
ND_FiEntrancePipeMax(W_SedBay, ND_SedManifold) := FloorNearest(Pipesizes[index(FloorNearest(W_SedBay/2 - ConRadius(ND_SedManifold) - 2*S_Fitting, Pipesizes[:, 1]), Pipesizes[:, 1]), 0], AvailND)
ND_FiEntrancePipe(Q_Plant, L_FiEntrancePipeEst, ND_FiEntrancePipeMax) := min(D_pipeschedule(min(Q_Plant, Q_pipetotal(innerdiameter(AvailND[last(AvailND)], PS_Default), HL_FiEntrancePipeMax, L_FiEntrancePipeEst, Nu_Water, E_Pvc, K_FiEntrancePipe)), PS_Default, HL_FiEntrancePipeMax, L_FiEntrancePipeEst, Nu_Water, E_Pvc, K_FiEntrancePipe), ND_FiEntrancePipeMax)
HW_SedExitChannel(HW_SedInletChannel) := HW_SedInletChannel - HL_SedLaunderBod
W_SedExitChannelPreWeir(Q_Plant, HW_SedExitChannel, L_SedChannel, ND_SedLaunder) := max(W_HorizChannel(Q_Plant, HW_SedExitChannel, HL_ChannelMax, L_SedChannel, Nu_Water, E_Concrete, 1), W_ChannelMin, CapHeight(ND_SedLaunder) + 1.05*L_SedLaunderCapExcess)
W_SedExitChannel(W_SedExitChannelPreWeir, W_SedExitChannelPostWeir) := W_SedExitChannelPreWeir + T_SedWeir + W_SedExitChannelPostWeir
L_SedHopper(W_SedExitChannel, W_SedInletChannel) := W_SedExitChannel + T_SedWeir + W_SedInletChannel + T_ChannelWall + 2*T_ConcreteMin
H_SedWeirExit(HW_SedExitChannel, HL_SedWeirExit) := HW_SedExitChannel - HL_SedWeirExit
L_SedUpflow(L_SedUpflowEst, ND_SedLaunder, H_SedWeirExit) :=
    i ← 0
    L ← 0 m
    while L < L_SedUpflowEst
        i ← i + 1
        L ← (H_SedWeirExit + T_ChannelWall - outerdiameter(ND_SedLaunder) - H_LamellaToLaunder - T_SedPlate*cos(AN_SedPlate))/tan(AN_SedPlate) + T_SedPlate/sin(AN_SedPlate) + (PlateIndex[i] - 1)*B_SedPlate/sin(AN_SedPlate) - 2*T_ConcreteMin
    return L
L_Sed(L_SedHopper, L_SedUpflow) := L_SedHopper + L_SedUpflow
