# [reference: BasicInputs3Sed3Bays.xmcd]
# [reference: ExpertInputs.xmcd]
# [reference: DesignAssumptions.xmcd]
# [reference: MathFunctions.xmcd]
# [reference: PipeDatabase.xmcd]
# [reference: MinorLossCoefficients.xmcd]
# [reference: FluidsFunctions.xmcd]
# Influent Sed Manifold Program
# The purpose of this program is to check the design of the sedimentation tank influent manifold and to determine the effect of the ratio of the Manifold to the total port area. Conventional design guidelines suggested a area ratio of 4, but that forces us to use a very large manifold with the likely consequence that more flocs will settle in the manifold. In addition a large manifold will limit the length of our sed tanks or will require the sed tanks to be deeper.
W_SedInlet := W_SedBay/2 - W_SedSludgeFlat/2 - T_SedInletSlope*sin(AN_SedTopInlet) = 44.0359 cm
Q_SedSlopePort := V_SedUpBod*W_SedInlet*W_SedSlopePlate = 6.4219 L/min
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# This calculates the area of the Sed port that will have the given energy dissipation rate needed not to break up the flocs.
B_SedPort := sqrt(A_Port(Q_SedSlopePort, ED_SedInlet, Pi_VenaContractaOrifice)) = 3.83765 cm
# Ports are assumed square here.
L_SedPort := B_SedPort/sin(AN_SedTopInlet) = 4.43133 cm  # The cut length is adjusted for the angle of the plate.
W_SedPort := B_SedPort = 3.83765 cm  # Width is set to make the smallest area the water travels through square.
A_SedPort := B_SedPort*W_SedPort = 0.00147275 m^2  # Port Area
# The following program estimates the head required to provide the flow through the ports and then calculates the flow through every port while keeping track of the changes in the hydraulic grade line.  It then compares the calculated total flow to the desired manifold flow and applies a correction factor
# and then recalculates.
# These Collapsed areas contain functions that  calculate the array of port flows down the length of the manifold and based on these the maximum length the sed tank can be based on a given manifold area.
# From the graph in "Influent sed manifold design model" it can be seen that the Pi.SedArea ratio term should be some where between 1.5 and 2 in order to get about an 85 to 90% flow ratio.
Q_SedSlopePorts(A_SedManifold, V_SedUpBod, W_SedInlet, L_Sed, Pi_SedCell, K_PipeEnt, W_SedSlopePlate, ED_FlocLarge, Pi_VenaContractaOrifice, Nu_Water, E_Concrete) :=
    n_Ports ← floor(L_Sed/W_SedSlopePlate)
    Q_SedSlopePort ← V_SedUpBod*W_SedInlet*W_SedSlopePlate
    A_Port ← A_Port(Q_SedSlopePort, ED_FlocLarge, Pi_VenaContractaOrifice)
    Q_SedInlet ← V_SedUpBod*W_SedInlet*L_Sed
    D_Manifold ← D_circle(A_SedManifold)
    V[0] ← Q_SedInlet/A_SedManifold
    Q_m[0] ← Q_SedInlet
    H_m[0] ← 1/(2*g)*(Q_SedInlet/(n_Ports*Pi_VenaContractaOrifice*A_Port))^2 - V[0]^2/(2*g)
    maxerror ← 0.00001
    error ← 1
    while error > maxerror
        for i ∈ 0 .. n_Ports - 1
            Q_p[i] ← Pi_VenaContractaOrifice*A_Port*sqrt(2*g*H_m[i])
            V[i + 1] ← max(V[i] - Q_p[i]/A_SedManifold, 0.000000001*m/s)
            Q_m[i + 1] ← A_SedManifold*V[i + 1]
            ΔH_Exp ← (V[i] - V[i + 1])*V[i + 1]/g
            H_m[i + 1] ← H_m[i] + V[i]^2/(2*g) - V[i + 1]^2/(2*g) + ΔH_Exp - h_f(Q_m[i + 1], D_Manifold, W_SedSlopePlate, Nu_Water, E_Concrete)
        error ← ((Q_SedInlet/sum(Q_p))^2 - 1)^2
        H_m[0] ← H_m[0]*(Q_SedInlet/sum(Q_p))^2
    return Q_p
# pressure recovery dominates the flow in the manifold and thus to get a decent initial prediction of the required head at the beginning of the manifold we subtract the velocity head. This ends up giving a very good first guess.
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# Port velocity head term - manifold velocity head term
# This prevents the flow from every going backwards in the manifold. When the correct initial head is attained this minimum flow won't be applied anymore. It is needed if the initial head is too low.
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# Use major losses only in manifold
L_MaxSed(A_SedManifold, V_SedUpBod, W_SedBay, Π_SedCell, K_PipeEnt, W_SedSlopePlate, ED_FlocLarge, Pi_FlowManifold, Pi_VenaContractaOrifice, Nu_Water, E_Concrete) :=
    Pi_SedArea ← 2
    Q_SedSlopePort ← V_SedUpBod*W_SedBay/2*W_SedSlopePlate
    A_Port ← A_Port(Q_SedSlopePort, ED_FlocLarge, Pi_VenaContractaOrifice)
    L_Sed ← A_SedManifold/A_Port*W_SedSlopePlate/Pi_SedArea
    Q_Ports ← Q_SedSlopePorts(A_SedManifold, V_SedUpBod, W_SedInlet, L_Sed, Π_SedCell, K_PipeEnt, W_SedSlopePlate, ED_FlocLarge, Pi_VenaContractaOrifice, Nu_Water, E_Concrete)
    Pi_FlowActual ← min(Q_Ports)/max(Q_Ports)
    maxerror ← 0.01
    error ← 1
    iteration ← 0
    L_SedNew ← L_Sed
    while error > maxerror
        iteration ← iteration + 1
        L_Sed ← L_SedNew
        Q_Ports ← Q_SedSlopePorts(A_SedManifold, V_SedUpBod, W_SedInlet, L_Sed, Π_SedCell, K_PipeEnt, W_SedSlopePlate, ED_FlocLarge, Pi_VenaContractaOrifice, Nu_Water, E_Concrete)
        Pi_FlowActual ← min(Q_Ports)/max(Q_Ports)
        error ← |(Pi_FlowActual - Pi_FlowManifold)/(Pi_FlowActual + Pi_FlowManifold)|
        L_SedNew ← L_Sed*(Pi_FlowActual/Pi_FlowManifold)^1
        trace("For iteration {0}, Pi.FlowActual = {1}, L.Sed={2}, L.SedNew={3}", iteration, Pi_FlowActual, L_Sed, L_SedNew)
    return L_SedNew  # intial guess on area ratio
# First assume area ratio of 2, to get initial length of sed tank. Then calculate Pi.FlowManifold and iterate to converge on the target Pi.FlowManifold.
# It is important that this max error be less stringent than the function that it calls (Q.Ports), otherwise this function will oscillate.
# The power relationship was a guess based on trial and error. Higher powers tended to overshoot the solution.
# The trace line can be used to print intermediate results from the loop to see if it is converting (Debug option)
# This is the inside height dimension because it is based on the inside width dimension.
H_SedSlopeManifold := (tan(AN_SedTopInlet) - tan(AN_SedBottomInlet))*W_SedInlet = 0.685077 m
A_SedInletManifold := H_SedSlopeManifold*W_SedInlet/2 = 0.15084 m^2  # Area of the inlet manifold determined by geometry
L_SedMax := L_MaxSed(A_SedInletManifold, V_SedUpBod, W_SedInlet, Pi_SedCell, K_PipeEnt, W_SedSlopePlate, ED_SedInlet, Pi_FlowManifold, Pi_VenaContractaOrifice, Nu_Water, E_Concrete) = 28.2636 m
Q_Sed := Q_Plant/N_SedTanks = 2000 L/min
L_SedTotal := Q_Plant/(V_SedUpBod*W_SedBay) = 123.429 m  # This is the total length of a single valley (or cell) sed tank
N_SedBaysTotal := ceil(L_SedTotal/L_SedMax) = 5  # This is the total number of bays required for the entire plant (not the number per sed tank!)
N_SedBaysMin := ceil(N_SedBaysTotal/N_SedTanks) = 2
N_SedBays := max(N_SedBaysMin, N_SedBaysEst)  # Number of pairs of slopes per sedimentation tank.
L_Sed := Q_Sed/(W_SedBay*N_SedBays*V_SedUpBod)
N_SedPortsMax := floor(L_Sed/W_SedSlopePlate)
N_SedPorts := N_SedPortsMax
W_Sed := N_SedBays*W_SedBay = 3 m
W_SedInlet := W_SedBay/2 - W_SedSludgeFlat/2 - T_SedInletSlope*sin(AN_SedTopInlet) - T_ChannelWall*(N_SedBays - 1)/(2*N_SedBays)
# W.SedInlet is redefined to be accurate for the width loss from adding
# dividing walls between adjacent slope pairs.
Q_SedManifold := Q_Sed/(2*N_SedBays)
Q_SedBay := Q_Sed/N_SedBays
L_SedSlopeManifold := W_SedInlet/cos(AN_SedTopInlet)
W_SedBayActual := (W_Sed - (N_SedBays - 1)*T_ChannelWall)/N_SedBays
# Sludge Drain Program
HL_Valve := 0.8*HW_SedEst
# Here we are assuming that we are willing to use up to 80% of the available energy to get the flow through the valve and discharge it to atmosphere.
Q_SedSludgeDrain := W_SedBay*L_Sed*HW_SedEst/(0.5*Ti_SludgeDrain)  # This is the initial drain rate
# The manifold ports alternate from side to side and thus there is one port every W.SedSlopePlate/2.
B_SedSludgeOrifices := W_SedSlopePlate/2
N_SedSludgeOrifices := floor(L_Sed/B_SedSludgeOrifices) = 91  # This is per Sed Bay
Q_SedSludgeOrifices := Q_SedSludgeDrain/N_SedSludgeOrifices
ND_SedSludgeValve := D_pipeschedule(Q_SedSludgeDrain, EN_PipeSpec, HL_Valve, T_PlantWall, Nu_Water, E_Pvc, K_GateValve + K_PipeExit) = 4 in
# This pipe is actually longer than the thickness of the plant wall. This is not a significant error since major losses are small, but we could eventually see if we can define this more accurately.
HL_Valve := h_e(Q_SedSludgeDrain, innerdiameter(ND_SedSludgeValve, EN_PipeSpec), K_GateValve + K_PipeExit) = 0.834223 m
# This is the actual head loss through the valve given its diameter
HL_SludgeDrain := HW_SedEst - HL_Valve = 1.16578 m
ID_SedSludge := ID_Manifold(Q_SedSludgeDrain, HL_SludgeDrain, L_Sed, Pi_QSludgeOrifices, EN_PipeSpec, Nu_Water, E_Concrete, 0, N_SedSludgeOrifices) = 5.32967 in
# This is the required diameter of the sludge drain if it were circular
HL_SedSludgeEst := HL_Manifold(Q_SedSludgeDrain, ID_SedSludge, L_Sed, 0, Nu_Water, E_Concrete, N_SedSludgeOrifices) = 19.336 cm
HL_SedSludgeOrificeEst := HL_SludgeDrain - HL_SedSludgeEst = 97.2417 cm
D_SedSludgeOrifice := RoundNearest(D_circle(A_orifice(HL_SedSludgeOrificeEst, Pi_VenaContractaOrifice, Q_SedSludgeOrifices)), D_Drill) = 11.1125 mm
A_SedSludge := π/4*ID_SedSludge^2
W_SedSludge := sqrt(2*A_SedSludge) = 0.169666 m  # Assume sludge drain is twice as wide as it is high (to save depth in the sed tank)
H_SedSludge := A_SedSludge/W_SedSludge = 0.0848328 m
T_SedSludge := T_SedInletSlope*(1 + sin(AN_SedTopInlet))
W_SedDrainCover := W_SedSludgeFlat + 2*W_SedSludgeSF + 2*T_SedInletSlope/sin(AN_SedTopInlet)
W_SedInletBottom := W_SedBayActual/2 - W_SedDrainCover/2
Z_SedSludge := T_SedSludge + H_SedSludge = 0.159474 m
H_SedTopSlope := W_SedInlet*tan(AN_SedTopInlet) = 0.676122 m
H_SlopeThickness := T_SedInletSlope/cos(AN_SedTopInlet) = 0.08 m
Z_SedSlopes := Z_SedSludge + H_SedTopSlope = 0.835595 m
# Inlet Channel Design
# Length of the Inlet Channel
L_Channel := N_SedTanks*W_Sed + (N_SedTanks + 1)*T_PlantWall
# This sets the hieght of hte water in the channel to be the equal to the ledge that the lamella are sitting on.
A_InletChannel := A_Port(Q_Plant, ED_SedInlet, Pi_VenaContractaOrifice)
HW_InletChannel := sqrt(A_InletChannel)  # Height of the water in the Inlet Channel
# The length is based on the side of the sed tank
W_InletChannelED := A_InletChannel/HW_InletChannel
A_SedManifoldEntrance := A_Port(Q_SedManifold, ED_SedInlet, Pi_VenaContractaOrifice)
A_SedChimneyPipeMin := A_Port(Q_SedManifold, ED_Floc[1], Pi_VenaContractaOrifice)
ND_Pipesizes :=
    for i ∈ 0 .. rows(Pipesizes) - 1
        ND_Pipesizes[i] ← Pipesizes[i, 1]
    return ND_Pipesizes
D_Pipesizes :=
    for i ∈ 0 .. rows(Pipesizes) - 1
        ND_Pipesizes[i] ← Pipesizes[i, 0]
    return ND_Pipesizes
D_SedChimneyPipe := Dpipelarger(2*sqrt(A_SedChimneyPipeMin/π), D_Pipesizes)
ND_SedChimneyPipe := Dpipelarger(2*sqrt(A_SedChimneyPipeMin/π), ND_Pipesizes)
A_SedChimneyPipe := (D_SedChimneyPipe/2)^2*π
W_SedManifoldEntrance := D_SedChimneyPipe + 2*S_SedInletChannelMin
W_InletChannel := max(W_InletChannelED, W_SedManifoldEntrance) = 0.719666 m
# The width of the channel is based on the necessity to be at least as great as the width determined with G, but also must be wide enough to fit sed inlet pipes.  This W.channel chooses the larger choice to fulfill both needs.
L_SedManifoldEntrance := W_SedInletBottom - 3*T_SedManifoldEntrance = 0.201412 m
W_SedManifoldPort := W_SedInlet - 2*T_SedManifoldEntrance
H_SedBottomSlope := (W_SedInlet - ((W_SedDrainCover - W_SedSludge)/2))*tan(AN_SedBottomInlet) = 0.0668286 m
H_SedManifoldPort := 2*(A_SedManifoldEntrance + 0.5*H_SedBottomSlope*W_SedInlet)/W_SedManifoldPort
AN_SedManifoldPort := atan(H_SedManifoldPort/W_SedManifoldPort)
H_InletChannel := HW_InletChannel + H_PlantFreeboard = 0.819666 m
N_SedPorts := floor((L_Sed - W_InletChannel - T_ChannelWall)/W_SedSlopePlate)
W_SedSlopePlateRemaining := L_Sed - N_SedPorts*W_SedSlopePlate  # This is the extra space left at the end of the sed tank that will not fit another slope plate
# Exit Channel Design
# The length is based on the side of the sed tank, this is also the same length of the inlet channel.
L_ExitChannel := N_SedTanks*W_Sed + (N_SedTanks + 1)*T_PlantWall
# To Calculate the Width of the channel the width of the exit weir needs to be determined.
# The weir equation is used to determine the nominal size for the diameter of the weir (Assumes a circular over flow weir)
D_PltWeirEstimated := (3*Q_Plant/(2*Cd_PltWeir*sqrt(2*g)*π*Pi_PltWeir^(3/2)))^(2/5)
# Using the pipe database file, and given the schedule of the pipe, the actual nominal diameter of the pipe is determined
ND_PltWeir := NominalPipeSize(D_PltWeirEstimated) = 16 in
# The width of the exit channel will either be the same as the width of the inlet channel or as wide as the Outer Diameter of the exit weir.
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Del_PltWeirH := (3*Q_Plant/(2*Cd_PltWeir*sqrt(2*g)*π*ND_PltWeir))^(2/3)
# To ensure uniform distribution of flow between tank bays, head loss in the channel was designed to be twenty times smaller than head loss in the launder. After converting from head loss to flow, the ratio of flow rates in the launders is calculated to be sqrt(20/21)
Π_QSedTanks := sqrt(20/21)
W_ExitChannelMin := 0.254 m  # The tank needs to be wide enough for a hand to fit in to cap the launder.
FindSide(Q, w, b, L, υ, ε, open) :=
    b ← W_InletChannel
    w ← b
    error ← 1
    while error > 0.001
        h_temp ← h_frect(Q, w, b, L, υ, ε, open)
        b ← b*(h_temp/HL_SedLaunderBod*Π_QSedTanks^2/(1 - Π_QSedTanks^2))^(1/4)
        w ← b
        error ← |h_temp/HL_SedLaunderBod - (1 - Π_QSedTanks^2)/Π_QSedTanks^2|
    return w
# Calculates the minimum exit channel width
# using the ratio from above
# If minimum width calculated above is too small it is replaced
# by 0.254m.
W_ExitChannel := max(W_ExitChannelMin, FindSide(Q_Plant, W_InletChannel, W_InletChannel, L_Channel, Nu_Water, E_Concrete, 1))
# Using the inner diameter, the actual spacing above the weir is calculated
L_SedLaunder := L_Sed - W_InletChannel - W_ExitChannel - T_ChannelWall
# The actual weir height is determined using the actual inner diameter of the pipe and the weir equation
HW_ExitChannel := HW_InletChannel - HL_SedLaunderBod
H_ExitChannel := H_InletChannel
H_PltWeir := HW_ExitChannel - Del_PltWeirH = 0.555999 m
# Launderer Design
# 1. Equally divide the flow from the plant into each sedimentation tank.
# 2. Calculate the number of orifices using an equal spacing on the length of the launder.
# 3. The flow through each orifice is the flow in the tank divided by the number of orifices.
# 4. The elevation of the manifold launder should be placed in the middle of the water depth above the lamella in the sedimentation tank.
# 5. Find the length of the longest and shortest launders to the plant leveling tank.
# 6. Using an iterative program, and the available pipe sizes from the pipe database, the launder diameter is determined with a function from fluids functions
# 7.Sum the number of bends in the launder piping
# 8. Use function to find equal flow between parallel pipes.
# 9. The diameter of the launder is the max value of 6 and 8.
# 10. Calculate the total headloss in the launder.
# 11. Calculate the total headloss in the orifice.
# 12. Use orifice equation to find diameter of orifice holes.
# The launder will be located between the top of the lamella and the surface of the water in the sedimentation tank, the orifices will be at the center of the launders
# Clarify this. Where are the orifices located? Current proposal is that the two rows be about 135 degrees apart and face slightly downward.
# Add solution method description
L_SedLaunderEst := L_Sed - 2*W_InletChannel - T_ChannelWall = 12.125 m  # This estimate is good enough to do a full launder design
# 2.
N_SedLaunderOrifices := 2*floor(L_SedLaunderEst/B_SedLaunderOrifices) = 242  # This 2 must be from the assumption that there are two rows of orifices.
# 3.
Q_SedLaunderOrifices := (Q_SedBay/N_SedLaunders)/N_SedLaunderOrifices = 2.29568e-5 m^3/s
# 6.
K_SedLaunder := K_PipeExit = 1
# 7.
ND_SedLaunder := ND_Manifold(Q_SedBay/N_SedLaunders, HL_SedLaunderBod, L_SedLaunderEst, Pi_QLaunderOrifices, EN_PipeSpec, Nu_Water, E_Pvc, K_SedLaunder, N_SedLaunderOrifices) = 6 in
# 10.
HL_SedLaunderManifold := HL_Manifold(Q_SedBay/N_SedLaunders, ND_SedLaunder, L_SedLaunderEst, 0, Nu_Water, E_Pvc, N_SedLaunderOrifices) = 0.300473 cm
# 11.
HL_SedLaunderOrifice := HL_SedLaunderBod - HL_SedLaunderManifold = 0.0369953 m
# 12.
D_SedLaunderOrifice := RoundNearest(D_circle(A_orifice(HL_SedLaunderOrifice, Pi_VenaContractaOrifice, Q_SedLaunderOrifices)), D_Drill) = 0.3125 in
HL_SedLaunder := HL_SedLaunderBod = 0.04 m
# Currently HL.launder is used up and thus the water level in the plant level tank is HL.launder below the sed tank.
# If we round up to the next available drill bit diameter the head loss will drop slightly. We could then calculate a new actual total headloss. For now ...
# Lamella Design
H_SedAbove := outerdiameter(ND_SedLaunder) + HL_SedLaunder = 20.8275 cm
S_SedPlate := B_SedPlateMin - T_SedPlate = 1.7 cm
L_SedPlateEst :=
    L1 ← HW_InletChannel*cos(AN_SedPlate)
    L2 ← 0 m
    while |L1 - L2| > 0.01 m
        L_Inactive ← L1*cos(AN_SedPlate) + W_InletChannel + W_ExitChannel + 2*T_ChannelWall
        V_Up ← Q_Sed/(W_Sed*(L_Sed - L_Inactive))
        L2 ← (B_SedPlateMin*(V_Up/V_SedCBod - 1) + T_SedPlate)/(sin(AN_SedPlate)*cos(AN_SedPlate))
        L1 ← L2
    return L1
L_SedPlateEst = 0.331179 m
L_SedPlate := L_SedPlateSheet/floor(L_SedPlateSheet/L_SedPlateEst) = 0.333333 m
L_SedInactive := L_SedPlate*cos(AN_SedPlate) + W_InletChannel + W_ExitChannel + 2*T_ChannelWall
L_SedActiveMax := L_Sed - L_SedInactive = 11.983 m
V_SedUpActiveBelow := Q_Sed/(W_Sed*(L_Sed - L_SedInactive))
B_SedPlate := (L_SedPlate*sin(AN_SedPlate)*cos(AN_SedPlate) - T_SedPlate)/(V_SedUpActiveBelow/V_SedCBod - 1) = 2.01584 cm
B_SedPlateHorizontal := B_SedPlate/sin(AN_SedPlate)
N_SedPlates := ceil(L_SedActiveMax/B_SedPlateHorizontal) + 1 = 516
H_SedPlate := L_SedPlate*sin(AN_SedPlate)
H_SedPlate = 0.288675 m
# Now calculate actual values of all parameters!
L_SedActive := L_Sed - L_SedInactive - N_SedPlates*T_SedPlate/sin(AN_SedPlate) = 10.1955 m
# Number of spaces where water is traveling is one less than the number of plates used to create those spaces
V_SedUp := Q_Sed/(L_Sed*W_Sed) = 70 m/day
V_SedUpActive := Q_Sed/(L_SedActive*W_Sed) = 94.1592 m/day
V_SedC := V_SedUpActive/(1 + L_SedPlate/S_SedPlate*cos(AN_SedPlate)*sin(AN_SedPlate)) = 9.92147 m/day
HW_Sed := max(Z_SedSlopes + H_SedFrameWall + H_SedBetween + 2*outerdiameter(ND_SedPlateFrame) + H_SedPlate + H_SedAbove, H_SedManifoldPort + H_SedBetween + T_ChannelWall + H_InletChannel)
HW_Sed = 1.49907 m
H_SedBetween = 0
Z_SedSlopes = 0.835595 m
H_SedAbove = 0.208275 m
2*outerdiameter(ND_SedPlateFrame) = 0.09652 m
H_SedPlate = 0.288675 m
Z_SedSlopes + H_SedFrameWall + H_SedBetween + 2*outerdiameter(ND_SedPlateFrame) + H_SedPlate + H_SedAbove = 1.49907 m
H_SedFrameWall = 0.07 m
H_Sed := HW_Sed + H_PlantFreeboard
Z_Mp := HW_Sed - HW_InletChannel = 0.779399 m
Z_SedLaunder := HW_Sed - HL_SedLaunder - outerradius(ND_SedLaunder) = 1.37493 m
ZW_ExitChannel := HW_Sed - HL_SedLaunder = 1.45907 m
H_SedBayDivider := Z_SedSlopes + H_SedFrameWall
W_SedBayDivider := T_ChannelWall
Z_MP := HW_Sed - HW_InletChannel
H_SedWeir := HW_ExitChannel = 0.679666 m
HL_SedWeirEst := h_erect(Q_Plant, W_ExitChannel, HW_ExitChannel, K_RmOrifice)
H_ExitChannel - H_PlantFreeboard = 0.719666 m
H_SedWeir + HL_SedWeirEst = 0.684497 m
W_SedWeir :=
    W_SedWeir ← W_ExitChannel
    while H_ExitChannel - H_PlantFreeboard < H_SedWeir + HL_SedWeirEst
        W_SedWeir ← W_SedWeir + 1 cm
        HL_SedWeir ← h_erect(Q_Plant, W_SedWeir, HW_ExitChannel, K_RmOrifice)
    return W_SedWeir
W_SedWeir = 0.544977 m
