# Sedimentation Tank
# Preliminary Dimension and Flow Calculations
# Maximum length of the upflow section of the sed tank is based on the maximum flow rate through the inlet manifold pipe to stay below the maximum energy dissipation rate to prevent floc breakup and the desired upflow velocity to maintain a floc blanket.
L_SedUpflowMax := Q_PipeED(ED_SedInlet, innerD(ND_SedManifoldMax, PS_Default), Pi_VenaContractaOrifice, Pi_Jet)/(V_SedUpBod*W_SedBay) = 14.5715 m
Q_Sed := Q_Plant/N_SedTanks = 0.0106667 m^3/s  # Flow rate through one sed tank.
# There is a minimum number of total sed bays required to maintain the desired upflow velocity in each sed tank given the maximum length calculated above.
N_SedBaysTotal := ceil(Q_Plant/(V_SedUpBod*W_SedBay*L_SedUpflowMax)) = 3
N_SedBaysMin := ceil(N_SedBaysTotal/N_SedTanks) = 1  # Minimum number of sed bays per sed tank given the minimum total number calculated above.
N_SedBays := max(N_SedBaysMin, N_SedBaysEst) = 2  # The number of bays per tank is the maximum of the calculated value and the user input
W_Sed := N_SedBays*W_SedBay
Q_SedBay := Q_Sed/N_SedBays
Q_SedManifold := Q_SedBay  # There is one manifold per bay
ND_SedManifold := NominalDiameter(D_PipeED(ED_SedInlet, Q_SedBay, Pi_VenaContractaOrifice, Pi_Jet), PS_Default)
L_SedUpflowEst := Q_SedBay/(W_SedBay*V_SedUpBod)
ND_SedLaunder := ND_Manifold(Q_SedBay, HL_SedLaunderBod, L_SedUpflowEst, Pi_QLaunderOrifices, PS_Default, Nu_Water, E_Pvc, K_PipeExit, 2*floor(L_SedUpflowEst/B_SedLaunderOrificesEst))
# Inlet Channel Design
L_SedChannel := N_SedTanks*W_Sed + (N_SedTanks - 1)*T_PlantWall  # Length of the inlet channel, which runs along the entire width of the sed tanks.
# The area of the inlet channel must be large enough not to break up flocs
A_SedInletChannelED := A_Channel(Q_Plant, ED_SedInlet, Pi_VenaContractaOrifice, Pi_Jet)
HW_SedWeirExit := 2*ConRadius(ND_SedLaunder)
W_SedInletChannelPlumbing := 2*ConRadius(ND_SedManifold) + 2*S_Fitting = 0.336537 m
HW_SedInletChannelPlumbing := HL_SedLaunderBod + 2*ConRadius(ND_SedLaunder) + T_ConcreteMin = 0.27415 m
[W_SedInletChannelPreWeir; HW_SedInletChannel] :=
    W ← W_SedInletChannelPlumbing
    HW ← HW_SedInletChannelPlumbing
    while W*HW < A_SedInletChannelED
        HW ← HW + 1 mm if HW < W
        W ← W + 1 mm otherwise
    return [W; HW]
H_SedInletChannel := HW_SedInletChannel + H_PlantFreeboard
EN_InletChannelGeom :=
    hl_weir ← Headloss_weir(Q_Plant, W_SedInletChannelPreWeir)
    Geom_Channel ← Perpendicular_Weir if (hl_weir ≤ HL_SedWeirMax)
    Geom_Channel ← Parallel_Weir otherwise
    return Geom_Channel
# This function determines the geometry of the weir based on the headloss through it. Hl.SedWeirMax is an expert input. 0-->Perpendicular, 1--> Parallel
W_SedWeirInlet :=
    W_SedInletChannelPreWeir if EN_InletChannelGeom == Perpendicular_Weir
    L_SedChannel otherwise
HL_SedWeirInlet := Headloss_weir(Q_Plant, W_SedWeirInlet) = 0.0195369 m
H_SedWeirInlet := HW_SedInletChannel + 2 cm = 0.40815 m
W_SedInletChannelPostWeir := max(W_ChannelMin, W_HorizChannel(Q_Plant, H_SedWeirInlet, HL_ChannelMax, L_SedChannel, Nu_Water, E_Concrete, 1))
W_SedInletChannel :=
    W_SedInletChannelPreWeir if EN_InletChannelGeom == Perpendicular_Weir
    W_SedInletChannelPreWeir + T_SedWeir + W_SedInletChannelPostWeir if EN_InletChannelGeom == Parallel_Weir
V_SedInletChannel := Q_Plant/(W_SedInletChannelPreWeir*HW_SedInletChannel) = 0.212186 m/s
# This is the velocity in the part of the channel that delivers the flocs
L_SedEst := 4 m
ND_SedInletChannelDrain := NominalDiameter(D_PipeTotal(Q_Plant, HW_SedEst, HW_SedEst + L_SedEst, Nu_Water, E_Pvc, K_PipeEnt + K_PipeExit + K_El90), PS_Default) = 6 in
W_SedInletChannelDrainBox := max(2*S_Fitting + 2*ConRadius(ND_SedInletChannelDrain), W_SedInletChannelPostWeir)
# Exit Channel Design
ND_SedExitChannelDrain := NominalDiameter(D_PipeTotal(Q_Plant, HW_SedEst, HW_SedEst, Nu_Water, E_Pvc, K_PipeEnt + K_PipeExit + K_El90), PS_Default) = 6 in
H_SedExitChannel := H_SedInletChannel
HW_SedExitChannel := HW_SedInletChannel - HL_SedLaunderBod
W_SedExitChannelPreWeir := max(W_HorizChannel(Q_Plant, HW_SedExitChannel, HL_ChannelMax, L_SedChannel - W_SedBay/2, Nu_Water, E_Concrete, 1), W_ChannelMin, CapHeight(ND_SedLaunder) + 1.05*L_SedLaunderCapExcess)
L_SedFilterChannelEst := L_SedChannel + 1 m  # we lose about half of a bay width due to accomodating pipes
W_FiltWeirEst := 0.8 m
N_Filters := 2
HL_FiltWeirEst := Headloss_weir(Q_Plant/N_Filters, W_FiltWeirEst)
# totally confused by this!!!
HL_SedFilterChannelMax :=
    HL_Max ← HL_ChannelMax
    error ← 999
    while |error| > 0.03
        HL_Max ← HL_Max - 0.1 mm
        error ← 1 - Q_RectWeir(HL_FiltWeirEst, W_FiltWeirEst)/Q_RectWeir(HL_FiltWeirEst + HL_Max, W_FiltWeirEst)
    return HL_Max
Q_RectWeir(HL_FiltWeirEst, W_FiltWeirEst) = L/s
Q_RectWeir(HL_FiltWeirEst + 1 mm, W_FiltWeirEst) = L/s
W_SedExitChannelPostWeir := max(W_ChannelMin, W_HorizChannel(Q_Plant, H_SedWeirInlet, HL_SedFilterChannelMax, N_Filters*W_FiltWeirEst, Nu_Water, E_Concrete, 1)) = 59.7703 cm
W_SedExitChannelPostWeir := max(W_ChannelMin, W_HorizChannel(Q_Plant, H_SedWeirInlet, HL_ChannelMax, L_SedChannel - W_SedBay/2, Nu_Water, E_Concrete, 1)) = 0.15 m
EN_ExitChannelGeom :=
    hl_perpweir ← Headloss_weir(Q_Plant, max(W_SedExitChannelPreWeir, 2*S_Fitting + 2*ConRadius(ND_SedExitChannelDrain)))
    Geom_Channel ← Perpendicular_Weir if (hl_perpweir ≤ HL_SedWeirMax)
    Geom_Channel ← Parallel_Weir otherwise
    return Geom_Channel
W_SedWeirExit :=
    max(W_SedExitChannelPreWeir, 2*S_Fitting + 2*ConRadius(ND_SedExitChannelDrain)) if EN_ExitChannelGeom == Perpendicular_Weir
    L_SedChannel - 2*S_Fitting - 2*ConRadius(ND_SedExitChannelDrain) + W_SedExitChannelPostWeir otherwise
HL_SedWeirExit := Headloss_weir(Q_Plant, W_SedWeirExit)
H_SedWeirExit := HW_SedExitChannel - HL_SedWeirExit
W_SedExitChannel :=
    max(W_SedExitChannelPreWeir, 2*S_Fitting + 2*ConRadius(ND_SedExitChannelDrain)) if EN_ExitChannelGeom == Perpendicular_Weir
    max(W_SedExitChannelPreWeir + T_SedWeir + W_SedExitChannelPostWeir, 2*S_Fitting + 2*ConRadius(ND_SedExitChannelDrain)) otherwise
H_ExitChannelLaunder := H_SedWeirExit - outerdiameter(ND_SedLaunder)
W_SedExitChannelDrainBox := max(2*S_Fitting + 2*ConRadius(ND_SedExitChannelDrain), W_SedExitChannelPreWeir)
# Upflow Length and Number of Plates
S_SedPlate := S_SedPlateMin
B_SedPlate := S_SedPlate + T_SedPlate
N_SedModulePlatesMax := floor(L_SedPlateCantilevered/B_SedPlate*tan(AN_SedPlate) + 1) = 13
N_SedModulePlatesMin := 8
PlateIndex :=
    for j ∈ N_SedModulePlatesMin .. N_SedModulePlatesMax
        for i ∈ 0 .. 50
            matrix[i, j - N_SedModulePlatesMin] ← j*(i + 1)
    array ← matrix[:, 0]
    for j ∈ N_SedModulePlatesMin + 1 .. N_SedModulePlatesMax
        array ← stack(array, matrix[:, j - N_SedModulePlatesMin])
    array ← sort(array)
    i ← 0
    while i < (last(array) - 1)
        array ← stack(submatrix(array, 0, i, 0, 0), submatrix(array, i + 2, last(array), 0, 0)) if array[i] == array[i + 1]
        array ← submatrix(array, 0, i + 1, 0, 0) if (i + 1 == i + 2 and i + 2 == last(array))
        i ← i + 1
    return array
H_LamellaToLaunder := T_ConcreteMin + CapThickness(ND_SedLaunder)
L_SedUpflow :=
    i ← 0
    L ← 0 m
    while L < L_SedUpflowEst
        i ← i + 1
        L ← (H_SedWeirExit + T_ChannelWall - outerdiameter(ND_SedLaunder) - H_LamellaToLaunder - T_SedPlate*cos(AN_SedPlate))/tan(AN_SedPlate) + T_SedPlate/sin(AN_SedPlate) + (PlateIndex[i] - 1)*B_SedPlate/sin(AN_SedPlate)
    return L
N_SedPlates := (L_SedUpflow - (H_SedWeirExit + T_ChannelWall - outerdiameter(ND_SedLaunder) - H_LamellaToLaunder - T_SedPlate*cos(AN_SedPlate))/tan(AN_SedPlate) - T_SedPlate/sin(AN_SedPlate))/(B_SedPlate/sin(AN_SedPlate)) + 1 = 168
V_SedUp := Q_SedBay/(L_SedUpflow*W_SedBay)
# Tank and Hopper Length
L_SedHopper := W_SedExitChannel + T_SedWeir + W_SedInletChannel + T_ChannelWall
L_Sed := L_SedHopper + L_SedUpflow = 6.47087 m
# Sludge Drain
# This is the initial drain rate
# The factor of two is because the flow rate decreases linearly as the tank drain (for a constant cross section tank). Thus the average drain rate is 1/2 the initial drain rate.
Q_SedSludgeDrain := 2*W_SedBay*L_SedUpflow*HW_SedEst/Ti_SludgeDrain
N_SedSludgeOrificesEst := floor(L_SedUpflow/B_SedSludgeOrificesEst) - 1 = 52
Q_SedSludgeOrificesEst := Q_SedSludgeDrain/N_SedSludgeOrificesEst
# This is the required diameter of the sludge drain if it were circular
# To get the effective "diameter" of the sludge drain manifold (the cross section will actually be a polygon) an approximate length for the portion of the sludge drain which runs under the floc hopper is assumed to be 1m and is entered in the manifold function as if its section had inlet holes as well. Since the effect of the additional length on the calculated "diameter" is very small, the accuracy of these assumptions is not very important.
D_SedSludgeChannel := D_Manifold(Q_SedSludgeDrain, HW_SedEst/3, L_SedUpflow, Pi_QSludgeOrifices, Nu_Water, E_Concrete, 0, N_SedSludgeOrificesEst) = 0.103995 m
ND_SedSludgePipe := NominalDiameter(D_PipeTotal(Q_SedSludgeDrain, HW_SedEst/3, L_SedUpflow + L_FlocHopperEst, Nu_Water, E_Pvc, K_PipeExit + K_GateValve), PS_Default) = 0.1016 m
# Something is wrong with these diameter functions.
HL_SedSludgeEst := HL_Manifold(Q_SedSludgeDrain, D_SedSludgeChannel, L_SedUpflow + L_FlocHopperEst, 0, Nu_Water, E_Concrete, N_SedSludgeOrificesEst) + h_l(Q_SedSludgeDrain, innerdiameter(ND_SedSludgePipe, PS_Default), L_FlocHopperEst + ValveLength(ND_SedSludgePipe) + 10 cm, K_GateValve + K_PipeExit, Nu_Water, E_Pvc)
HL_SedSludgeOrificeEst := HW_SedEst - HL_SedSludgeEst = 1.73963 m
# The cross sectional area of the drain if it were circular
A_SedSludge := π/4*D_SedSludgeChannel^2
# Assume sludge drain square to keep width of sludge drain cover narrow
W_SedSludge := sqrt(A_SedSludge)
H_SedSludge := A_SedSludge/W_SedSludge
Z_SedSludge := H_SedSludge = 0.0921634 m  # Elevation of the top of the sludge drain channel (and the bottom of the drain cover).
# The jet reverser is the semi-circular trough in the center of the drain cover into which the jets from the inlet manifold discharge and re-suspend sludge. The concrete semi-circle will be cast using a length of PVC pipe.
#
# Jet reverser diameter should be at least 2x the width of the diffuser port
W_SedDiffuserOutlet := 1 cm
ND_SedDiffuser := 1 in
ND_SedJetReverser := 1 in
S_ReversedHalfJet := (outerdiameter(ND_SedJetReverser) - W_SedDiffuserOutlet)/2 - (outerradius(ND_SedDiffuser) - innerdiameter(ND_SedDiffuser, PS_Default)/2) = 0.99225 cm
# This is the space between the lip of the jet reverser and the outer wall of the diffuser pipe through which the reversed jet must pass. Compare with the natural width of the reversed jet calculated next.
W_SedJet := W_SedDiffuserOutlet/2*Pi_VenaContractaOrifice^2 = 0.19845 cm
T_SedDrainCoverLedge := max(2 cm, outerradius(ND_SedJetReverser) - W_SedSludge/2)
W_SedDrainCover := max(W_SedSludge + 2*T_SedDrainCoverLedge, outerdiameter(ND_SedJetReverser)) = 5.20328 in
# The drain cover needs to be wide enough to rest on the ledges of the drain channel, and also needs to be at least as wide as the jet reverser.
L_SedDrainCoverSlopes := (W_SedDrainCover - outerdiameter(ND_SedJetReverser))/2
H_SedDrainCoverTotal := T_ConcreteMin + outerradius(ND_SedJetReverser) + L_SedDrainCoverSlopes*tan(AN_SedSlope) = 4.94294 in
A_SedDrainCover := H_SedDrainCoverTotal*W_SedDrainCover - L_SedDrainCoverSlopes*tan(AN_SedSlope)*(2*L_SedDrainCoverSlopes + outerdiameter(ND_SedJetReverser)) - 1/2*π*outerradius(ND_SedJetReverser)^2
ρ_Concrete := 2400*kg/m^3
M_DrainCoverMax := 20 kg
S_SedDrainCoverSegment := 2 mm
L_SedDrainCoverTotal := L_Sed - L_SedHopper - T_SedWeir = 5.31384 m
# L.SedDraincoverSegment should be modified so it is an integer number of manifold ports long.
L_SedDrainCoverSegmentMax := M_DrainCoverMax/(A_SedDrainCover*ρ_Concrete) = 0.994757 m
N_SedDrainCover := ceil(L_SedDrainCoverTotal/L_SedDrainCoverSegmentMax) = 6
L_SedDrainCoverSegment := L_SedDrainCoverTotal/N_SedDrainCover - S_SedDrainCoverSegment = 0.88364 m
B_SedSludgeOrifices := L_SedDrainCoverSegment/trunc(L_SedDrainCoverSegment/B_SedSludgeOrificesEst) = 11.0455 cm
# put an integer number of orifices in each drain cover segment
N_SedSludgeOrifices := floor(L_SedDrainCoverTotal/B_SedSludgeOrifices) = 48
D_SedSludgeOrifice := D_circle(A_orifice(HL_SedSludgeOrificeEst, Pi_VenaContractaOrifice, Q_SedSludgeDrain/N_SedSludgeOrifices)) = 0.926059 cm
# No need to round this because they don't drill this hole in concrete!
N_SedDrainCoverSegmentOrifices := floor(N_SedSludgeOrifices/N_SedDrainCover)
# Sludge Drain Cover
# Inlet Manifold Design
L_SedManifoldPipe := L_SedUpflow - CapThickness(ND_SedManifold)
# The width of the diffuser outlet is independent of the port spacing and thus can be calculated based on the flow per unit length of the diffuser pipe. There is a tiny inconsequential error introduced by the fact that the actual length of the slot is ultimately determined by an integer number of ports. It isn't worth correcting for that tiny error.
W_SedDiffuserOutlet := 2/Pi_VenaContractaOrifice^2*((Pi_Jet*W_Sed*V_SedUpBod/2)^3/ED_SedInlet)^(1/4) = 4.50707 cm
W_SedDiffuserOutlet := 1 cm
Pi_PvcStretch := 1.2
# This is the amount of stretch we can get from the PVC pipe in the transition from round to rectangular. Large stretch factors are not possible to create without tearing the PVC.
ND_SedDiffuser := 1 in
OD_Diffuser := outerdiameter(ND_SedDiffuser) = 3.3401 cm
Circ_SedDiffuser := π*innerdiameter(ND_SedDiffuser, PS_Default) = 9.37608 cm  # This analysis doesn't account for thickness of the pipe wall
L_SedDiffuserOutlet := (Circ_SedDiffuser*Pi_PvcStretch - 2*W_SedDiffuserOutlet)/2 = 4.62565 cm
T_SedDiffuserWall := outerradius(ND_SedDiffuser) - innerdiameter(ND_SedDiffuser, PS_Default)/2 = 0.001778 m
B_SedManifoldPort := L_SedDiffuserOutlet + 2*T_SedDiffuserWall = 4.98125 cm
N_SedManifoldPorts := floor((L_SedManifoldPipe - 2*SocketDepth(ND_SedManifold))/(L_SedDiffuserOutlet + 2*T_SedDiffuserWall)) = 104
# Subtracting two times the socket depth from the available length allows space for the manifold to be pulled out of its coupling without the diffusers running into the support ledge at the free end.
Q_SedManifoldPort := Q_SedBay/N_SedManifoldPorts = 0.0512821 L/s
D_SedManifoldPort := CeilNearest(D_PipeED(ED_SedInlet, Q_SedManifoldPort, Pi_VenaContractaOrifice, Pi_Jet), D_Drill) = 2.8 cm
# We need enough length to give the jet that is coming out of the manifold port to expand to the size of the rectangular slot
V_SedManifoldPort := Q_SedManifoldPort/(π*D_SedManifoldPort^2/4)*1/Pi_VenaContractaOrifice = 0.132196 m/s
V_SedDiffuser := Q_SedManifoldPort/(B_SedManifoldPort*W_SedDiffuserOutlet) = 0.10295 m/s
V_SedManifoldPort/V_SedDiffuser =  # error: This variable is undefined.
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L_SedDiffuserRoundjetanalogy := 6.2*V_SedManifoldPort/V_SedDiffuser*D_SedManifoldPort*sqrt(Pi_VenaContractaOrifice) = 0.176934 m  # round jet equation
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L_SedDiffuserPlanejetanalogy := (2.41*V_SedManifoldPort/V_SedDiffuser)^2*D_SedManifoldPort*sqrt(Pi_VenaContractaOrifice) = 0.212836 m  # plane jet
L_SedManifoldDiffuser := L_SedDiffuserPlanejetanalogy
# Conclusion is that we should keep the manifold as high as possible based on the limitations of the elbow to give as much distance as possible for the jet to expand inside the diffuser pipe.
Z_SedManifoldPipe := Plant_Origin[2] + H_SedSludge + T_ConcreteMin + outerradius(ND_SedJetReverser) + L_SedManifoldDiffuser + innerdiameter(ND_SedManifold, PS_Default)/2 = 0.472297 m
W_SedSideSlopes := (W_SedBay - outerradius(ND_SedJetReverser))/2
H_SedSideSlopes := tan(AN_SedSlope)*W_SedSideSlopes = 0.585925 m
Z_SedSideSlopes := Plant_Origin[2] + H_SedSludge + T_ConcreteMin + outerradius(ND_SedJetReverser) + H_SedSideSlopes
# Side Slopes
# Floc Weir, Hopper, and Hopper Drain
ND_SedHopperDrain := 1 in
AN_SedHopperTopSlope := 30 deg
Z_SedFlocWeir := max(Z_SedManifoldPipe + ConRadius(ND_SedManifold) + S_Fitting + (W_SedBay/2 + ConRadius(ND_SedManifold) + S_Fitting)*tan(AN_SedHopperTopSlope), Z_SedSideSlopes + H_SedSlopesToFlocWeirMin) = 1.02639 m
Z_SedHopperBottom := Plant_Origin[2] + H_SedSludge + ElbowRadius(ND_SedHopperDrain) + SocketDepth(ND_SedHopperDrain)
Z_SedHopperSlopeTop := Z_SedManifoldPipe + ConRadius(ND_SedManifold) + S_Fitting + (W_SedBay/2 + ConRadius(ND_SedManifold) + S_Fitting)*tan(AN_SedHopperTopSlope) = 1.02639 m
H_SedHopperBottom := Z_SedHopperBottom - Plant_Origin[2]
H_SedFlocWeir := Z_SedFlocWeir - Z_SedSludge
L_SedHopperFrontSlope := min((Z_SedFlocWeir - Z_SedHopperBottom)/tan(AN_SedSlope), L_SedHopper)
H_SedHopperFrontSlope := L_SedHopperFrontSlope*tan(AN_SedSlope) = 0.869128 m
L_SedHopperBackSlope := L_SedHopper - L_SedHopperFrontSlope = 38.7753 cm
H_SedHopperBackSlope := L_SedHopperBackSlope*tan(AN_SedSlope) = 0.462106 m
H_SedHopperSmallSlope := (W_SedBay/2 - ConRadius(ND_SedManifold) - S_Fitting - 2*ConRadius(ND_SedHopperDrain))/tan(AN_SedSlope) = 0.245054 m
# Lamella Length and Tank Dimension Algorithm
Z_SedLamellaBottom := Z_SedFlocWeir + H_FlocWeirToLamellaMin + outerdiameter(ND_SedPlateFrame)
H_LamToChanInit := max(CouplingLength(ND_SedManifold), T_ChannelWall) + CouplingLengthFlex(ND_SedManifold) + SocketDepth(ND_SedManifold) + ElbowRadius(ND_SedManifold) - outerradius(ND_SedManifold) - outerdiameter(ND_SedPlateFrame)
L_SedPlateActive := (N_SedPlates - 1)*S_SedPlate/sin(AN_SedPlate) = 4.82087 m
L_SedPlateEst := (B_SedPlate*Q_SedBay/(W_SedBay*L_SedPlateActive*V_SedCBod) - S_SedPlate)/(sin(AN_SedPlate)*cos(AN_SedPlate)) = 0.517115 m
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N_PlatesPerSheet := floor(L_SedPlateSheet/L_SedPlateEst) = 5
L_SedPlate := L_SedPlateSheet/N_PlatesPerSheet = 0.6 m
L_SedPlateUnderChan := (L_SedPlate*sin(AN_SedPlate) + T_SedPlate*cos(AN_SedPlate) + H_LamellaToLaunder + outerdiameter(ND_SedLaunder) - H_SedWeirExit - T_ChannelWall)/tan(AN_SedPlate) + T_SedPlate/sin(AN_SedPlate) = 15.7326 cm
V_SedActiveUp := Q_SedBay/(W_SedBay*L_SedPlateActive) = 1.1063 mm/s
V_SedCaptureCheck := V_SedActiveUp*B_SedPlate/(L_SedPlateEst*sin(AN_SedPlate)*cos(AN_SedPlate) + S_SedPlate) = 0.12 mm/s
Z_SedChannelBottom := Z_SedLamellaBottom + L_SedPlate*sin(AN_SedPlate) + T_SedPlate*cos(AN_SedPlate) + H_LamellaToLaunder + outerdiameter(ND_SedLaunder) - H_SedWeirExit = 1.59315 m
Z_SedWeirExit := Z_SedChannelBottom + H_SedWeirExit
H_Sed := Z_SedChannelBottom + H_SedInletChannel = 2.0813 m
# Exit Launder
B_SedLaunderOrifices := B_SedLaunderOrificesEst
Z_SedLaunder := Z_SedChannelBottom + H_SedWeirExit - outerradius(ND_SedLaunder) = 1.83734 m
L_SedLaunder :=
    L_SedUpflow - CapThickness(ND_SedLaunder) if T_ChannelWall > 2*CouplingLength(ND_SedLaunder)
    L_SedUpflow + T_ChannelWall - 2*CouplingLength(ND_SedLaunder) - CapThickness(ND_SedLaunder) if CouplingLength(ND_SedLaunder) < T_ChannelWall < 2*CouplingLength(ND_SedLaunder)
    L_SedUpflow + T_ChannelWall - CouplingLength(ND_SedLaunder) - CapThickness(ND_SedLaunder) otherwise
# There will be two orifice rows along the active length of the launder
N_SedLaunderOrifices := 2*floor((L_SedLaunder - CapHeight(ND_SedLaunder) + CapThickness(ND_SedLaunder) - SocketDepth(ND_SedLaunder))/B_SedLaunderOrifices) = 102
N_SedLaunderOrificesRow := N_SedLaunderOrifices/2
Q_SedLaunderOrifices := Q_SedBay/N_SedLaunderOrifices
# This the HL due to major & minor losses loses through the manifold.
HL_SedLaunderMajor := HL_Manifold(Q_SedBay, innerdiameter(ND_SedLaunder, PS_Default), L_SedLaunder, 0, Nu_Water, E_Pvc, N_SedLaunderOrifices)
HL_SedLaunderOrificeEst := HL_SedLaunderBod - HL_SedLaunderMajor = 0.0388442 m
D_SedLaunderOrifice := RoundNearest(D_circle(A_orifice(HL_SedLaunderOrificeEst, Pi_VenaContractaOrifice, Q_SedLaunderOrifices)), D_Drill) = 1.1 cm
# This is the total headloss through the launder based on the actual diameter of the orifices
HL_SedLaunderOrifice := h_orifice(D_SedLaunderOrifice, Pi_VenaContractaOrifice, Q_SedLaunderOrifices) = 3.88879 cm
HW_Sed := Z_SedLaunder + outerradius(ND_SedLaunder) + HL_SedLaunderOrifice = 1.96037 m
# Hopper Drain
Q_SedHopperDrainMax := Q_pipetotal(innerdiameter(ND_SedHopperDrain, PS_Default), HW_Sed - Z_SedHopperBottom, L_SedHopperBackSlope + max(CouplingLength(ND_SedHopperDrain), T_PlantWall) + ValveLength(ND_SedHopperDrain) + π/4*ElbowRadius(ND_SedHopperDrain), Nu_Water, E_Pvc, K_PipeEnt + K_PipeExit + K_GateValve) = 2.64457 L/s
L_SedHopperDrainPipe := T_PlantWall - CouplingLength(ND_SedHopperDrain) + SocketDepth(ND_SedHopperDrain)
N_SedPlates =  # error
L_SedPlate =  # error
N_SedModules :=
    for i ∈ N_SedModulePlatesMin .. N_SedModulePlatesMax
        N ← N_SedPlates/i
        break if mod(N_SedPlates, i) == 0
    return N
N_SedModulePlates := N_SedPlates/N_SedModules
# This part of the code serves to draw the module pipe for the plate settlers. In order to understand the meaning of each value please refer to the autocad drawing Lamina.Explanation
L_SedModulePipeIncrement := B_SedPlate - T_SedPlate - (CapDiameter(NominalPipeSize(ND_SedModulePipeSpacer))/2 - outerradius(NominalPipeSize(ND_SedModulePipeSpacer)))
# This is the part of the pipe sticking out that the cap is fitted on. The cap will serve as a resting spot for the next module. The modules are identical so they can be interchangeable.
L_SedModulePipe := N_SedModulePlates*B_SedPlate - (B_SedPlate - T_SedPlate) + 2*L_SedModulePipeIncrement = 0.234333 m  # This is the length of a sed module pipe.
S_SedModulePipes := max(L_SedPlate - 2*outerdiameter(ND_SedModulePipe) - 2*S_SedPlateModuleMin - (N_SedModulePlates*(T_SedPlate + (B_SedPlate - T_SedPlate)) - (B_SedPlate - T_SedPlate))/tan(AN_SedPlate), (L_SedModulePipe - L_SedModulePipeIncrement)*tan(90 deg - AN_SedPlate) + CapDiameter(NominalPipeSize(ND_SedModulePipeSpacer))) = 0.407054 m
# This is the actual spacing between the pipes.
L_SedModulePipeCap := min(B_SedPlate - T_SedPlate, CapHeight(NominalPipeSize(ND_SedModulePipeSpacer)) - (CapDiameter(NominalPipeSize(ND_SedModulePipeSpacer))/2 - outerradius(NominalPipeSize(ND_SedModulePipeSpacer))))
# The cap should be as long as the spacing between the two modules. If it is longer, we will need to cut it accordingly.
S_SedPlateModule := (L_SedPlate - S_SedModulePipes - (L_SedModulePipe - 2*L_SedModulePipeIncrement)/tan(AN_SedPlate))/2 = 0.041336 m
# This is the new spacing between the bottom of the first plate settler in a module and the first pipe.
.
L_SedActive := N_SedPlates*B_SedPlate/sin(AN_SedPlate) - T_SedPlate/sin(AN_SedPlate) = 5.23541 m
# Module Design
# Plate Pipe Frame
H_SedFrameStub := ((B_SedPlate - T_SedPlate)/sin(AN_SedPlate) - outerdiameter(ND_SedFrameStub))*tan(AN_SedPlate)
B_SedFrameStub := B_SedPlate/sin(AN_SedPlate)*N_SedModulePlates
# Residence Time Estimate
Vol_SedManifoldEst := (L_SedManifoldPipe + π/4*ElbowRadius(ND_SedManifold) + Z_SedChannelBottom - T_ChannelWall - Z_SedManifoldPipe - ElbowRadius(ND_SedManifold))*π*outerradius(ND_SedManifold)^2
Vol_SedPlatesEst := N_SedPlates*L_SedPlate*W_SedPlate*T_SedPlate
Vol_SedChannelsEst := W_SedBay*(W_SedInletChannel + T_ChannelWall)*(H_SedInletChannel + T_ChannelWall) + W_SedBay*(W_SedExitChannel + T_ChannelWall)*(H_SedExitChannel + T_ChannelWall)
Vol_SedBayEst := W_SedBay*L_Sed*HW_Sed - 1/2*L_SedHopper*H_SedHopperFrontSlope*W_SedBay - W_SedSideSlopes*H_SedSideSlopes*L_SedUpflow - Vol_SedManifoldEst - Vol_SedPlatesEst - Vol_SedChannelsEst = 9437.34 L
Ti_Sed := Vol_SedBayEst/Q_SedBay = 29.4917 min
H_WalkwayToTankWall := H_SedExitChannel + 20 cm
Z_Walkway := Plant_Origin[0] + H_Sed - H_WalkwayToTankWall
