# Stacked Rapid Sand Filter
## Constraints and comments (not necessarily updated)
# Max head loss through inlet piping during filtration
# Max head loss through inlet piping during backwash
# Max head loss through outlet piping during filtration
# Max head loss through outlet piping during backwash (siphon)
# Max ratio of head loss in manifold to head loss through filter layer during filtration
# Max ratio of head loss in manifold to head loss through filter layer during filtration
# The head loss across each layer of the filter must be large compared to losses in the plumbing that distributes water into the sand bed, in order for the water to be distributed uniformly to each layer.  At the beginning of a filtration cycle when the sand bed is clean, the head loss is the smallest.  This minimum head loss during filtration is estimated by the Carman-Kozeny equation.
# Filtration mode constraints
# The inlet manifolds need to have a small piezometric head variation relative to the head loss through a clean sand bed. Given that both the trunk lines and the branches are short manifolds (fL/d < 1), the piezometric head variability is dominated by pressure recovery which is given by V^2/(2*g)*.  where the velocity is the initial velocity in the manifold. Thus the velocity in the trunk and branch lines is limited by this constraint. If we want to relax this constraint we could add head loss through the slots. But we need to be careful to not cause a flow imbalance between the inlets that carry flow for two layers and the inlets that carry flow for only one layer. Perhaps top inlet and bottom inlet should have only one line of slots per pipe instead of two lines. We are currently assuming that the backwash branches will have 1/2 the slot area of the branches in the other layers.
#
# Slot head loss issues
# If we use the slots to generate head loss in an effort to improve flow distribution, we need to account for sand blocking (1-ε) of the slots during filtration. The slots are not blocked during backwash (except perhaps during backwash initiation).
#
# Backwash mode constraints
# The  constraint on the design of the backwash manifold branches is that the flow rate from each slot must be close to the average (perhaps within 20%). We cannot rely on head loss through the filter media to help create uniform flow from the manifold during backwash because the filter bed will be fluidized. Thus we must design the backwash manifold to have uniform flow distribution without any external assistance. We can improve uniformity of flow distribution by decreasing head loss and pressure recovery in the manifold branches and in the trunk line and/or by increasing the head loss through the slots. The backwash system will also be used during filtration and the flow rate in the backwash manifold system will vary by a factor of 6 between those two states. Thus head loss through the slots will vary by a factor of 36 between the two states. We could use a relatively high slot head loss to get uniform flow distribution. The slot head loss must be small enough during filtration mode to not cause a flow inbalance between filter layers. That suggests that the slot head loss must be less than 10% of the clean bed head loss during filtration and thus less than 36 times that amount during backwash.
#
# Flow distribution in a short manifold is quite uniform for the case when the total port area is equal to or less than the manifold area. We have two manifold systems operating in series with trunk line distributing flow to branches and branches distributing flow to slots. Head loss through the slots effectively helps distribute flow between branches as well as between slots. Thus the constraints on both trunk and branch sizes are that they have pressure recovery terms that are small compared with the head loss through the slots.
# Algorithm for trunk, branch, slot design
# Head loss through the slots in the backwash manifold are directly related to the head loss throught the slots during filtration. The flow area during filtration will be reduced due to sand blocking. This results in a factor of ε_FiSand
# Calculate slot area for backwash assuming this head loss.
# Note that the slot area for backwash analysis should not be adjusted for sand porosity.
# Calculate size of branch lines using the rule that their area must exceed the port area.
# Given the area of the branch lines, recalculate the slot area by setting it equal to the branch area.
# Recalculate the actual head loss through the slots given this new slot area.
#
# Calculate the size of the trunk lines using the rule that their area must exceed the port area. Thus branches must have more area than the slots in a branch. Trunk must have more area than the branches.
# Sand layer thickness as function of trunk diameter
# round up to the nearest cm to make construction easier
H_FiLayerF(ND_Trunk) := max(H_FiLayerMin, Ceil(outerdiameter(ND_Trunk) + S_FiTrunkMin, 1 cm), Ceil(OuterDiameterFittingPVC(ND_Trunk), 1 cm), Ceil(FerncoOuterDiameter(ND_Trunk), 1 cm))
H_FiBottomLayerF(ND_Trunk, ND_BwTrunk) := max(H_FiLayerMin, Ceil(outerradius(ND_Trunk) + outerradius(ND_BwTrunk) + S_FiTrunkMin, 1 cm), Ceil(ConRadius(ND_Trunk) + ConRadius(ND_BwTrunk), 1 cm), Ceil(FerncoOuterDiameter(ND_Trunk)/2 + FerncoOuterDiameter(ND_BwTrunk)/2, 1 cm))
# Flow distribution constraint: ratio of pressure recovery to clean bed head loss
# There are three flow distribution problems in the filter design: distribution between the slots along a manifold branch, distribution between branches along a trunk, and distribution between filter layers. The first two are both addressed by making pressure recovery in the manifold (both trunks and branches) small relative to the short path head loss (head loss through the clean bed, since slot head loss in forward filtration is small). In backwash mode where there is no bed head loss, the pressure recovery in the manifold plumbing must be small relative to slot head loss.
#
# Head loss through the inlet and outlet plumbing differs for different layers both because the number of elbows varies and because the top and bottom inlets have 1/2 the flow of the middle two. Therefore good flow distribution between layers would be addressed by making head loss through the inlet and outlet plumbing small for all layers relative to clean bed head loss. We do not have an explicit constraint set for this, but the constraint on trunk diameter which gives good flow distribution within the manifolds seems to be sufficient to take care of it. As a check, see the analysis under the section "Path Head Loss Calculations and Flow Distribution Between Layers" below.
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Pi_FiManifoldQ := 0.85  # Ratio of long path flow to short path flow
Pi_FiManifoldHeadLoss := 1 - Pi_FiManifoldQ^2 = 0.2775
# Ratio of pressure recovery in the slotted pipes to the head loss through the clean bed (or through the slots in backwash mode)
# Even though the piezometric head profiles for the inlet and outlet manifolds on the middle layers may be parallel meaning that pressure recovery there need not be small for good distribution between sand bed flow paths, we still need pressure recovery to be small in the outlet manifolds in order to get good flow distribution in the top and bottom layers where the velocity in the manifolds is 1/2 and the pressure recovery 1/4 that of other layers (even smaller in the larger-diameter bottom manifold where velocity head is tiny).
# Numbers of filters
PR_FiManBranchEst := 0.8 cm
ND_FiBwTrunkMax := 8 in
HL_FiBwSlotsEst := 10 cm
PR_FiBwManifoldMax := HL_FiBwSlotsEst*Pi_FiManifoldHeadLoss
# First constraint: pressure recovery in trunks during forward filtration
HL_FiCleanLayerMin := h_lKozeny(H_FiLayerMin, D_FiSand60, V_FiLayer, ε_FiSand, Nu_Water)
V_FiManTrunkMaxPR := sqrt(2*g*(HL_FiCleanLayerMin*Pi_FiManifoldHeadLoss - PR_FiManBranchEst))
Q_FiPRTrunk := Round(π/4*innerdiameter(ND_FiTrunkMax, PS_Default)^2*V_FiManTrunkMaxPR*N_FiLayer/2, 1*L/s)
# Second constraint: pressure recovery in lowest trunk during backwash
V_FiBwManTrunkMaxPR := sqrt(2*g*(HL_FiBwSlotsEst*Pi_FiManifoldHeadLoss - PR_FiManBranchEst))
Q_FiPRBwTrunk := Round(π/4*innerdiameter(ND_FiBwTrunkMax, PS_Default)^2*V_FiBwManTrunkMaxPR, 1*L/s)
N_Fi := ceil(Q_Train/min(Q_FiPRTrunk, Q_FiPRBwTrunk))
Q_Fi := Q_Train/N_Fi
Q_FiLayer := Q_Fi/N_FiLayer
ND_FiTrunk := NominalDiameter(CeilNearest(D_circle(2*Q_FiLayer/V_FiManTrunkMaxPR), AvailPipeSizes(PS_Default)[:, 0]), PS_Default)
ND_FiBwTrunk := NominalDiameter(CeilNearest(D_circle(Q_Fi/V_FiBwManTrunkMaxPR), AvailPipeSizes(PS_Default)[:, 0]), PS_Default)
PR_FiForwardTrunk := (2*Q_FiLayer/(π/4*innerdiameter(ND_FiTrunk, PS_Default)^2))^2/(2*g)
PR_FiBwTrunk := (Q_Fi/(π/4*innerdiameter(ND_FiBwTrunk, PS_Default)^2))^2/(2*g)
H_FiLayer := H_FiLayerF(ND_FiTrunk)
H_FiBottomLayer := H_FiBottomLayerF(ND_FiTrunk, ND_FiBwTrunk)
# Clean bed head loss
HL_FiCleanLayer := h_lKozeny(H_FiLayer, D_FiSand60, V_FiLayer, ε_FiSand, Nu_Water)
HL_FiCleanBottomLayer := h_lKozeny(H_FiBottomLayer, D_FiSand60, V_FiLayer, ε_FiSand, Nu_Water)
# Auxilliary box widths and plumbing
# Plumbing
HL_FiBoxDrainMax := 1.5 m
ND_FiExitWaste := NominalPipeSize(D_PipeTotal(Q_Fi, HL_FiBoxDrainMax, 1 m, Nu_Water, E_Pvc, K_PipeEnt + K_El90 + K_PipeExit))
ND_FiEntOverflow := NominalPipeSize(D_PipeTotal(2*Q_Fi, HL_FiBoxDrainMax, 1 m, Nu_Water, E_Pvc, K_PipeEnt + K_El90 + K_PipeExit))
ND_FiBypass := NominalPipeSize(D_PipeTotal(2*Q_Fi, 20 cm, T_PlantWall + 5 cm, Nu_Water, E_Pvc, K_PipeEnt + K_PipeExit))
ND_DistPipe := D_pipeschedule(Q_Train, PS_Default, HL_FiBoxDrainMax, 100 m, Nu_Water, E_Pvc, K_PipeEnt + 3*K_El90 + K_PipeExit)
HL_FiExitWaste := h_l(Q_Fi, innerdiameter(ND_FiExitWaste, PS_Default), 1 m, K_PipeEnt + K_El90 + K_PipeExit, Nu_Water, E_Pvc)
HL_FiEntOverflow := h_l(2*Q_Fi, innerdiameter(ND_FiEntOverflow, PS_Default), 1 m, K_PipeEnt + K_El90 + K_PipeExit, Nu_Water, E_Pvc)
HL_FiBypass := h_l(2*Q_Fi, innerdiameter(ND_FiBypass, PS_Default), T_PlantWall + 5 cm, K_PipeEnt + K_PipeExit, Nu_Water, E_Pvc)
HL_DistPipe := h_l(Q_Train, innerdiameter(ND_DistPipe, PS_Default), 100 m, K_PipeEnt + 3*K_El90 + K_PipeExit, Nu_Water, E_Pvc)
H_FiEntOverflowDrop := max(HL_FiEntOverflow + H_DrainOutletSafety, CouplingLength(ND_FiEntOverflow) + SocketDepth(ND_FiEntOverflow) + ElbowRadius(ND_FiEntOverflow))
H_FiExitWasteDrop := max(HL_FiExitWaste + H_DrainOutletSafety, CouplingLength(ND_FiExitWaste) + SocketDepth(ND_FiExitWaste) + ElbowRadius(ND_FiExitWaste))
H_FiDistDrop := max(HL_DistPipe + H_DrainOutletSafety, max(CouplingLength(ND_DistPipe), T_PlantWall) + SocketDepth(ND_DistPipe) + ElbowRadius(ND_DistPipe))
# The combined width of the overflow/distribution and entrance/exit boxes must match the filter width so that the boxes fit when adjacent filters are put side-by-side
W_FiEntrance := max(3*S_Fitting + ConRadius(ND_FiBwTrunk) + 3*ConRadius(ND_FiTrunk) + 2*(SocketDepth(ND_FiTrunk) + ElbowRadius(ND_FiTrunk)), W_HumanMin, W_rectweir(Q_Fi, 5 cm))
W_FiOverflowMin := OuterDiameterFittingPVC(ND_DistPipe) + 2*S_Fitting
# The actual width of the overflow/distribution boxes will be defined once the actual filter width is determined based on the number of manifold branches.
W_FiMin := W_FiEntrance + W_FiOverflowMin + T_PlantWall + T_ChannelWall - T_FiWall
W_FiActiveMin := W_FiMin - outerdiameter(ND_FiBwTrunk)  # For one filter make the dimensions closer to square
A_FiActive := Q_FiLayer/V_FiLayer
W_FiSingleEst := (outerdiameter(ND_FiTrunk) + sqrt(outerdiameter(ND_FiTrunk)^2 + 4*A_FiActive))/2
L_FiSingleEst := W_FiSingleEst
S_FiWeirsEst := 10 cm
# Just used below to get an estimate of total siphon pipe length. Actual box length is calculated after flow distribution weir design.
L_FiEntranceEst := 2*ConRadius(ND_FiTrunk) + 2*ConRadius(ND_FiBwTrunk) + 2*S_Fitting + 3*S_FiWeirsEst + T_Acrylic + T_FiWeir
L_FiExit := max(3*S_Fitting + 2*OuterDiameterFittingPVC(ND_FiTrunk), W_HumanMin)
L_FiDist := L_FiExit
# Overflow weir
L_FiOverflowWeir := 2*ConRadius(ND_FiBwTrunk) + 2*ConRadius(ND_FiTrunk) + 3*S_Fitting
HL_FiOverflowWeir := Headloss_weir(Q_Fi, L_FiOverflowWeir)
# Walkway between the filter box and exit box
W_MpWalkway := max(W_MpWalkwayMin, ShortTeeLength(ND_DistPipe) + ConRadius(ND_DistPipe) + S_Fitting + ConRadius(ND_DistPipe) + ElbowRadius(ND_DistPipe) + 2*SocketDepth(ND_DistPipe) + ElbowRadius(ND_DistPipe) - L_FiExit/2 - T_PlantWall)
# Number of manifold branches
# Min number of manifold branches for backwash flow distribution
PR_FiBwManBranchMax := HL_FiBwSlotsEst*Pi_FiManifoldHeadLoss - PR_FiBwTrunk
Pi_Q == Q_min/Q_max
V_FiBwManBranchMax := sqrt(2*g*PR_FiBwManBranchMax)
# Assume linear flow distribution between branches.
# Then the average branch flow is:
Q_FiBwBranchMaxPR := V_FiBwManBranchMax*π*innerdiameter(ND_FiBwManBranch, PS_FiBranch)^2/4
# Maximum allowable flow through the backwash manifold branch that receives the highest flow.
Q_ave == (Q_max + Q_min)/2
Q_ave == (Q_max + Pi_Q*Q_max)/2
# Maximum allowable AVERAGE flow through the backwash manifold branches in order to not exceed pressure recovery constraint for flow distribution. Derivation to the right.
Q_FiBwBranchAveMaxPR := Q_FiBwBranchMaxPR*((1 + sqrt(1 - PR_FiBwTrunk/HL_FiBwSlotsEst))/2)
Q_ave == Q_max*((1 + Pi_Q)/2)
Pi_Q == sqrt(1 - Pi_HL)
N_FiBwManBranchMin := Ceil(Q_Fi/Q_FiBwBranchAveMaxPR, 2)  # branches are coming out of both sides of the manifold, need even number
Q_ave == Q_max((1 + sqrt(1 - Pi_HL))/2)
# Min number of manifold branches for forward filtration flow distribution
PR_FiManBranchMax := HL_FiCleanLayerMin*Pi_FiManifoldHeadLoss - PR_FiForwardTrunk
V_FiManBranchMax := sqrt(2*g*PR_FiManBranchMax)
Q_FiForwardBranchMaxPR := V_FiManBranchMax*π*innerdiameter(ND_FiManBranch, PS_FiBranch)^2/4
# Maximum allowable AVERAGE flow through the upper manifold branches during forward filtration in order to not exceed pressure recovery constraint for flow distribution.
Q_FiForwardBranchAveMaxPR := Q_FiForwardBranchMaxPR*((1 + sqrt(1 - PR_FiForwardTrunk/HL_FiCleanLayer))/2)
N_FiForwardManBranchMin := Ceil(2*Q_FiLayer/Q_FiForwardBranchAveMaxPR, 2)  # branches are coming out of both sides of the manifold, need even number
N_FiManBranchMinPR := max(N_FiBwManBranchMin, N_FiForwardManBranchMin)
# Minimum number of branches in each manifold in order to not violate a pressure recovery constraint for flow distribution.
# Maximum number of manifold branches for filter geometry constraint
L_FiManFerncoCoupling := Ceil(2*ConRadius(ND_FiSandOutlet), 1 cm)
# Maximum number of manifold branches which allows the filter box width to match the auxiliary box width (only relevant for more than one filter):
N_FiManSideBranchMaxMult := floor((A_FiActive/W_FiActiveMin - (outerdiameter(ND_FiBwManBranch) + L_FiManFerncoCoupling + S_FiBranchToWall))/B_FiManifoldBranch)
N_FiManBranchMaxMult := 2*N_FiManSideBranchMaxMult
# Max number of branches for square filter if there is only one filter
N_FiManSideBranchSquare := round((L_FiSingleEst - L_FiManFerncoCoupling - outerdiameter(ND_FiManBranch) - S_FiBranchToWall)/B_FiManifoldBranch)
N_FiManBranchSquare := 2*N_FiManSideBranchSquare
# Set number of branches based on geometry
N_FiManBranch :=
    N_FiManBranchSquare if N_Fi == 1
    N_FiManBranchMaxMult otherwise
# Error variable equal to 1 when number of branches based on geometry does not satisfy flow distribution constraint
Error_FiManBranchPR := N_FiManBranch < N_FiManBranchMinPR
Q_FiForwardManBranchMax := 2*Q_FiLayer/N_FiManBranch
Q_FiBwManBranch := Q_Fi/N_FiManBranch
PR_FiBwManBranch := (Q_FiBwManBranch/(π/4*innerdiameter(ND_FiBwManBranch, PS_FiBranch)^2))^2/(2*g)
PR_FiForwardManBranch := (Q_FiForwardManBranchMax/(π/4*innerdiameter(ND_FiManBranch, PS_FiBranch)^2))^2/(2*g)
PR_FiBwManTotal := PR_FiBwTrunk + PR_FiBwManBranch
PR_FiForwardManTotal := PR_FiForwardTrunk + PR_FiForwardManBranch
# Filter box dimensions and manifold pipe lengths
L_Fi := (N_FiManBranch/2 - 1)*B_FiManifoldBranch + outerdiameter(ND_FiBwManBranch) + L_FiManFerncoCoupling + S_FiBranchToWall
# This is only the active filtration width (does not include the projected area of the trunk lines, but we assume the space between the branch holders and beyond contributes to active area)
W_FiActive := A_FiActive/L_Fi
W_Fi := W_FiActive + outerdiameter(ND_FiBwTrunk)
W_FiOverflow :=
    W_Fi + T_FiWall - W_FiEntrance - 2*T_PlantWall if N_Fi > 1
    W_FiOverflowMin otherwise
L_FiManBranch := W_Fi/2 - outerradius(ND_FiTrunk) - ConRadius(ND_FiBwBranchHolder) - outerradius(ND_FiBranchHolder) + 2*L_FiManBranchExt - S_FiManAssembly
L_FiManBranchTot := L_FiManBranch*N_FiManBranch
L_FiBwManBranch := W_Fi/2 - outerradius(ND_FiBwTrunk) - ConRadius(ND_FiBwBranchHolder) - outerradius(ND_FiBwBranchHolder) + 2*L_FiManBranchExt - S_FiManAssembly
L_FiBwManBranchTot := L_FiBwManBranch*N_FiManBranch
L_FiTrunk := L_Fi - L_FiManFerncoCoupling/2 - CapThickness(ND_FiTrunk) - S_FiManAssembly
L_FiBwTrunk := L_Fi - L_FiManFerncoCoupling/2 - CapThickness(ND_FiBwTrunk) - S_FiManAssembly
L_FiBranchHolder := L_Fi - 2*CapThickness(ND_FiBranchHolder) - 2*S_FiManAssembly
L_FiBwBranchHolder := L_Fi - 2*CapThickness(ND_FiBwBranchHolder) - 2*S_FiManAssembly
# Manifold slot design
N_FiBwSlotRows := 2
B_FiBwManSlot := 3/16*in = 4.7625 mm
B_FiManSlot := 1/8*in = 3.175 mm
N_FiSlotRows := 2
B_FiTopManSlot := 3/16*in
N_FiTopSlotRows := 2
HL_FiBwSlot := PR_FiBwManTotal/Pi_FiManifoldHeadLoss
A_FiBwManSlots := A_orifice(HL_FiBwSlot, Pi_VenaContractaOrifice, Q_Fi)
A_FiManSlots := 2*A_FiBwManSlots
A_FiTopManSlots := A_FiBwManSlots
L_FiBwManSlotBranchTotal := A_FiBwManSlots/(W_FiManSlots*N_FiManBranch)
L_FiManSlotBranchTotal := A_FiManSlots/(W_FiManSlots*N_FiManBranch)
L_FiTopManSlotBranchTotal := A_FiTopManSlots/(W_FiManSlots*N_FiManBranch)
N_FiBwManSlotsPerRow := floor((L_FiBwManBranch - 2*L_FiManBranchExt - B_FiBwManSlot)/B_FiBwManSlot)
N_FiManSlotsPerRow := floor((L_FiManBranch - 2*L_FiManBranchExt - B_FiManSlot)/B_FiManSlot)
N_FiTopManSlotsPerRow := floor((L_FiManBranch - 2*L_FiManBranchExt - B_FiTopManSlot)/B_FiTopManSlot)
N_FiBwManSlotsPerBranch := N_FiBwManSlotsPerRow*N_FiBwSlotRows
N_FiManSlotsPerBranch := N_FiManSlotsPerRow*N_FiSlotRows
N_FiTopManSlotsPerBranch := N_FiTopManSlotsPerRow*N_FiTopSlotRows
L_FiBwManSlotCurvedInner := L_FiBwManSlotBranchTotal/N_FiBwManSlotsPerBranch
L_FiManSlotCurvedInner := L_FiManSlotBranchTotal/N_FiManSlotsPerBranch
L_FiTopManSlotCurvedInner := L_FiTopManSlotBranchTotal/N_FiTopManSlotsPerBranch
# A conservative estimate of the head loss through the slots of the inlet manifold during forward filtration given sand blockage
HL_FiBwSlotForward := (Q_FiLayer/(A_FiBwManSlots*ε_FiSand*Pi_VenaContractaOrifice))^2/(2*g)
HL_FiSlotForward := (2*Q_FiLayer/(A_FiManSlots*Pi_VenaContractaOrifice))^2/(2*g)
HL_FiTopSlotForward := (Q_FiLayer/(A_FiTopManSlots*ε_FiSand*Pi_VenaContractaOrifice))^2/(2*g)
# Plumbing Head Loss
HL_FiBwInletManifold := 1/3*h_f(Q_Fi, innerD(ND_FiBwTrunk, PS_Default), L_Fi, Nu_Water, E_Pvc) + h_e(Q_Fi/N_FiManBranch, innerD(ND_FiBwManBranch, PS_FiBranch), K_PipeEnt) + 1/3*h_f(Q_Fi/N_FiManBranch, innerD(ND_FiBwManBranch, PS_FiBranch), W_FiActive, Nu_Water, E_Pvc) + HL_FiBwSlot
HL_FiInletManifold(Q_Layer) := 1/3*h_f(2*Q_Layer, innerD(ND_FiTrunk, PS_Default), L_Fi, Nu_Water, E_Pvc) + h_e(2*Q_Layer/N_FiManBranch, innerD(ND_FiManBranch, PS_FiBranch), K_PipeEnt) + 1/3*h_f(2*Q_Layer/N_FiManBranch, innerD(ND_FiManBranch, PS_FiBranch), L_FiManBranch, Nu_Water, E_Pvc) + HL_FiSlotForward
HL_FiInletManifoldTop(Q_Layer) := 1/3*h_f(Q_Layer, innerD(ND_FiTrunk, PS_Default), L_Fi, Nu_Water, E_Pvc) + h_e(Q_Layer/N_FiManBranch, innerD(ND_FiManBranch, PS_FiBranch), K_PipeEnt) + 1/3*h_f(Q_Layer/N_FiManBranch, innerD(ND_FiManBranch, PS_FiBranch), L_FiManBranch, Nu_Water, E_Pvc) + HL_FiTopSlotForward
HL_FiInletManifoldBottom(Q_Layer) := 1/3*h_f(Q_Layer, innerD(ND_FiBwTrunk, PS_Default), L_Fi, Nu_Water, E_Pvc) + h_e(Q_Layer/N_FiManBranch, innerD(ND_FiBwManBranch, PS_FiBranch), K_PipeEnt) + 1/3*h_f(Q_Layer/N_FiManBranch, innerD(ND_FiBwManBranch, PS_FiBranch), L_FiManBranch, Nu_Water, E_Pvc) + HL_FiBwSlotForward
HL_FiOutletManifold(Q_Layer) := 1/3*h_f(2*Q_Layer, innerD(ND_FiTrunk, PS_Default), L_Fi, Nu_Water, E_Pvc) + h_e(2*Q_Layer/N_FiManBranch, innerD(ND_FiManBranch, PS_FiBranch), K_PipeExit) + 1/3*h_f(2*Q_Layer/N_FiManBranch, innerD(ND_FiManBranch, PS_FiBranch), L_FiManBranch, Nu_Water, E_Pvc)
# For the head loss through the outlet manifold:
# Does it make sense to have a pipe exit loss included?
# Also, is it worth coming up with an estimate for head loss through the slots entering the branch?
# This safety factor is an approximation which accounts for the extra elevation of the water in the center of the pipe stub before spilling towards the weir (or the pipe edge)
SF_MiddleOfPipe := 1.2
HL_FiOutletStubs(Q_Layer) := SF_MiddleOfPipe*Headloss_weir(Q_Layer, π*innerdiameter(ND_FiTrunk, PS_Default))
HL_FiInletPlumbing1(Q_Layer) := h_l(Q_Layer, innerD(ND_FiTrunk, PS_Default), 3 m, 3*K_El90 + K_PipeEnt, Nu_Water, E_Pvc) + HL_FiInletManifoldTop(Q_Layer)
HL_FiInletPlumbing2(Q_Layer) := h_l(2*Q_Layer, innerD(ND_FiTrunk, PS_Default), 3 m, 3*K_El90 + K_PipeEnt, Nu_Water, E_Pvc) + HL_FiInletManifold(Q_Layer)
HL_FiInletPlumbing3(Q_Layer) := h_l(2*Q_Layer, innerD(ND_FiTrunk, PS_Default), 3 m, K_El90 + K_PipeEnt, Nu_Water, E_Pvc) + HL_FiInletManifold(Q_Layer)
# These are numbered from the top of the filter bed down. The top and bottom inlets have half the flow rate (only serve the layers below and above, respectively). The bottom inlet has the diameter of the backwash trunk.
HL_FiInletPlumbing4(Q_Layer) := h_l(Q_Layer, innerD(ND_FiBwTrunk, PS_Default), 3 m, K_El90 + K_PipeEnt, Nu_Water, E_Pvc) + HL_FiInletManifoldBottom(Q_Layer)
HL_FiInletPlumbingMax(Q_1, Q_2, Q_3, Q_4) := max(HL_FiInletPlumbing1(Q_1), HL_FiInletPlumbing2(Q_2), HL_FiInletPlumbing3(Q_3), HL_FiInletPlumbing4(Q_4))
HL_FiInletPlumbingMin(Q_1, Q_2, Q_3, Q_4) := min(HL_FiInletPlumbing1(Q_1), HL_FiInletPlumbing2(Q_2), HL_FiInletPlumbing3(Q_3), HL_FiInletPlumbing4(Q_4))
HL_FiInletPlumbingAve(Q_1, Q_2, Q_3, Q_4) := (HL_FiInletPlumbing1(Q_1) + HL_FiInletPlumbing2(Q_2) + HL_FiInletPlumbing3(Q_3) + HL_FiInletPlumbing4(Q_4))/4
HL_FiBwInletPlumbing := h_l(Q_Fi, innerD(ND_FiBwTrunk, PS_Default), 3 m, K_El90 + K_PipeEnt, Nu_Water, E_Pvc) + HL_FiBwInletManifold
HL_FiOutletPlumbing1(Q_Layer) := h_l(2*Q_Layer, innerD(ND_FiTrunk, PS_Default), 3 m, K_El90 + K_PipeExit, Nu_Water, E_Pvc) + HL_FiOutletManifold(Q_Layer) + HL_FiOutletStubs(Q_Layer)
HL_FiOutletPlumbing2(Q_Layer) := HL_FiOutletPlumbing1(Q_Layer)
HL_FiOutletPlumbing3(Q_Layer) := h_l(2*Q_Layer, innerD(ND_FiTrunk, PS_Default), 3 m, 2*K_El90 + K_PipeExit, Nu_Water, E_Pvc) + HL_FiOutletManifold(Q_Layer) + HL_FiOutletStubs(Q_Layer)
HL_FiOutletPlumbingMax(Q_1, Q_3) := max(HL_FiOutletPlumbing1(Q_1), HL_FiOutletPlumbing2(Q_1), HL_FiOutletPlumbing3(Q_3))
HL_FiOutletPlumbingMin(Q_1, Q_3) := min(HL_FiOutletPlumbing1(Q_1), HL_FiOutletPlumbing2(Q_1), HL_FiOutletPlumbing3(Q_3))
HL_FiOutletPlumbingAve(Q_1, Q_3) := (HL_FiOutletPlumbing1(Q_1) + HL_FiOutletPlumbing2(Q_1) + HL_FiOutletPlumbing3(Q_3))/3
# Total sand depth and backwash head loss
H_FiSand := (N_FiLayer - 1)*H_FiLayer + H_FiBottomLayer + outerradius(ND_FiBwManBranch) + outerradius(ND_FiManBranch)
H_FiSandActive := H_FiSand - outerradius(ND_FiBwManBranch) - outerradius(ND_FiManBranch)
H_FiFluidizedBed := Pi_FiFluidized*H_FiSand
# Sand bed head loss during steady state backwash.
HL_FiBwSandSS := H_FiSand*(Rho_FiSand - Rho_H2O)*(1 - ε_FiSand)/Rho_H2O
# The backwash head loss is almost exactly equal  to the sand bed depth. Note that this ignores losses in the plumbing.
HL_FiDirty := 40 cm  # Mickey suggested this value based on lab experience
HL_FiTerminal := HL_FiCleanLayer + HL_FiDirty
HL_FiBwInitiation := HL_FiBwSF + HL_FiBwSandSS
# How much does the filter bed over fluidize when the entrance box level lowers after backwash initiation?
H_FiFluidizedBedVariation := (HL_FiBwInitiation - HL_FiBwSandSS)*(W_FiEntrance*L_FiEntrance - 3*π*outerradius(ND_FiTrunk)^2 - π*outerradius(ND_FiBwTrunk)^2)/A_FiActive
# Path head loss calculations and flow distribution between layers
HL_FiCleanLyr(Q) := h_lKozeny(H_FiLayer, D_FiSand60, Q/A_FiActive, ε_FiSand, Nu_Water)
HL_FiCleanBottomLyr(Q) := h_lKozeny(H_FiBottomLayer, D_FiSand60, Q/A_FiActive, ε_FiSand, Nu_Water)
HL_FiPathClean1(Q_Path) := HL_FiInletPlumbing1(Q_Path) + HL_FiCleanLyr(Q_Path) + HL_FiOutletPlumbing1(Q_Path)
HL_FiPathClean2(Q_Path) := HL_FiInletPlumbing2(Q_Path) + HL_FiCleanLyr(Q_Path) + HL_FiOutletPlumbing1(Q_Path)
HL_FiPathClean3(Q_Path) := HL_FiInletPlumbing2(Q_Path) + HL_FiCleanLyr(Q_Path) + HL_FiOutletPlumbing2(Q_Path)
HL_FiPathClean4(Q_Path) := HL_FiInletPlumbing3(Q_Path) + HL_FiCleanLyr(Q_Path) + HL_FiOutletPlumbing2(Q_Path)
HL_FiPathClean5(Q_Path) := HL_FiInletPlumbing3(Q_Path) + HL_FiCleanLyr(Q_Path) + HL_FiOutletPlumbing3(Q_Path)
HL_FiPathClean6(Q_Path) := HL_FiInletPlumbing4(Q_Path) + HL_FiCleanBottomLyr(Q_Path) + HL_FiOutletPlumbing3(Q_Path)
HL_FiPathCleanMax(Q_1, Q_2, Q_3, Q_4, Q_5, Q_6) := max(HL_FiPathClean1(Q_1), HL_FiPathClean2(Q_2), HL_FiPathClean3(Q_3), HL_FiPathClean4(Q_4), HL_FiPathClean5(Q_5), HL_FiPathClean6(Q_6))
HL_FiPathCleanMin(Q_1, Q_2, Q_3, Q_4, Q_5, Q_6) := min(HL_FiPathClean1(Q_1), HL_FiPathClean2(Q_2), HL_FiPathClean3(Q_3), HL_FiPathClean4(Q_4), HL_FiPathClean5(Q_5), HL_FiPathClean6(Q_6))
# In reality the flow will distribute itself such that all paths have the same head loss. We will treat the average of all of the calculated path head losses as the actual complete head loss accross all paths.
HL_FiPathCleanAve(Q_1, Q_2, Q_3, Q_4, Q_5, Q_6) := (HL_FiPathClean1(Q_1) + HL_FiPathClean2(Q_2) + HL_FiPathClean3(Q_3) + HL_FiPathClean4(Q_4) + HL_FiPathClean5(Q_5) + HL_FiPathClean6(Q_6))/6
Pi_QFiLayer(Q_1, Q_2, Q_3, Q_4, Q_5, Q_6) := sqrt(HL_FiPathCleanMin(Q_1, Q_2, Q_3, Q_4, Q_5, Q_6)/HL_FiPathCleanMax(Q_1, Q_2, Q_3, Q_4, Q_5, Q_6))
# This estimate is reasonable as long as the answer is close to 1
# Guess:
Q_2 := Q_FiLayer
Q_3 := Q_FiLayer
Q_4 := Q_FiLayer
Q_5 := Q_FiLayer
Q_6 := Q_FiLayer
Q_1 := Q_FiLayer
Given
HL_FiPathClean1(Q_1) == HL_FiPathClean2(Q_2)
HL_FiPathClean2(Q_2) == HL_FiPathClean3(Q_3)
Q_1 + Q_2 + Q_3 + Q_4 + Q_5 + Q_6 == Q_Fi
HL_FiPathClean3(Q_3) == HL_FiPathClean4(Q_4)
HL_FiPathClean4(Q_4) == HL_FiPathClean5(Q_5)
HL_FiPathClean5(Q_5) == HL_FiPathClean6(Q_6)
HL_FiPath(Q) := Find(Q_1, Q_2, Q_3, Q_4, Q_5, Q_6)
Q_FiPath := HL_FiPath(Q_Fi)
Q_FiLayer1 := Q_FiPath[0]
HL_FiPathClean1(Q_FiPath[0]) =  # error: This variable is undefined.
Q_FiLayer2 := Q_FiPath[1]
HL_FiPathClean2(Q_FiPath[1]) =  # error
Q_FiLayer3 := Q_FiPath[2]
HL_FiPathClean3(Q_FiPath[2]) =  # error
Q_FiLayer4 := Q_FiPath[3]
HL_FiCleanPath := HL_FiPathClean1(Q_FiPath[0])
HL_FiPathClean4(Q_FiPath[3]) =  # error
Q_FiLayer5 := Q_FiPath[4]
HL_FiPathClean5(Q_FiPath[4]) =  # error
Q_FiLayer6 := Q_FiPath[5]
HL_FiPathClean6(Q_FiPath[5]) =  # error
# Siphon design
L_FiSiphonEst := 2*(HL_FiBwInletPlumbing + HL_FiBwSandSS + HL_FiSiphonMax) + 2*(H_FiFluidizedBed + H_FiFluidizedBedToSiphon) + L_Fi/2 + T_FiWall + W_MpWalkway + 4*T_PlantWall + L_FiExit + L_FiEntranceEst + W_ChannelMin + W_DCWalkway/2
K_FiSiphon := 5*K_El90 + K_PipeEnt + K_PipeExit  # Minor loss coefficients for flow through the siphon. The tee is treated as an extra elbow
# Siphon has to handle the entire flow into the filter plus drain the terminal head in Ti.FiBwInitiation.  This is approximately a "hole in a bucket problem" so the average flow rate is half the max flow (hence the factor of 2).  The HL sum corresponds to the height of water that needs to be drained. Use maximum head loss through the siphon for conservative estimate.
Q_FiSiphonInitiation := Q_Fi + 2*A_FiActive*(HL_FiBwSF + H_FiForwardNoSuckAir + HL_FiDirty + HL_FiBwInletPlumbing + HL_FiBwSandSS + HL_FiSiphonMax - H_FiSiphonNoSuckAir)/Ti_FiBwInitiationBod
ND_FiSiphon :=
    i ← 5
    HL_SiphonEst ← 10 m
    while HL_SiphonEst > HL_FiSiphonMax
        i ← i + 1
        ID_Siphon ← innerdiameter(AvailND[i], PS_Default)
        HL_SiphonPipeEst ← h_l(Q_Fi, ID_Siphon, L_FiSiphonEst, K_FiSiphon, Nu_Water, E_Pvc)
        HL_SiphonOutlet ← Headloss_weir(Q_Fi, ID_Siphon)
        HL_SiphonOrifice ← h_orifice(ID_Siphon, Pi_VenaContractaOrifice, Q_Fi)
        HL_SiphonEst ← HL_SiphonPipeEst + HL_SiphonOutlet + HL_SiphonOrifice
    return AvailND[i]
# these two functions must be changed if the available pipes are changed in the pipe database!!!!
ND_FiSiphon =  # error
HL_FiSiphonPipe := h_l(Q_Fi, innerdiameter(ND_FiSiphon, PS_Default), L_FiSiphonEst, K_FiSiphon, Nu_Water, E_Pvc)
HL_FiSiphonOutlet := Headloss_weir(Q_Fi, innerD(ND_FiSiphon, PS_Default))
S_FiSiphonOrificeMin := 1 cm
B_FiSiphonManOrificesEst := max(D_Drill) + S_FiSiphonOrificeMin
N_FiSiphonManOrifices := 2*floor((L_Fi - 2*ConRadius(ND_FiSiphon))/(2*B_FiSiphonManOrificesEst))
D_FiSiphonManOrifices := CeilNearest(innerdiameter(ND_FiSiphon, PS_Default)/sqrt(N_FiSiphonManOrifices), D_Drill)
# This keeps the area of the orifices similar to the siphon pipe area. Max drill size currently 2"
B_FiSiphonManOrifices := (L_Fi - 2*ConRadius(ND_FiSiphon))/N_FiSiphonManOrifices
HL_FiSiphonOrifice := h_orifice(D_FiSiphonManOrifices, Pi_VenaContractaOrifice, Q_Fi/N_FiSiphonManOrifices)
HL_FiBwTotalSS := HL_FiBwInletPlumbing + HL_FiBwSandSS + HL_FiSiphonOrifice + HL_FiSiphonPipe + HL_FiSiphonOutlet
Pi_FiSiphonManArea := innerdiameter(ND_FiSiphon, PS_Default)^2/(D_FiSiphonManOrifices^2*N_FiSiphonManOrifices)
Rho_FiFluidized := Rho_H2O*ε_FiSand*Pi_FiFluidized + Rho_FiSand*(1 - ε_FiSand)/Pi_FiFluidized
# Inlet channel
H_FiInletChannelMax := 50 cm
L_FiInletChannel := N_Fi*(W_FiEntrance + T_PlantWall) + (N_Fi - (mod(N_Fi, 2) ≠ 1 or N_Fi == 3))*(W_FiOverflow + T_PlantWall) - T_PlantWall
Pi_QFi := 0.95
# Pi_QFi should be in expert inputs. This is the ratio of flow through two filters based on head loss in the inlet channel and flow over the weirs into each filter.
W_FiEntranceWeir := W_FiEntrance
HL_FiInletChannel := Headloss_weir(Q_Fi, W_FiEntranceWeir) - Headloss_weir(Q_Fi*Pi_QFi, W_FiEntranceWeir)
HW_FiInletChannelMax := H_FiInletChannelMax - H_PlantFreeboard
W_FiInletChannelFlowDist := W_HorizChannel(Q_Fi, HW_FiInletChannelMax, HL_FiInletChannel, W_FiEntrance + W_FiOverflow + 2*T_PlantWall, Nu_Water, E_Concrete, 0)
W_FiInletChannelElbow := SocketDepth(ND_SedToFiPipe) + ElbowRadius(ND_SedToFiPipe) + ConRadius(ND_SedToFiPipe) + S_Fitting
W_FiInletChannel := max(W_FiInletChannelFlowDist, W_ChannelMin, W_FiInletChannelElbow)
HL_FiInletWeir := Headloss_weir(Q_Fi, W_FiEntranceWeir)
H_FiWeirFreefall := 8 cm
# Elevations
# The logic sequence for the design of filter elevations begins with the water level in the inlet channel, from which you get all entrance box elevations. Exit box elevations are calculated based on path head loss. The elevation of the siphon outlet is below the minimum water level in the entrance box by a height equal to the total backwash head loss (through all plumbing, sand bed, and siphon outlet). The siphon inlet elevation is then set such that air will not be pulled in during low-flow backwash operation. Finally, the elevation of the bottom of the filter box is set such that the fluidized sand bed does not reach the siphon inlet orifices.
# Aux box water, weir, and pipe levels
ZW_FiInletChannel := Z_SedChannelBottom - HL_FiEntrancePipe
Z_FiEntranceWeir := ZW_FiInletChannel - HL_FiInletWeir
ZW_FiEntranceMax := Z_FiEntranceWeir - H_FiWeirFreefall
ZW_FiEntranceTerminal := ZW_FiEntranceMax - HL_FiOverflowWeir
Z_FiOverflowWeir := ZW_FiEntranceTerminal
ZW_FiEntranceCleanForward := ZW_FiEntranceTerminal - HL_FiDirty
Z_FiEntranceStub := ZW_FiEntranceTerminal - HL_FiDirty - H_FiForwardNoSuckAir
Z_FiExitStub := ZW_FiEntranceCleanForward - HL_FiCleanPath
ZW_FiEntranceBwSS := Z_FiEntranceStub - HL_FiBwSF
# Aux box masonry levels
Z_FiTop := ZW_FiInletChannel + H_PlantFreeboard
Z_FiInletChannelBottom := ZW_FiInletChannel - HW_FiInletChannelMax
Z_FiEntranceBottom := ZW_FiEntranceBwSS - H_FiBwNoSuckAir
Z_FiExitBottom := Z_FiEntranceBottom
Z_FiOverflowBottom := Z_FiOverflowWeir - HL_FiBypass - outerdiameter(ND_FiBypass) - S_Fitting
H_FiInletChannel := Z_FiTop - Z_FiInletChannelBottom
H_FiEntrance := Z_FiTop - Z_FiEntranceBottom
H_FiExit := H_FiEntrance
H_FiOverflow := Z_FiTop - Z_FiOverflowBottom
# Siphon and filter box water levels
Z_FiSiphonOutlet := ZW_FiEntranceBwSS - HL_FiBwTotalSS
# The top of the pipe stub on the siphon where it discharges into the drain channel. The stubs here should be longer than designed for at first and cut shorter until the water level in the entrance box during backwash is approximately H_FiBwNoSuckAir =
Z_FiSiphonInlet := Z_FiSiphonOutlet - H_FiSiphonNoSuckAir
Z_PlantDrainChannelBottom := Z_FiSiphonOutlet - L_FiSiphonChannelStubMin
ZW_FiBwSS := Z_FiSiphonOutlet + HL_FiSiphonOrifice + HL_FiSiphonPipe + HL_FiSiphonOutlet
ZW_FiClean := Z_FiExitStub + HL_FiOutletStubs(max(Q_FiPath)) + HL_FiOutletPlumbingAve(Q_FiLayer1, Q_FiLayer3) + HL_FiCleanLayer
ZW_FiMax := Z_FiExitStub + HL_FiOutletStubs(max(Q_FiPath)) + HL_FiOutletPlumbingAve(Q_FiLayer1, Q_FiLayer3) + HL_FiTerminal
Z_FiSiphonThroughWallMax := Z_FiExitStub - outerradius(ND_FiSiphon)
# This is the center line of the pipe through the wall.  This is a maximum based on zero flow and the goal of wanting to be able to initiate backwash at the beginning of filtration. This constraint could be relaxed if needed.
H_FiSiphonMax := ZW_FiMax - Z_FiSiphonOutlet
L_FiSiphonTop := L_Fi/2 - ElbowRadius(ND_FiSiphon) + ShortTeeLength(ND_FiBwManBranch) + SocketDepth(ND_FiSiphon) + T_FiWall + outerradius(ND_FiSiphon)
# The following is the minimum elevation of the top of the siphon where it goes through the filter wall so that it will not overflow when the air is compressed in forward filtration mode. See Monroe's filtration notes for a derivation of the following in terms of simple variables. This expression was derived for the variables defined here.
Z_FiSiphonThroughWallMin := (P_Atm*(ZW_FiMax + ZW_FiBwSS) + Rho_H2O*g*(ZW_FiMax^2 + ZW_FiMax*L_FiSiphonTop - ZW_FiMax*Z_FiSiphonOutlet))/(2*P_Atm + Rho_H2O*g*(L_FiSiphonTop + ZW_FiMax - Z_FiSiphonOutlet)) + outerradius(ND_FiSiphon)
Z_FiSiphonThroughWallMax - Z_FiSiphonThroughWallMin =  # error
# Not much room to spare here! We need to always check this and somehow report an error if this is negative!!!!
Z_FiSiphonThroughWall := Z_FiSiphonThroughWallMax
# Total filter box height
Z_FiBottom := Z_FiSiphonInlet - H_FiFluidizedBed - H_FiFluidizedBedToSiphon
H_Fi := Z_FiTop - Z_FiBottom
# Distribution pipe
Z_FiDistPipe := Z_FiExitBottom - H_FiDistDrop
Z_FiExitDrainOutlet := Z_FiExitBottom - H_FiExitWasteDrop
H_FiSiphonPressure := ZW_FiMax - Z_FiSiphonThroughWallMin  # This cannot be greater than Z_FiSiphonOutlet - Z_FiBottom =
# Inlet weir design
# Slotted flow control weir design
Pi_QFiBw := 1.15
# Ratio of max backwash flow rate (when plant flow is Q.Plant) to desired backwash flow rate Q.Fi. This is saying the flow rate into the filter being backwashed will never exceed 110% of the desired backwash flow rate (assuming plant flow rate doesn't exceed the design flow rate).
# Inlet channel water level is this high above the filtration flow control weir at max plant flow. When N.Fi = 1 this design is not real and there will not be a slotted flow control weir, but the variables need to be defined for the drawing script.
Pi_QFiBw == Q_FiMax/Q_Fi
HL_FiEntranceWeirOthers := Headloss_weir(Q_Plant - Pi_QFiBw*Q_Fi, W_FiEntranceWeir*(N_Fi - (N_Fi > 1)))
# HL_FiBFlowControlSlot is measured from the top of the filtration flow control weir. If the filter being backwashed receives exactly Q_Fi then the water level behind the slot will just reach the filtration flow control weir and no water will be distributed to other filters. Any additional flow will cause the water level to rise above the filtration flow control weir and be distributed.
Pi_QFiBw == 2/3*Pi_VenaContractaOrifice*sqrt(2*g)*W_Slot*H_SlotMax^(3/2)/(2/3*Pi_VenaContractaOrifice*sqrt(2*g)*W_Slot*H_Slot^(3/2))
HL_FiBwFlowControlSlot := HL_FiEntranceWeirOthers/(Pi_QFiBw^(2/3) - 1)
W_FiBwFlowControl := W_rectweir(Q_Fi, HL_FiBwFlowControlSlot)  # This is the backwash flow control slot width.
Pi_QFiBw == (H_SlotMax/H_Slot)^(3/2)
Z_FiBwFlowControl := Z_FiEntranceWeir - HL_FiBwFlowControlSlot
# This is the elevation of the bottom of the backwash flow control slot based on the ideal design. However the slot will be built lower so that it can be calibrated with stoppers
# The max water level on the slot is the normal slot head loss when receiving Q_FiBw plus the head loss over the
# other filters' inlet weirs when receiving the remaining water.
H_FiBwSlotFreefallMin := ZW_FiInletChannel - ZW_FiEntranceMax
H_SlotMax == H_Slot + (3*(Q_Plant - Q_Fi*Pi_QFiBw)/(2*Pi_VenaContractaOrifice*sqrt(2*g)*L_FiEntranceWeir*(N_Fi - 1)))^(2/3)
S_FiFlowControlWeirs := W_HorizChannel(Q_Fi/2, HW_FiInletChannelMax, HL_FiInletChannel, W_FiEntranceWeir/2, Nu_Water, E_Concrete, 0)
# Substituting in to the previous equation for Pi_QFiBw
Pi_QFiBw == ((H_Slot + (3*(Q_Plant - Q_Fi*Pi_QFiBw)/(2*Pi_VenaContractaOrifice*sqrt(2*g)*L_FiEntranceWeir*(N_Fi - 1)))^(2/3))/H_Slot)^(3/2)
# Now calculate the flow through the backwash flow control weir that is partly a weir with free fall and partly submerged and acting like an orifice.
Q_FiSlotSubmerged(HL) := Q_RectWeir(Z_FiEntranceWeir - max(ZW_FiEntranceCleanForward + HL, Z_FiBwFlowControl), W_FiBwFlowControl) + max(ZW_FiEntranceCleanForward + HL - Z_FiBwFlowControl, 0 m)*W_FiBwFlowControl*Pi_VenaContractaOrifice*sqrt(2*g*H_FiBwSlotFreefallMin)
H_Slot == (3*(Q_Plant - Q_Fi*Pi_QFiBw)/(2*Pi_VenaContractaOrifice*sqrt(2*g)*L_FiEntranceWeir*(N_Fi - 1)))^(2/3)/(Pi_QFiBw^(2/3) - 1)
Pi_QFiBwSubmergedSlot(HL) := Q_FiSlotSubmerged(HL)/Q_Fi
HL_FiEntranceBoxBuildup := 0 cm, 4 cm .. 40 cm
H_Slot == Headloss_weir(Q_Plant - Pi_QFiBw*Q_Fi, L_FiEntranceWeir*(N_Fi - 1))/(Pi_QFiBw^(2/3) - 1)
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# In reality the filter will receive more flow as head loss builds up than shown in this analysis because this assumes the water level behind the slot cannot rise above the entrance weir. The water level will actually rise several centimeters higher.
# Stop gate design
HL_FiOpenWeirMax := 0.2 cm
H_FiStopGate := 20 cm
W_FiStopGate := Q_Fi/(Pi_VenaContractaOrifice*H_FiStopGate*sqrt(2*g*HL_FiOpenWeirMax))
# Model opening like orifice flow and calculate W based on area to give the max head loss
# Extra stoppers for backwash slot
# In order to be able to calibrate the size of the backwash flow control slot when beginning plant operation so that Q_FiBw really enters the entrance box when the stop gate is removed, the slot will be constructed deeper than calculated previously, and removable stoppers can be placed or removed to adjust the elevation of the bottom of the slot. Each stopper will represent on the order of 10% of the desired backwash flow rate. The drawing will show the slot drawn deeper by a height of N_FiSlotStopper stoppers with the stoppers placed such that the height of the slot is the height calculated above.
Q_FiSlotStopperIncrementEst := 0.1*Q_Fi
H_FiSlotStopper := Ceil((3*(Q_Fi + Q_FiSlotStopperIncrementEst)/(2*Pi_VenaContractaOrifice*sqrt(2*g)*W_FiBwFlowControl))^(2/3) - HL_FiBwFlowControlSlot, 1 cm)
N_FiSlotStopper := 3
Z_FiWeirSpaceBottom := Z_FiBwFlowControl - N_FiSlotStopper*H_FiSlotStopper
# Air removal baffle
# Use the same head loss criteria used for the height of the removable stop gate weir, modeling the space as a sluice gate
H_FiAirRemovalGap := Ceil(Q_Fi/(Pi_VenaContractaOrifice*W_FiEntrance*sqrt(2*g*HL_FiOpenWeirMax)), 1 cm)
L_FiEntrance :=
    2*ConRadius(ND_FiTrunk) + 2*ConRadius(ND_FiBwTrunk) + 2*S_Fitting + 3*S_FiFlowControlWeirs + T_Acrylic + T_FiWeir if N_Fi > 1
    2*ConRadius(ND_FiTrunk) + 2*ConRadius(ND_FiBwTrunk) + 2*S_Fitting + 2*S_FiFlowControlWeirs + T_Acrylic otherwise
# If there is only one filter there will be no slotted flow control weir.
L_FiOverflow := L_FiEntrance - (T_PlantWall - T_FiWeir)
# Entrance and overflow box lengths (X dimension)
HL_FiSiphonValveWater := (Z_FiSiphonThroughWall - ND_FiSiphon/2) - (Z_FiSiphonOutlet + HL_FiSiphonPipe + HL_FiSiphonOutlet)
# The available head is equal to the difference between the bottom of the siphon pipe and the steady state water level in the filter.  This is a head available in terms of water.
Vol_FiSiphonAir := (CouplingLength(ND_FiSiphon) + 4*outerdiameter(ND_FiSiphon) + 2*(Z_FiSiphonThroughWall - Z_FiSiphonOutlet))*π/4*innerdiameter(ND_FiSiphon, PS_Default)^2
# Goal is to fill siphon tube with air in 10 seconds. To account for the diminishing head as the siphon tube fills with air we will use 0.5 seconds. This rapid fill is desirable so that the operator can open and then immediately close the valve without having to wait. This is important because the operator won't be able to see the air filling up the siphon tube.
Ti_FiSiphonBreak := 10 s
# Monroe increased this to 1 s (from 0.5 s) because the video of starting backwash showed the operator moving the valve slowly. This indicatess that it wasn't necessary to have such a large valve at Tamara.
# changed to 10s 1/7/2012
Q_FiSiphonAir := Vol_FiSiphonAir/Ti_FiSiphonBreak
HL_FiSiphonValveAir := HL_FiSiphonValveWater*Rho_H2O/Rho_Air  # This is the head available in terms of air.
K_FiSiphonValve := 3
# Entrance and Exit loses and ball valve losses
L_FiSiphonBreak := Z_FiBottom + H_Fi - Z_FiSiphonThroughWall
# Estimated length of the pipe that will be connected to the air valve. Air valve will be at the very top of the filter.
ND_FiSiphonAirValve := NominalPipeSize(D_PipeTotal(Q_FiSiphonAir, HL_FiSiphonValveAir, L_FiSiphonBreak, Nu_Air, E_Pvc, K_FiSiphonValve))
ND_FiAirReleaseMid := 2 in  # added 7/18/14 by mrf222
# Siphon valve size
H_FiSandOutlet := 1 m
# This can't be set any higher because the available head will be insufficient to pump sand unless we figure out a way to maintain a higher water level in the filter during the sand dump. See the small head loss available at the finish of pumping the sand below.
# to be high enough to dump into a 55 gal drum?
Z_FiSandOutlet := Z_FiBottom + H_FiSandOutlet  # 7/9/2014: We want the outlet to exit between the 6th and 7th sand layers in the filter. mrf222
# This is higher than the sed tank drain channel. Thus the backwash water can easily discharge into the drain channel
HL_FiSandOutlet := Z_FiSiphonOutlet - Z_FiSandOutlet  # This isn't quite right because of the different densities.
# Calculating head loss and density for this problem is a bit complicated. The sand bed has a density of
Rho_FiFluidized =  # error
# This ends up changing Nu.Water, but that doesn't change the results because we are in the very turbulent domain of the Moody diagram. The available head has to take into account the different densities of the fluidized bed and the water above the bed. As the fluidized bed is drained the available head will decrease. Would it be possible to drain the sand out of the bed at the very beginning of the backwash cycle while the water depth above the bed is gradually decreasing? This extra bed depth would provide more head to push the sand through the sand outlet.
# At the beginning of sand pumping the filter box has fluidized sand (and thus a high fluid density) and thus the pressure at the entrance to the sand dump is high. At the end of the sand dump the filter is filled with water and thus the pressure at the entrance to the sand dump is much lower and yet the sand dump pipe is still filled with the high density fluidized sand.
HL_FiSandOutletStart := ((Z_FiSiphonOutlet - Z_FiBottom - H_FiSand*Pi_FiFluidized)*Rho_H2O + H_FiSand*Pi_FiFluidized*Rho_FiFluidized + (-H_FiSandOutlet*Rho_FiFluidized))/Rho_FiFluidized
HL_FiSandOutletFinish := ((Z_FiSiphonOutlet - Z_FiBottom)*Rho_H2O + (-H_FiSandOutlet*Rho_FiFluidized))/Rho_FiFluidized
V_FiSand := W_Fi*L_Fi*H_FiSand*Pi_FiFluidized  # Total volume of the fluidized bed
# Use the largest pipe that will fit between the branch lines (but not between the backwash branch lines)
Q_FiSandOutletStart := Q_pipetotal(innerdiameter(ND_FiSandOutlet, PS_Default), HL_FiSandOutletStart, H_FiSandOutlet, Nu_Water*Rho_H2O/Rho_FiFluidized, E_Pvc, K_PipeExit + K_PipeEnt + 2*K_El90)
Q_FiSandOutletFinish := Q_pipetotal(innerdiameter(ND_FiSandOutlet, PS_Default), HL_FiSandOutletFinish, H_FiSandOutlet, Nu_Water*Rho_H2O/Rho_FiFluidized, E_Pvc, K_PipeExit + K_PipeEnt + 2*K_El90)
Q_FiSandOutlet := (Q_FiSandOutletStart + Q_FiSandOutletFinish)/2  # This isn't quite right, but it is close.
Ti_FiSand := V_FiSand/Q_FiSandOutlet  # This is the time required to empty the filter of the sand.
Ti_FiSandDrum := 220 L/Q_FiSandOutlet
Q_FiSandOutletFinish/(innerdiameter(ND_FiSandOutlet, PS_Default)^2/4*π) =  # error  # The velocity in the pipe is far greater than the backwash velocity
# Estimate of the flow rate that would allow sand to settle within the vertical pipe. This flow rate is really low and so the valve will need to be almost closed before the sand stops flowing.
Q_Settle := 5*mm/s*(innerdiameter(ND_FiSandOutlet, PS_Default)^2/4*π)
# Sand removal pipe
# Trunk line purge valves
# Here we design for a certain scour velocity in the trunk lines BEYOND the manifold (outside of the filter box). We likely won't get sufficient scour velocities within the manifold where there is only a fraction of the total flow rate in the lines (particularly at the ends of the manifolds). Therefore these valves will probably not be all that effective if there is a serious solids accumulation problem. Hopefully accumulation of solids in the inlet plumbing will not be a problem when our manifold is constructed such that there is no sand leakage.
# For operation, the line which is being purged must be plugged from the entrance box so that the valve does not need to handle both the full filter flow and the trunk flush flow. For best operation, the other pipe stubs in the entrance box should be pulled out so that the entrance box water can contribute to the flow for a longer run at scour velocity.
# Decide on a reasonable scour velocity for compacted sludge
V_Scour(Rho_Particle, D_Particle, θ) := sqrt(2*sqrt(500000)/(3*0.332)*(Rho_Particle - Rho_H2O)/Rho_H2O*g*D_Particle*tan(θ))
V_FiTrunkFlush := V_Scour(Rho_FiSand, D_FiSand60, 5 deg)
# We won't be able to flush sand out of the line - the scour velocity is too high no matter how big a valve we choose.
# Head loss calculations and valve sizes
V_FiTrunkFlush := 0.3*m/s
Q_FiBwTrunkFlush := π*innerdiameter(ND_FiBwTrunk, PS_Default)^2/4*V_FiTrunkFlush
HL_FiSandBedBwTrunkFlush := h_lKozeny(H_FiSandActive, D_FiSand60, Q_FiBwTrunkFlush/A_FiActive, ε_FiSand, Nu_Water)
HL_FiBwSlotsTrunkFlush := h_orifice(D_circle(A_FiBwManSlots*ε_FiSand), Pi_VenaContractaOrifice, Q_FiBwTrunkFlush)
H_FiBwTrunkFlushAvail := ZW_FiClean - Z_FiBottom - outerradius(ND_FiBwManBranch) - HL_FiSandBedBwTrunkFlush - HL_FiBwSlotsTrunkFlush
ND_FiBwTrunkFlushValve := D_pipeschedule(Q_FiBwTrunkFlush, PS_Default, H_FiBwTrunkFlushAvail, 5 cm, Nu_Water, E_Pvc, K_PipeEnt + K_GateValve + K_PipeExit)
Q_FiTrunkFlush := π*innerdiameter(ND_FiTrunk, PS_Default)^2/4*V_FiTrunkFlush
HL_FiSlotsTrunkFlush := h_orifice(D_circle(A_FiManSlots*ε_FiSand), Pi_VenaContractaOrifice, Q_FiTrunkFlush)
HL_FiElbowTrunkFlush := h_e(Q_FiTrunkFlush, innerdiameter(ND_FiTrunk, PS_Default), K_El90)
HL_FiSandBedTrunk2Flush := h_lKozeny(H_FiSandActive - 2*H_FiLayer, D_FiSand60, Q_FiTrunkFlush/A_FiActive, ε_FiSand, Nu_Water)
HL_FiSandBedTrunk3Flush := h_lKozeny(H_FiSandActive - 4*H_FiLayer, D_FiSand60, Q_FiTrunkFlush/A_FiActive, ε_FiSand, Nu_Water)
H_FiTrunk2FlushAvail := ZW_FiClean - Z_FiBottom - outerradius(ND_FiBwManBranch) - 2*H_FiLayer - HL_FiSandBedTrunk2Flush - HL_FiSlotsTrunkFlush - HL_FiElbowTrunkFlush
H_FiTrunk3FlushAvail := ZW_FiClean - Z_FiBottom - outerradius(ND_FiBwManBranch) - 4*H_FiLayer - HL_FiSandBedTrunk3Flush - HL_FiSlotsTrunkFlush - HL_FiElbowTrunkFlush
H_FiTrunk4FlushAvail := ZW_FiClean - Z_FiBottom - outerradius(ND_FiBwManBranch) - 6*H_FiLayer - HL_FiSlotsTrunkFlush - HL_FiElbowTrunkFlush
ND_FiTrunk2FlushValve := D_pipeschedule(Q_FiTrunkFlush, PS_Default, H_FiTrunk2FlushAvail, 5 cm, Nu_Water, E_Pvc, K_PipeEnt + K_GateValve + K_PipeExit)
ND_FiTrunk3FlushValve := D_pipeschedule(Q_FiTrunkFlush, PS_Default, H_FiTrunk3FlushAvail, 5 cm, Nu_Water, E_Pvc, K_PipeEnt + K_GateValve + K_PipeExit)
ND_FiTrunk4FlushValve := D_pipeschedule(Q_FiTrunkFlush, PS_Default, H_FiTrunk4FlushAvail, 5 cm, Nu_Water, E_Pvc, K_PipeEnt + K_GateValve + K_PipeExit)
ND_FiTrunkFlushValve := max(ND_FiTrunk2FlushValve, ND_FiTrunk3FlushValve, ND_FiTrunk4FlushValve)
# Main plant drain channel
# To calculate the maximum possible flow through the drainchannel, all tanks are assumed to be initially full and emptying in the same time
# Note that the tank heights are used instead of the water levels in the calculation of maximum flow to have a conservative design.
Q_TankDrainMax := Q_pipeminor(innerdiameter(ND_EtDrain, PS_Default), H_Et, K_PipeEnt + K_PipeExit)*(N_EtFullHopper + 1) + Q_pipeminor(innerdiameter(ND_FlocValve, PS_Default), H_Floc, K_PipeEnt + K_PipeExit)*(last(Y_FlocDrainValves) + 1) + Q_pipeminor(innerdiameter(ND_SedSludgePipe, PS_Default), H_Sed, K_PipeEnt + K_PipeExit)*N_SedBays*N_SedTanks
Q_PlantDCMax := Q_TankDrainMax + N_Fi*(1 + N_Fi > 1)*Q_Fi
L_PlantDC := 2*T_PlantWall + N_SedTanks*(W_Sed + T_SedWallDivider) - T_SedWallDivider + N_FlocChannels*(W_FlocChannel + T_FlocChannelWall) - T_FlocChannelWall + W_EtWalkway + 2*T_PlantWall + W_Et
W_PlantDC := W_DCWalkway
H_PlantDC := H_HorizChannelMin(Q_PlantDCMax, W_PlantDC, L_PlantDC, Nu_Water, E_Concrete, 1)
Z_PlantLowerDCBottom := min(Plant_Origin[2] - H_PlantDC, Z_FiSiphonOutlet - L_FiSiphonChannelStubMin, Z_Walkway - T_Floor - H_HumanAccess)
Z_PlantUpperDCBottom := min(Z_FlocTank - H_PlantDC, Z_Walkway - T_Floor - H_HumanAccess)
# Outlet to distrubution pipe weir functions
R_Fountain(ND_Pipe, H_PipeAboveSurface, V_Horizontal) :=
    PipeContribution ← outerradius(ND_Pipe)
    time ← (H_PipeAboveSurface*2/g)^(1/2)
    displacement ← V_Horizontal*time
    R_Fountain ← displacement + PipeContribution
    return R_Fountain
S_PipeStubWeir(Q, ND_Pipe, H_PipeAboveSurface, SF, PipeSpecification) :=
    Rad ← (outerradius(ND_Pipe) + innerR(ND_Pipe, PipeSpecification))/2
    circumference ← Rad*2*π
    PipeRadius ← outerradius(ND_Pipe)
    yc ← HW_Critical(Q, circumference)
    vel ← V_Horizontal(yc)
    FountainRadius ← R_Fountain(ND_Pipe, H_PipeAboveSurface, vel)
    Spacing ← SF*FountainRadius
    return Spacing
