# [reference: FluidsFunctions.xmcd]
# Test Assumptions
# [reference: PipeDatabase.xmcd]
i := 0 .. 100
Q_plant := 50*L/s
PipeSpecification := 4
Q_plant := 100*L/s
innerDiameters_PipeSpec4 := [0.013; 0.023; 0.037; 0.048; 0.071; 0.092; 0.14; 0.183; 0.273; 0.345; 0.432; 0.518]
L_pipe := 20 m
K_total := 0.8
h_lossmax := 50 cm
# This function is imported from FluidsFunctions to calculate pipe size based on flow rate.
ν := 1*10^-6*m^2/s
# This function determines the inner diameter of the pipe given a vector and entered values
# Example Calculation
PipeInnerDiameter(Q_plant, PipeSpec, h_lossmax, L_pipe, ν, eps, K_total) := D_pipe(Q_plant, innerDiameters_PipeSpec4*m, h_lossmax, L_pipe, ν, 0, K_total)
d_pipe := PipeInnerDiameter(Q_plant, innerDiameters_PipeSpec4*m, h_lossmax, L_pipe, ν, 0, K_total) = 10.748 in
# Sizing the Macromixing Orifice
# We want a minor loss coefficient of 1.3
K_e := 1.3
K_vc := 0.62
# So we use the equation for minor loss coefficient for a submerged orifice given in the notes on Flow Control and Measurement to determine d.or
# Example Calculation
d_macromixorificeFn(K_vc, d_pipe, K_e) := d_pipe*(1/(K_vc*(K_e^0.5 + 1)))^0.5
d_macromixorifice := d_macromixorificeFn(K_vc, d_pipe, K_e) = 0.236997 m
A_macromixorifice := A_circle(d_macromixorifice) = 0.0441138 m^2
# We are assuming a circular orifice here.  The resulting area of the orifice and velocity through the orifice are given below.
A_out := A_circle(d_pipe) = 0.0585349 m^2
V_macromixorifice := Q_plant/A_macromixorifice = 2.26687 m/s
V_out := Q_plant/A_out = 1.70838 m/s
# The resulting head loss through the orifice is given as:
# Example Calculation
h_emacromixorificeFn(Q_plant, d_pipe) := K_e*(Q_plant/A_circle(d_pipe))^2/(2*g)
h_emacromixorifice := h_emacromixorificeFn(Q_plant, d_pipe) = 0.193447 m
# Sizing the Micromixing Orifice
# There are two conditions that must be met here.  First of all the energy disspation rate must be 1 W/kg and there must be a head loss of 20 to 50 cm.
ε := 1*W/kg
h_total := 50 cm  # Example Calculation
h_emicromixorificeFn(h_total, h_emacromixorifice) := h_total - h_emacromixorifice
h_emicromixorifice := h_emicromixorificeFn(h_total, h_emacromixorifice) = 0.306553 m
d_micromixorificeFn(d_pipe, Q_plant, h_emicromixorifice) := (4*(A_circle(d_pipe)/K_vc)/(((2*g*h_emicromixorifice)/(Q_plant/A_circle(d_pipe))^2)^0.5 + 1))^0.5/π^0.5
d_micromixorifice := d_micromixorificeFn(d_pipe, Q_plant, h_emicromixorifice) = 0.222173 m
# The largest smallest dimension is calculated below.
W := (2*g*h_emicromixorifice)^(3/2)/(20*ε) = 29.0215 in
# There is more coding needed.  We have the largest smallest dimension and the area needed.  We have to determine whether to use squares, rectangles, circles, and if more than one is needed.
