n
# Hydraulic Design
# References
# Fluids Functions
# Pipe Database
# [reference: PipeDatabase.xmcd]
# Pipes and Orifices
PipeSize(Q_plant, D_avail, PipeSpecification) :=
    Pipe_size ← 2 m
    H_total ← 1 m
    return (Pipe_size, H_total)
FlowMeasurementDesign(Q_plant, D_avail) :=
    grit_holes ← 2
    return grit_holes
# Plant Leveling Tank
PlantLevelingTank(Q_plant, D_avail) :=
    lvltank_waterlvl ← 3 m
    wall_disp ← 3 m
    depth ← 2 m
    width ← 2 m
    length ← 2 m
    lvltank_dim ← [length; width; depth]
    return (lvltank_waterlvl, wall_disp, lvltank_dim)
# Plant Elevation Design
PlantElevationDesign(Q_plant, n_sedtanks, sedtank_dim, FlocTank_width) = {
    Plant_elevation ← 3 m
    return Plant_elevation
}  # error: This variable is undefined.
# Hydraulic Design Function
HydraulicDesign(Q_plant, FlocTank_width, PipeSpecification, n_sedtanks, sedtank_dim, lamella_spacing, tank_thick, channel_thick) :=
    D_avail ← AvailPipeSizes(PipeSpecification)
    waterlevel ← 1
    manifold_depth ← 1
    D_orifice ← 2 cm
    grit_holes ← FlowMeasurementDesign(Q_plant, D_avail)
    lvltank_dim ← [1; 1; 1]
    waste_inr ← 5
    effluent_inr ← 5
    SedPipe_length ← 2
    lvltank_waterlvl ← 5
    wall_disp ← 3
    channel_dim ← 2
    orifice_dist ← 23 cm
    return [waterlevel, manifold_depth, D_orifice/m, grit_holes, lvltank_dim, waste_inr, effluent_inr, SedPipe_length, lvltank_waterlvl, wall_disp, channel_dim, orifice_dist/m]
