# [reference: DesignAssumptions.xmcd]
# [reference: PipeDatabase.xmcd]
# [reference: FluidsFunctions.xmcd]
# Launderer Design
# Diameter iteration program:
D_manifold(Q, h, L, Q_ratio, D_available, ν, ε, K, n) :=
    D_new ← D_available[0]
    D_old ← 0 m
    error ← 1
    while error > 0.01
        D_old ← D_new
        D_new ← (8*Q^2/(g*π^2*h)*(1 + (f(Q, D_old, ν, ε)*L/D_old + K)*(1/3 + 1/(2*n) + 1/(6*n^2)))/(1 - Q_ratio^2))^(1/4)
        error ← |D_old - D_new|/mean(D_old, D_new)
    D_new ← Dnextlargest(D_new, D_available)
    return D_new
# Why do you take the mean when you calculate error?
D_orifices(h_losslaunder, Q_plant, D_launder, n_orifices, HW_sedtank, n_sedtanks) := D_circle(A_orifice(HW_sedtank - h_losslaunder - (Q_plant/n_sedtanks)^2/(2*g*A_circle(D_launder)^2), K_orifice, Q_plant/2/n_orifices))
# A.orifice and A.circle are functions.
# In the above function, it would be helpful to explain why for Q we need to divide by 2. How do you calculate the head loss? More explanation would be great here.
Launder(Q_plant, PipeSpecification, L_sedtank, lamella_spacing) :=
    Q_tank ← Q_plant/n_sedtanks
    Q_ratio ← .85
    n_orifices ← floor(L_sedtank/(2*lamella_spacing))
    h_sedtank ← 2 m
    h_platetops ← 1.8 m
    manifold_depth ← h_sedtank - h_platetops - (h_sedtank - h_platetops)/2
    D_avail ← AvailPipeSizes1(PipeSpecification)
    D_launder ← D_manifold(Q_tank, manifold_depth, 2*L_sedtank, Q_ratio, D_avail, ν, ε_pvc, 0, n_orifices)
    h_losslaunder ← h_lmanifold(Q_tank, D_launder, 2*L_sedtank, 0, ν, ε_pvc, n_orifices)
    D_orifice ← D_orifices(h_losslaunder, Q_plant, D_launder, n_orifices, h_sedtank, n_sedtanks)
    SedPipe_length ← L_sedtank
    orifice_dist ← lamella_spacing/2
    return [SedPipe_length/m, D_orifice/m, orifice_dist/m, manifold_depth/m, D_launder/m, n_orifices]  # How is PipeSpecification determined?
# Q.ratio assumption?
# What is hplatetops?
LaunderHL(Q_plant, n_sedtank) :=
    Q_tank ← Q_plant/n_sedtank
    h_losslaunder ← h_lmanifold(Q_tank, D_launder, 2*L_sedtank, 0, ν, ε_pvc, n_orifices)
    Q_orifice ← Q_tank/n_orifice
    h_orifice ← (Q_orifice/(K_orifice*A_circle(D_orifice)))^2*(1/(2*g))
    HL_laundorif ← h_orifice*n_orifice
    HL_launder ← h_losslaunder*n_sedtank
    HL_laundertotal ← HL_launder + HL_orifice
    return HL_launder  # error: This variable is undefined.  # should the HL function be in the larger launder equation?
# Total head loss in launder is the head loss in each launder*n.sedtank
# This file is a little too difficult for me to follow. I think it needs to be documented more - and explain at the top what this file is used for. A graphic would be good too!
