# Unit Processes Design
# References
# Fluids Functions
# [reference: FluidsFunctions.xmcd]
# Design Assumptions
# [reference: DesignAssumptions.xmcd]
# New Gtheta Information
# [reference: new g and gtheta.xmcd]
# Sedimentation Tank Design
SedTankDesign(Q_plant, SedTank_width, lamella_spacing, L_lamella, β) :=
    Q_tank ← Q_plant/n_sedtanks
    spacebelow_slanted ← (SedTank_width/2)*tan(β)
    spacebelow_straight ← spacebelow_total - spacebelow_slanted
    angle_toosteep ← "Failure: Slope of walls too steep (should be less than 60 deg)."
    return angle_toosteep if spacebelow_slanted > 1 m
    H_lamella ← L_lamella*sin(α)
    H_tank ← H_lamella + spaceabove + spacebelow_total + freeboard_sed
    v_c ← v_up/(1 + L_lamella/lamella_spacing*cos(α)*sin(α))
    vc_toobig ← "Failure: Critical velocity is greater than the suggested value"
    return vc_toobig if v_c > criticalvelocity_toobig
    A_active ← Q_tank/v_up
    L_active ← A_active/SedTank_width
    L_tank ← (L_lamella*cos(α) + L_active)
    N_lamella ← L_active/(lamella_spacing/sin(α))
    sedtank_vol ← 3*((SedTank_width*(H_tank - spacebelow_total)*L_tank) + .5*(SedTank_width*spacebelow_total*L_tank))
    sedtank_dim ← [L_tank; SedTank_width; H_tank]
    return [sedtank_dim/m, N_lamella]
# calculated so tank comes to a point at the drain pipe
# ratio between water depth above the plate settles and launder spacing (assuming 1 launder per tank)
# sum of the space below the lamella, space above the lamella,
# and the length of the lamella
# puts the dimensions of the sed tank in a 3 x 1 vector
# returns the sed tank dimensions and the number of lamella
# Flocculator Design
# same equations as in the fluids function, but inputs and outputs
# vectors because baffle spacing is a vector
max_v(ν, k_b, f, w, b, G_max) := vectorize(G_max^(2/3)*(2*ν*b/(k_b + f*b/(4*R.h(w, b))))^(1/3))
R.h(b, w) := vectorize(w*b/(2*(w + b)))
Reynolds(v, R_h, ν) := vectorize(v*4*R_h/ν)
friction(R_h, epsilon_friction, Re_max, Re_pipetransition) :=
    for i ∈ 0 .. last(Re_max)
        f[i] ← 1.325/vectorize(ln(epsilon_friction/(4*R_h[i]*3.7) + 5.74/Re_max[i]^0.9))^2 if Re_max[i] ≥ Re_pipetransition
        f[i] ← 64/Re_max[i] otherwise
    f
flocculator(Q_plant, SedTank_width, L_lamella, β) :=
    SedTankDim ← SedTankDesign(Q_plant, SedTank_width, lamella_spacing, L_lamella, β)[0, 0]*m
    FlocTank_length ← SedTankDim[0]
    FlocTank_width ← SedTankDim[1]/n_channels
    FlocTank_enddepth ← SedTankDim[2] - freeboard_sed
    b_old ← [.1; .1; .1]*m
    G_avg ← G_new
    G_max ← G_NewMax
    Gθ_mintot ← Gθ_total
    b ← [200; 200; 200]*m
    v_max ← Q_plant/(b*FlocTank_width)
    while max(|vectorize((b_old - b)/b)|) > .01
        b_old ← b
        R_h ← R.h(b_old, FlocTank_width)
        Re_max ← Reynolds(v_max, R_h, ν)
        f ← friction(R_h, ε_friction, Re_max, Re_pipetransition)
        v_max ← max_v(ν, k_b, f, FlocTank_width, b, G_max)
        area ← Q_plant/v_max
        b ← area/FlocTank_width
    gap ← 1.5*b
    v_min ← Flow_ratio*v_max
    Re_min ← Reynolds(v_min, R_h, ν)
    f_min ← friction(R_h, ε_friction, Re_max, Re_pipetransition)
    G_min ← G_max*Flow_ratio^(3/2)
    G_avg ← (k_b*Q_plant^3/(2*ν*FlocTank_width^3*vectorize((2*b)^4)))^(1/2)
    Gθ_min ← Gθ_mintot*G_min/sum(G_min)
    θ_min ← FlocTank_width*b^2/Q_plant
    n ← ceil(vectorize(Gθ_min/(G_avg*θ_min)))
    n[0] ← mod(sum(n) + 1, 2) + n[0]
    baffle_length ← FlocTank_enddepth - gap
    h_lmax ← vectorize(n*vectorize((k_b + vectorize(f*baffle_length/(4*R_h)))*v_max^2/(2*g)))
    h_lmin ← vectorize(n*vectorize((k_b + vectorize(f_min*baffle_length/(4*R_h)))*v_min^2/(2*g)))
    total_hl ← sum(h_lmax)
    d_start ← FlocTank_enddepth + total_hl
    freeboard_floc ← 10 cm
    floc_dim ← [FlocTank_length; FlocTank_width; d_start + freeboard_floc]
    baffle_spacing ← b
    floc_inleth ← 1.5 m
    n_baffle ← n
    return [floc_dim/m, baffle_spacing/m, floc_inleth/m, n_baffle]
# Index 0,0 is calling sed tank dimensions :Length,Width, Height
# Subtract freeboard to get only the water depth in sed tank
# Chemical Feed Design
ChemicalFeed(Q_plant) :=
    Q_alum ← Q_plant*Al_maxdose/Al_stock
    return Q_alum
